# OpenSim document version 40600
# Size 5 soccer ball: a thin spherical shell (r = 0.11 m, m = 0.43 kg) with a 6-dof root joint
Model ball:
  gravity: 0 -9.80665 0
  Ground
  BodySet:
    Body ball: mass=0.43 mass_center=(0 0 0) inertia=(0.003468667 0.003468667 0.003468667 0 0 0) meshes=sphere.vtp
  JointSet:
    CustomJoint ground_ball: socket_parent_frame=/ground socket_child_frame=/bodyset/ball
      Coordinate ball_rx: default_value=0 range=(-6.283185 6.283185) clamped=false
      Coordinate ball_ry: default_value=0 range=(-6.283185 6.283185) clamped=false
      Coordinate ball_rz: default_value=0 range=(-6.283185 6.283185) clamped=false
      Coordinate ball_tx: default_value=0 range=(-100 100) clamped=false
      Coordinate ball_ty: default_value=0 range=(-100 100) clamped=false
      Coordinate ball_tz: default_value=0 range=(-100 100) clamped=false
      SpatialTransform:
        TransformAxis rotation1: coordinates=ball_rx axis=(1 0 0) LinearFunction(coefficients=1 0)
        TransformAxis rotation2: coordinates=ball_ry axis=(0 1 0) LinearFunction(coefficients=1 0)
        TransformAxis rotation3: coordinates=ball_rz axis=(0 0 1) LinearFunction(coefficients=1 0)
        TransformAxis translation1: coordinates=ball_tx axis=(1 0 0) LinearFunction(coefficients=1 0)
        TransformAxis translation2: coordinates=ball_ty axis=(0 1 0) LinearFunction(coefficients=1 0)
        TransformAxis translation3: coordinates=ball_tz axis=(0 0 1) LinearFunction(coefficients=1 0)
  ContactGeometrySet:
    ContactSphere ball_contact: socket_frame=/bodyset/ball location=(0 0 0) radius=0.11
