# OpenSim document version 40600
Model athlete_model:
  Ground
  BodySet:
    Body pelvis: mass=11.777 [kg] mass_center=(-0.0707 0 0) inertia=(0.1028 0.0871 0.0579 0 0 0)
        meshes=(pelvis_r.obj pelvis_l.obj sacrum.obj)
      Station iliocrestale_r: .. (-0.05 0.082 0.11)
      Station iliocrestale_l: .. (-0.05 0.082 -0.11)
      Station iliocrestale_midpoint: .. (-0.05 0.082 0)
      Station ASIS_r: .. (-0.0015 0.0065 0.125)
      Station ASIS_l: .. (-0.0015 0.0065 -0.125)
      Station ASIS_midpoint: .. (-0.0015 0.0065 0)
      Station mid_pelvis: .. (-0.05 0.0065 0)
      Station PSIS_r: .. (-0.14 0.035 0.055)
      Station PSIS_l: .. (-0.14 0.035 -0.055)
      Station PSIS_midpoint: .. (-0.14 0.035 0)
      Station acetabulum_r: .. (-0.072 -0.06 0.08)
      Station acetabulum_l: .. (-0.072 -0.06 -0.08)
      StationDefinedFrame pelvis_frame: socket_point_a=/bodyset/pelvis/mid_pelvis
          socket_point_b=/bodyset/pelvis/ASIS_midpoint socket_point_c=/bodyset/pelvis/iliocrestale_midpoint
          socket_origin_point=/bodyset/pelvis/mid_pelvis ab_axis=+x ab_x_ac_axis=+z
      StationDefinedFrame hip_r_parent_frame: socket_point_a=/bodyset/pelvis/mid_pelvis
          socket_point_b=/bodyset/pelvis/ASIS_midpoint socket_point_c=/bodyset/pelvis/iliocrestale_midpoint
          socket_origin_point=/bodyset/pelvis/acetabulum_r ab_axis=+x ab_x_ac_axis=+z
      StationDefinedFrame hip_l_parent_frame: socket_point_a=/bodyset/pelvis/mid_pelvis
          socket_point_b=/bodyset/pelvis/ASIS_midpoint socket_point_c=/bodyset/pelvis/iliocrestale_midpoint
          socket_origin_point=/bodyset/pelvis/acetabulum_l ab_axis=+x ab_x_ac_axis=+z
    Body lumbar_spine: mass=5 mass_center=(0 -0.0875 0) inertia=(0.02233073 0.01914062 0.02233073 0 0 0)
    Body thorax: mass=16.83 mass_center=(-0.0591 -0.1486 0) inertia=(1.29841 0.55245 1.29841 0 0 0) meshes=ribs.obj
      Station suprasternale: .. (0 0 0)
      ContactEllipsoid thorax_r_obstacle: location=(-0.022 -0.1467 0.07) orientation=(-0.17 -0.0384 0.212)
          radii=(0.0741 0.17 0.0705)
      ContactEllipsoid thorax_l_obstacle: location=(-0.022 -0.1467 -0.07) orientation=(0.17 0.0384 0.212)
          radii=(0.0741 0.17 0.0705)
    Body head: mass=5 mass_center=(0 0.0375 0) inertia=(0.01569 0.01455 0.0186 0 0 0) meshes=skull.obj
      Station glabella: .. (0.09 0.07 0)
      Station euryon_r: .. (-0.0015 0.085 0.069)
      Station euryon_l: .. (-0.0015 0.085 -0.069)
      Station opisthocranion: .. (-0.075 0.05 0)
      Station vertex: .. (0 0.14 0)
    Body clavicle_r: mass=0.1898 mass_center=(-0.0111 0.0064 0.0542) inertia=(0.00027 0.00027 4.9e-5 0 0 0)
        meshes=clavicle_r.obj
    Body clavicle_l: mass=0.1898 mass_center=(-0.0111 0.0064 -0.0542) inertia=(0.00027 0.00027 4.9e-5 0 0 0)
        meshes=clavicle_l.obj
    Body scapula_r: mass=0.7054 mass_center=(-0.04612 -0.0319 -0.04565) inertia=(0.001 0.001 0.001 0 0 0)
        meshes=scapula_r.obj
      Station acromion_r: .. (0 0 0)
      ContactEllipsoid deltoideus_r_obstacle: location=(-0.0343 -0.0334 -0.0443) orientation=(1.4823 0.1606 -0.4472)
          radii=(0.04 0.091 0.03)
      ContactEllipsoid teres_major_r_obstacle: location=(-0.0893 -0.1062 -0.0501) orientation=(-1.4854 -0.3354 -0.8754)
          radii=(0.0075 0.0075 0.075)
      ContactEllipsoid infraspinatus_r_obstacle: location=(-0.069 -0.059 -0.05) orientation=(1.87 -0.543 -2.355)
          radii=(0.0197 0.0197 0.085)
      ContactEllipsoid subscapularis_r_obstacle: location=(-0.0251 -0.039 -0.0284) orientation=(1 -1 1)
          radii=(0.0126 0.0126 0.075)
    Body scapula_l: mass=0.7054 mass_center=(-0.04612 -0.0319 0.04565) inertia=(0.001 0.001 0.001 0 0 0)
        meshes=scapula_l.obj
      Station acromion_l: .. (0 0 0)
      ContactEllipsoid deltoideus_l_obstacle: location=(-0.0343 -0.0334 0.0443) orientation=(-1.4823 -0.1606 -0.4472)
          radii=(0.04 0.091 0.03)
      ContactEllipsoid teres_major_l_obstacle: location=(-0.0893 -0.1062 0.0501) orientation=(1.4854 0.3354 -0.8754)
          radii=(0.0075 0.0075 0.075)
      ContactEllipsoid infraspinatus_l_obstacle: location=(-0.069 -0.059 0.05) orientation=(-1.87 0.543 -2.355)
          radii=(0.0197 0.0197 0.085)
      ContactEllipsoid subscapularis_l_obstacle: location=(-0.0251 -0.039 0.0284) orientation=(-1 1 1)
          radii=(0.0126 0.0126 0.075)
    Body humerus_r: mass=2.0325 mass_center=(0 -0.1645 0) inertia=(0.011946 0.004121 0.01341 0 0 0)
        meshes=humerus_r.obj
      ContactSphere humeral_head_r_obstacle: location=(0.005 -0.003 -0.004) radius=0.02
    Body humerus_l: mass=2.0325 mass_center=(0 -0.1645 0) inertia=(0.011946 0.004121 0.01341 0 0 0)
        meshes=humerus_l.obj
      ContactSphere humeral_head_l_obstacle: location=(0.005 -0.003 0.004) radius=0.02
    Body ulna_r: mass=0.6075 mass_center=(0 -0.120525 0) inertia=(0.002962 0.000618 0.003213 0 0 0) meshes=ulna_r.obj
      Station olecranon_r: .. (-0.03 -0.001 0)
    Body ulna_l: mass=0.6075 mass_center=(0 -0.120525 0) inertia=(0.002962 0.000618 0.003213 0 0 0) meshes=ulna_l.obj
      Station olecranon_l: .. (-0.03 -0.001 0)
    Body radius_r: mass=0.6075 mass_center=(0 -0.120525 0) inertia=(0.002962 0.000618 0.003213 0 0 0)
        meshes=radius_r.obj
      Station radiale_r: .. (0 -0.004 0.006)
      Station stylion_r: .. (0 -0.23 0.03)
    Body radius_l: mass=0.6075 mass_center=(0 -0.120525 0) inertia=(0.002962 0.000618 0.003213 0 0 0)
        meshes=radius_l.obj
      Station radiale_l: .. (0 -0.004 -0.006)
      Station stylion_l: .. (0 -0.23 -0.03)
    Body hand_r: mass=0.4575 mass_center=(0 -0.068095 0) inertia=(0.000892 0.000547 0.00134 0 0 0)
        meshes=(pisiform_r.obj lunate_r.obj scaphoid_r.obj triquetrum_r.obj hamate_r.obj capitate_r.obj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)
    Body hand_l: mass=0.4575 mass_center=(0 -0.068095 0) inertia=(0.000892 0.000547 0.00134 0 0 0)
        meshes=(pisiform_l.obj lunate_l.obj scaphoid_l.obj triquetrum_l.obj hamate_l.obj capitate_l.obj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)
  JointSet:
    WeldJoint ground_pelvis: socket_parent_frame=ground_offset socket_child_frame=/bodyset/pelvis/pelvis_frame
      PhysicalOffsetFrame ground_offset: socket_parent=/ground translation=(0 1 0) [meters]
      SpatialTransform:
        TransformAxis rotation1: coordinates=pelvis_tilt axis=(0 0 1) LinearFunction(coefficients=1 0)
        TransformAxis rotation2: coordinates=pelvis_list axis=(1 0 0) LinearFunction(coefficients=1 0)
        TransformAxis rotation3: coordinates=pelvis_rotation axis=(0 1 0) LinearFunction(coefficients=1 0)
        TransformAxis translation1: coordinates=pelvis_tx axis=(1 0 0) LinearFunction(coefficients=1 0)
        TransformAxis translation2: coordinates=pelvis_ty axis=(0 1 0) LinearFunction(coefficients=1 0)
        TransformAxis translation3: coordinates=pelvis_tz axis=(0 0 1) LinearFunction(coefficients=1 0)
    CantileverFreeBeamJoint lumbar: socket_parent_frame=lumbar_spine_parent_frame
        socket_child_frame=lumbar_spine_child_frame beam_length=0.175
      Coordinate lumbar_bending: default_value=0 range=(-0.5235988 0.5235988) clamped=true
      Coordinate lumbar_extension: default_value=-0.6414085 range=(-1.182461 0.4930555) clamped=true
      Coordinate lumbar_rotation: default_value=0 range=(-0.2617994 0.2617994) clamped=true
      PhysicalOffsetFrame lumbar_spine_parent_frame: socket_parent=/bodyset/pelvis translation=(-0.09 0.075 0)
          orientation=(-1.570796 0.25 0) [radians]
      PhysicalOffsetFrame lumbar_spine_child_frame: socket_parent=/bodyset/lumbar_spine translation=(0 0 0)
          orientation=(-1.570796 0 0)
    CantileverFreeBeamJoint thorax: socket_parent_frame=thoracic_spine_parent_frame
        socket_child_frame=thoracic_spine_child_frame beam_length=0.275
      Coordinate thorax_bending: default_value=0 range=(-0.5235988 0.5235988) clamped=true
      Coordinate thorax_extension: default_value=0.6326819 range=(0.2487094 1.086467) clamped=true
      Coordinate thorax_rotation: default_value=0 range=(-0.8203047 0.8203047) clamped=true
      PhysicalOffsetFrame thoracic_spine_parent_frame: socket_parent=/bodyset/lumbar_spine translation=(0 0 0)
          orientation=(-1.570796 0 0)
      PhysicalOffsetFrame thoracic_spine_child_frame: socket_parent=/bodyset/thorax translation=(-0.0275 0.057 0)
          orientation=(-1.570796 0.25 0)
    CantileverFreeBeamJoint cervical: socket_parent_frame=cervical_spine_parent_frame
        socket_child_frame=cervical_spine_child_frame beam_length=0.075
      Coordinate cervical_bending: default_value=0 range=(-0.8552113 0.8552113) clamped=true
      Coordinate cervical_extension: default_value=-0.2487094 range=(-1.348267 0.8683013) clamped=true
      Coordinate cervical_rotation: default_value=0 range=(-1.48353 1.48353) clamped=true
      PhysicalOffsetFrame cervical_spine_parent_frame: socket_parent=/bodyset/thorax translation=(-0.0275 0.057 0)
          orientation=(-1.570796 0.25 0)
      PhysicalOffsetFrame cervical_spine_child_frame: socket_parent=/bodyset/head translation=(0 0 0)
          orientation=(-1.570796 0 0)
    WeldJoint sternoclavicular_r: socket_parent_frame=sternoclavicular_r_parent_frame
        socket_child_frame=sternoclavicular_r_child_frame
      PhysicalOffsetFrame sternoclavicular_r_parent_frame: socket_parent=/bodyset/thorax
          translation=(0.00632 0.00693 0.0255)
      PhysicalOffsetFrame sternoclavicular_r_child_frame: socket_parent=/bodyset/clavicle_r translation=(0 0 0)
    WeldJoint sternoclavicular_l: socket_parent_frame=sternoclavicular_l_parent_frame
        socket_child_frame=sternoclavicular_l_child_frame
      PhysicalOffsetFrame sternoclavicular_l_parent_frame: socket_parent=/bodyset/thorax
          translation=(0.00632 0.00693 -0.0255)
      PhysicalOffsetFrame sternoclavicular_l_child_frame: socket_parent=/bodyset/clavicle_l translation=(0 0 0)
    EllipsoidJoint scapulothoracic_r: socket_parent_frame=scapulothoracic_r_parent_frame
        socket_child_frame=scapulothoracic_r_child_frame radii_x_y_z=(0.2 0.083 0.083)
      Coordinate scapula_abduction_r: default_value=0 range=(-0.5235988 0.5235988) clamped=true
      Coordinate scapula_elevation_r: default_value=0 range=(-0.1745329 0.1745329) clamped=true
      Coordinate scapula_rotation_r: default_value=0 range=(-0.2617994 0.2617994) clamped=true
      PhysicalOffsetFrame scapulothoracic_r_parent_frame: socket_parent=/bodyset/thorax
          translation=(-0.0294 -0.0173 0.0703) orientation=(0 -0.87 1.570796)
      PhysicalOffsetFrame scapulothoracic_r_child_frame: socket_parent=/bodyset/scapula_r
          translation=(-0.05982 -0.03904 -0.056) orientation=(-0.5181 -1.14159 1.285396)
    EllipsoidJoint scapulothoracic_l: socket_parent_frame=scapulothoracic_l_parent_frame
        socket_child_frame=scapulothoracic_l_child_frame radii_x_y_z=(-0.2 -0.083 -0.083)
      Coordinate scapula_abduction_l: default_value=0 range=(-0.5235988 0.5235988) clamped=true
      Coordinate scapula_elevation_l: default_value=0 range=(-0.1745329 0.1745329) clamped=true
      Coordinate scapula_rotation_l: default_value=0 range=(-0.2617994 0.2617994) clamped=true
      PhysicalOffsetFrame scapulothoracic_l_parent_frame: socket_parent=/bodyset/thorax
          translation=(-0.0294 -0.0173 -0.0703) orientation=(0 0.87 -1.570796)
      PhysicalOffsetFrame scapulothoracic_l_child_frame: socket_parent=/bodyset/scapula_l
          translation=(-0.05982 -0.03904 0.056) orientation=(0.5181 1.14159 -1.856196)
    CustomJoint glenohumeral_r: socket_parent_frame=glenohumeral_r_parent_frame socket_child_frame=/bodyset/humerus_r
      Coordinate shoulder_flexion_r: default_value=0 range=(-1.047198 3.141593) clamped=true
      Coordinate shoulder_abduction_r: default_value=0 range=(-1.047198 2.513274) clamped=true
      Coordinate shoulder_rotation_r: default_value=0 range=(-0.5235988 0.5235988) clamped=true
      PhysicalOffsetFrame glenohumeral_r_parent_frame: socket_parent=/bodyset/scapula_r
          translation=(-0.00955 -0.034 0.009) orientation=(-0.25 0 -0.125)
      SpatialTransform: axes_held_at_zero=(translation1 translation2 translation3)
        TransformAxis rotation1: coordinates=shoulder_flexion_r axis=(0 0 1) LinearFunction(coefficients=1 0)
        TransformAxis rotation2: coordinates=shoulder_abduction_r axis=(1 0 0) LinearFunction(coefficients=-1 0)
        TransformAxis rotation3: coordinates=shoulder_rotation_r axis=(0 1 0) LinearFunction(coefficients=1 0)
    CustomJoint glenohumeral_l: socket_parent_frame=glenohumeral_l_parent_frame socket_child_frame=/bodyset/humerus_l
      Coordinate shoulder_flexion_l: default_value=0 range=(-1.047198 3.141593) clamped=true
      Coordinate shoulder_abduction_l: default_value=0 range=(-1.047198 2.513274) clamped=true
      Coordinate shoulder_rotation_l: default_value=0 range=(-0.5235988 0.5235988) clamped=true
      PhysicalOffsetFrame glenohumeral_l_parent_frame: socket_parent=/bodyset/scapula_l
          translation=(-0.00955 -0.034 -0.009) orientation=(0.25 0 -0.125)
      SpatialTransform: axes_held_at_zero=(translation1 translation2 translation3)
        TransformAxis rotation1: coordinates=shoulder_flexion_l axis=(0 0 1) LinearFunction(coefficients=1 0)
        TransformAxis rotation2: coordinates=shoulder_abduction_l axis=(1 0 0) LinearFunction(coefficients=1 0)
        TransformAxis rotation3: coordinates=shoulder_rotation_l axis=(0 1 0) LinearFunction(coefficients=-1 0)
    PinJoint elbow_r: socket_parent_frame=elbow_r_parent_frame socket_child_frame=elbow_r_child_frame
      Coordinate elbow_flex_r: default_value=0 range=(0 2.617994) clamped=true
      PhysicalOffsetFrame elbow_r_parent_frame: socket_parent=/bodyset/humerus_r
          translation=(0.013144 -0.286273 -0.009595) orientation=(-0.0228627 0.228018 0.0051689)
      PhysicalOffsetFrame elbow_r_child_frame: socket_parent=/bodyset/ulna_r translation=(0 0 0)
          orientation=(-0.0228627 0.228018 0.0051689)
    PinJoint elbow_l: socket_parent_frame=elbow_l_parent_frame socket_child_frame=elbow_l_child_frame
      Coordinate elbow_flex_l: default_value=0 range=(0 2.617994) clamped=true
      PhysicalOffsetFrame elbow_l_parent_frame: socket_parent=/bodyset/humerus_l
          translation=(0.013144 -0.286273 0.009595) orientation=(0.0228627 -0.228018 0.0051689)
      PhysicalOffsetFrame elbow_l_child_frame: socket_parent=/bodyset/ulna_l translation=(0 0 0)
          orientation=(0.0228627 -0.228018 0.0051689)
    PinJoint radioulnar_r: socket_parent_frame=radioulnar_r_parent_frame socket_child_frame=radioulnar_r_child_frame
      Coordinate pro_sup_r: default_value=0 range=(0 1.570796) clamped=true
      PhysicalOffsetFrame radioulnar_r_parent_frame: socket_parent=/bodyset/ulna_r
          translation=(-0.006727 -0.013007 0.026083) orientation=(-1.56884 0.056428 1.53614)
      PhysicalOffsetFrame radioulnar_r_child_frame: socket_parent=/bodyset/radius_r translation=(0 0 0)
          orientation=(-1.56884 0.056428 1.53614)
    PinJoint radioulnar_l: socket_parent_frame=radioulnar_l_parent_frame socket_child_frame=radioulnar_l_child_frame
      Coordinate pro_sup_l: default_value=0 range=(0 1.570796) clamped=true
      PhysicalOffsetFrame radioulnar_l_parent_frame: socket_parent=/bodyset/ulna_l
          translation=(-0.006727 -0.013007 -0.026083) orientation=(1.56884 -0.056428 1.53614)
      PhysicalOffsetFrame radioulnar_l_child_frame: socket_parent=/bodyset/radius_l translation=(0 0 0)
          orientation=(1.56884 -0.056428 1.53614)
    UniversalJoint radius_hand_r: socket_parent_frame=radius_hand_r_parent_frame
        socket_child_frame=radius_hand_r_child_frame
      Coordinate wrist_flex_r: default_value=0 range=(-1.256637 1.256637) clamped=true
      Coordinate wrist_dev_r: default_value=0 range=(-0.448799 0.6283185) clamped=true
      PhysicalOffsetFrame radius_hand_r_parent_frame: socket_parent=/bodyset/radius_r
          translation=(-0.008797 -0.235841 0.01361) orientation=(-1.5708 0 -1.5708)
      PhysicalOffsetFrame radius_hand_r_child_frame: socket_parent=/bodyset/hand_r translation=(0 0 0)
          orientation=(-1.5708 0 -1.5708)
    UniversalJoint radius_hand_l: socket_parent_frame=radius_hand_l_parent_frame
        socket_child_frame=radius_hand_l_child_frame
      Coordinate wrist_flex_l: default_value=0 range=(-1.256637 1.256637) clamped=true
      Coordinate wrist_dev_l: default_value=0 range=(-0.448799 0.6283185) clamped=true
      PhysicalOffsetFrame radius_hand_l_parent_frame: socket_parent=/bodyset/radius_l
          translation=(-0.008797 -0.235841 -0.01361) orientation=(1.5708 0 1.5708)
      PhysicalOffsetFrame radius_hand_l_child_frame: socket_parent=/bodyset/hand_l translation=(0 0 0)
          orientation=(1.5708 0 1.5708)
  ForceSet:
    CoordinateLinearSpring lumbar_bending_spring_force: coordinate=lumbar_bending default_stiffness=25 [N-m/(rad]
        rest_length=0
    CoordinateLinearDamper lumbar_bending_damping_force: coordinate=lumbar_bending damping=5
    CoordinateLinearStop lumbar_bending_limit_force: coordinate=lumbar_bending stiffness=500 [N-m/rad] damping=0.1
        q_high=0.5235988 [rad] q_low=-0.5235988 [rad]
    CoordinateLinearSpring lumbar_extension_spring_force: coordinate=lumbar_extension default_stiffness=25
        rest_length=0
    CoordinateLinearDamper lumbar_extension_damping_force: coordinate=lumbar_extension damping=5
    CoordinateLinearStop lumbar_extension_limit_force: coordinate=lumbar_extension stiffness=500 damping=0.1
        q_high=0.4930555 q_low=-1.182461
    CoordinateLinearSpring lumbar_rotation_spring_force: coordinate=lumbar_rotation default_stiffness=25 rest_length=0
    CoordinateLinearDamper lumbar_rotation_damping_force: coordinate=lumbar_rotation damping=5
    CoordinateLinearStop lumbar_rotation_limit_force: coordinate=lumbar_rotation stiffness=500 damping=0.1
        q_high=0.2617994 q_low=-0.2617994
    CoordinateLinearSpring thorax_bending_spring_force: coordinate=thorax_bending default_stiffness=25 rest_length=0
    CoordinateLinearDamper thorax_bending_damping_force: coordinate=thorax_bending damping=5
    CoordinateLinearStop thorax_bending_limit_force: coordinate=thorax_bending stiffness=500 damping=0.1
        q_high=0.5235988 q_low=-0.5235988
    CoordinateLinearSpring thorax_extension_spring_force: coordinate=thorax_extension default_stiffness=25
        rest_length=0
    CoordinateLinearDamper thorax_extension_damping_force: coordinate=thorax_extension damping=5
    CoordinateLinearStop thorax_extension_limit_force: coordinate=thorax_extension stiffness=500 damping=0.1
        q_high=1.086467 q_low=0.2487094
    CoordinateLinearSpring thorax_rotation_spring_force: coordinate=thorax_rotation default_stiffness=25 rest_length=0
    CoordinateLinearDamper thorax_rotation_damping_force: coordinate=thorax_rotation damping=5
    CoordinateLinearStop thorax_rotation_limit_force: coordinate=thorax_rotation stiffness=500 damping=0.1
        q_high=0.8203047 q_low=-0.8203047
    CoordinateLinearSpring cervical_bending_spring_force: coordinate=cervical_bending default_stiffness=25
        rest_length=0
    CoordinateLinearDamper cervical_bending_damping_force: coordinate=cervical_bending damping=5
    CoordinateLinearStop cervical_bending_limit_force: coordinate=cervical_bending stiffness=500 damping=0.1
        q_high=0.8552113 q_low=-0.8552113
    CoordinateLinearSpring cervical_extension_spring_force: coordinate=cervical_extension default_stiffness=25
        rest_length=0
    CoordinateLinearDamper cervical_extension_damping_force: coordinate=cervical_extension damping=5
    CoordinateLinearStop cervical_extension_limit_force: coordinate=cervical_extension stiffness=500 damping=0.1
        q_high=0.8683013 q_low=-1.348267
    CoordinateLinearSpring cervical_rotation_spring_force: coordinate=cervical_rotation default_stiffness=25
        rest_length=0
    CoordinateLinearDamper cervical_rotation_damping_force: coordinate=cervical_rotation damping=5
    CoordinateLinearStop cervical_rotation_limit_force: coordinate=cervical_rotation stiffness=500 damping=0.1
        q_high=1.48353 q_low=-1.48353
    CoordinateLinearSpring scapula_abduction_r_spring_force: coordinate=scapula_abduction_r default_stiffness=5
        rest_length=0
    CoordinateLinearDamper scapula_abduction_r_damping_force: coordinate=scapula_abduction_r damping=1
    CoordinateLinearStop scapula_abduction_r_limit_force: coordinate=scapula_abduction_r stiffness=500 damping=0.1
        q_high=0.5235988 q_low=-0.5235988
    CoordinateLinearSpring scapula_elevation_r_spring_force: coordinate=scapula_elevation_r default_stiffness=5
        rest_length=0
    CoordinateLinearDamper scapula_elevation_r_damping_force: coordinate=scapula_elevation_r damping=1
    CoordinateLinearStop scapula_elevation_r_limit_force: coordinate=scapula_elevation_r stiffness=500 damping=0.1
        q_high=0.1745329 q_low=-0.1745329
    CoordinateLinearSpring scapula_rotation_r_spring_force: coordinate=scapula_rotation_r default_stiffness=5
        rest_length=0
    CoordinateLinearDamper scapula_rotation_r_damping_force: coordinate=scapula_rotation_r damping=1
    CoordinateLinearStop scapula_rotation_r_limit_force: coordinate=scapula_rotation_r stiffness=500 damping=0.1
        q_high=0.2617994 q_low=-0.2617994
    CoordinateLinearSpring scapula_abduction_l_spring_force: coordinate=scapula_abduction_l default_stiffness=5
        rest_length=0
    CoordinateLinearDamper scapula_abduction_l_damping_force: coordinate=scapula_abduction_l damping=1
    CoordinateLinearStop scapula_abduction_l_limit_force: coordinate=scapula_abduction_l stiffness=500 damping=0.1
        q_high=0.5235988 q_low=-0.5235988
    CoordinateLinearSpring scapula_elevation_l_spring_force: coordinate=scapula_elevation_l default_stiffness=5
        rest_length=0
    CoordinateLinearDamper scapula_elevation_l_damping_force: coordinate=scapula_elevation_l damping=1
    CoordinateLinearStop scapula_elevation_l_limit_force: coordinate=scapula_elevation_l stiffness=500 damping=0.1
        q_high=0.1745329 q_low=-0.1745329
    CoordinateLinearSpring scapula_rotation_l_spring_force: coordinate=scapula_rotation_l default_stiffness=5
        rest_length=0
    CoordinateLinearDamper scapula_rotation_l_damping_force: coordinate=scapula_rotation_l damping=1
    CoordinateLinearStop scapula_rotation_l_limit_force: coordinate=scapula_rotation_l stiffness=500 damping=0.1
        q_high=0.2617994 q_low=-0.2617994
    CoordinateLinearSpring shoulder_flexion_r_spring_force: coordinate=shoulder_flexion_r default_stiffness=1
        rest_length=0
    CoordinateLinearDamper shoulder_flexion_r_damping_force: coordinate=shoulder_flexion_r damping=1
    CoordinateLinearStop shoulder_flexion_r_limit_force: coordinate=shoulder_flexion_r stiffness=500 damping=0.1
        q_high=3.141593 q_low=-1.047198
    CoordinateLinearSpring shoulder_abduction_r_spring_force: coordinate=shoulder_abduction_r default_stiffness=1
        rest_length=0
    CoordinateLinearDamper shoulder_abduction_r_damping_force: coordinate=shoulder_abduction_r damping=1
    CoordinateLinearStop shoulder_abduction_r_limit_force: coordinate=shoulder_abduction_r stiffness=500 damping=0.1
        q_high=2.513274 q_low=-1.047198
    CoordinateLinearSpring shoulder_rotation_r_spring_force: coordinate=shoulder_rotation_r default_stiffness=1
        rest_length=0
    CoordinateLinearDamper shoulder_rotation_r_damping_force: coordinate=shoulder_rotation_r damping=1
    CoordinateLinearStop shoulder_rotation_r_limit_force: coordinate=shoulder_rotation_r stiffness=500 damping=0.1
        q_high=0.5235988 q_low=-0.5235988
    CoordinateLinearSpring shoulder_flexion_l_spring_force: coordinate=shoulder_flexion_l default_stiffness=1
        rest_length=0
    CoordinateLinearDamper shoulder_flexion_l_damping_force: coordinate=shoulder_flexion_l damping=1
    CoordinateLinearStop shoulder_flexion_l_limit_force: coordinate=shoulder_flexion_l stiffness=500 damping=0.1
        q_high=3.141593 q_low=-1.047198
    CoordinateLinearSpring shoulder_abduction_l_spring_force: coordinate=shoulder_abduction_l default_stiffness=1
        rest_length=0
    CoordinateLinearDamper shoulder_abduction_l_damping_force: coordinate=shoulder_abduction_l damping=1
    CoordinateLinearStop shoulder_abduction_l_limit_force: coordinate=shoulder_abduction_l stiffness=500 damping=0.1
        q_high=2.513274 q_low=-1.047198
    CoordinateLinearSpring shoulder_rotation_l_spring_force: coordinate=shoulder_rotation_l default_stiffness=1
        rest_length=0
    CoordinateLinearDamper shoulder_rotation_l_damping_force: coordinate=shoulder_rotation_l damping=1
    CoordinateLinearStop shoulder_rotation_l_limit_force: coordinate=shoulder_rotation_l stiffness=500 damping=0.1
        q_high=0.5235988 q_low=-0.5235988
    CoordinateLinearSpring elbow_flex_r_spring_force: coordinate=elbow_flex_r default_stiffness=0.001 rest_length=0
    CoordinateLinearDamper elbow_flex_r_damping_force: coordinate=elbow_flex_r damping=0.1
    CoordinateLinearStop elbow_flex_r_limit_force: coordinate=elbow_flex_r stiffness=500 damping=0.1 q_high=2.617994
        q_low=0
    CoordinateLinearSpring elbow_flex_l_spring_force: coordinate=elbow_flex_l default_stiffness=0.001 rest_length=0
    CoordinateLinearDamper elbow_flex_l_damping_force: coordinate=elbow_flex_l damping=0.1
    CoordinateLinearStop elbow_flex_l_limit_force: coordinate=elbow_flex_l stiffness=500 damping=0.1 q_high=2.617994
        q_low=0
    CoordinateLinearSpring pro_sup_r_spring_force: coordinate=pro_sup_r default_stiffness=5 rest_length=0
    CoordinateLinearDamper pro_sup_r_damping_force: coordinate=pro_sup_r damping=2
    CoordinateLinearStop pro_sup_r_limit_force: coordinate=pro_sup_r stiffness=500 damping=0.1 q_high=1.570796 q_low=0
    CoordinateLinearSpring pro_sup_l_spring_force: coordinate=pro_sup_l default_stiffness=5 rest_length=0
    CoordinateLinearDamper pro_sup_l_damping_force: coordinate=pro_sup_l damping=2
    CoordinateLinearStop pro_sup_l_limit_force: coordinate=pro_sup_l stiffness=500 damping=0.1 q_high=1.570796 q_low=0
    CoordinateLinearSpring wrist_flex_r_spring_force: coordinate=wrist_flex_r default_stiffness=5 rest_length=0
    CoordinateLinearDamper wrist_flex_r_damping_force: coordinate=wrist_flex_r damping=2
    CoordinateLinearStop wrist_flex_r_limit_force: coordinate=wrist_flex_r stiffness=500 damping=0.1 q_high=1.256637
        q_low=-1.256637
    CoordinateLinearSpring wrist_dev_r_spring_force: coordinate=wrist_dev_r default_stiffness=5 rest_length=0
    CoordinateLinearDamper wrist_dev_r_damping_force: coordinate=wrist_dev_r damping=2
    CoordinateLinearStop wrist_dev_r_limit_force: coordinate=wrist_dev_r stiffness=500 damping=0.1 q_high=0.6283185
        q_low=-0.448799
    CoordinateLinearSpring wrist_flex_l_spring_force: coordinate=wrist_flex_l default_stiffness=5 rest_length=0
    CoordinateLinearDamper wrist_flex_l_damping_force: coordinate=wrist_flex_l damping=2
    CoordinateLinearStop wrist_flex_l_limit_force: coordinate=wrist_flex_l stiffness=500 damping=0.1 q_high=1.256637
        q_low=-1.256637
    CoordinateLinearSpring wrist_dev_l_spring_force: coordinate=wrist_dev_l default_stiffness=5 rest_length=0
    CoordinateLinearDamper wrist_dev_l_damping_force: coordinate=wrist_dev_l damping=2
    CoordinateLinearStop wrist_dev_l_limit_force: coordinate=wrist_dev_l stiffness=500 damping=0.1 q_high=0.6283185
        q_low=-0.448799
    ExponentialContactForce [values shared by the 26 below unless stated]: contact_plane_transform=(-1.570796 0 0 0 0 0)
    ExponentialContactForce iliocrestale_r_contact_force:
      Station: pelvis (-0.05 0.082 0.11)
    ExponentialContactForce iliocrestale_l_contact_force:
      Station: pelvis (-0.05 0.082 -0.11)
    ExponentialContactForce iliocrestale_midpoint_contact_force:
      Station: pelvis (-0.05 0.082 0)
    ExponentialContactForce ASIS_r_contact_force:
      Station: pelvis (-0.0015 0.0065 0.125)
    ExponentialContactForce ASIS_l_contact_force:
      Station: pelvis (-0.0015 0.0065 -0.125)
    ExponentialContactForce ASIS_midpoint_contact_force:
      Station: pelvis (-0.0015 0.0065 0)
    ExponentialContactForce mid_pelvis_contact_force:
      Station: pelvis (-0.05 0.0065 0)
    ExponentialContactForce PSIS_r_contact_force:
      Station: pelvis (-0.14 0.035 0.055)
    ExponentialContactForce PSIS_l_contact_force:
      Station: pelvis (-0.14 0.035 -0.055)
    ExponentialContactForce PSIS_midpoint_contact_force:
      Station: pelvis (-0.14 0.035 0)
    ExponentialContactForce acetabulum_r_contact_force:
      Station: pelvis (-0.072 -0.06 0.08)
    ExponentialContactForce acetabulum_l_contact_force:
      Station: pelvis (-0.072 -0.06 -0.08)
    ExponentialContactForce suprasternale_contact_force:
      Station: thorax (0 0 0)
    ExponentialContactForce glabella_contact_force:
      Station: head (0.09 0.07 0)
    ExponentialContactForce euryon_r_contact_force:
      Station: head (-0.0015 0.085 0.069)
    ExponentialContactForce euryon_l_contact_force:
      Station: head (-0.0015 0.085 -0.069)
    ExponentialContactForce opisthocranion_contact_force:
      Station: head (-0.075 0.05 0)
    ExponentialContactForce vertex_contact_force:
      Station: head (0 0.14 0)
    ExponentialContactForce acromion_r_contact_force:
      Station: scapula_r (0 0 0)
    ExponentialContactForce acromion_l_contact_force:
      Station: scapula_l (0 0 0)
    ExponentialContactForce olecranon_r_contact_force:
      Station: ulna_r (-0.03 -0.001 0)
    ExponentialContactForce olecranon_l_contact_force:
      Station: ulna_l (-0.03 -0.001 0)
    ExponentialContactForce radiale_r_contact_force:
      Station: radius_r (0 -0.004 0.006)
    ExponentialContactForce stylion_r_contact_force:
      Station: radius_r (0 -0.23 0.03)
    ExponentialContactForce radiale_l_contact_force:
      Station: radius_l (0 -0.004 -0.006)
    ExponentialContactForce stylion_l_contact_force:
      Station: radius_l (0 -0.23 -0.03)
