# OpenSim document version 40600
Model athlete_model:
  Ground
  BodySet:
    Body pelvis: mass=11.777 [kg] mass_center=(-0.0707 0 0) inertia=(0.1028 0.0871 0.0579 0 0 0)
        meshes=(pelvis_r.obj pelvis_l.obj sacrum.obj)
      Station iliocrestale_r: .. (-0.05 0.082 0.11)
      Station iliocrestale_l: .. (-0.05 0.082 -0.11)
      Station iliocrestale_midpoint: .. (-0.05 0.082 0)
      Station ASIS_r: .. (-0.0015 0.0065 0.125)
      Station ASIS_l: .. (-0.0015 0.0065 -0.125)
      Station ASIS_midpoint: .. (-0.0015 0.0065 0)
      Station mid_pelvis: .. (-0.05 0.0065 0)
      Station PSIS_r: .. (-0.14 0.035 0.055)
      Station PSIS_l: .. (-0.14 0.035 -0.055)
      Station PSIS_midpoint: .. (-0.14 0.035 0)
      Station acetabulum_r: .. (-0.072 -0.06 0.08)
      Station acetabulum_l: .. (-0.072 -0.06 -0.08)
      StationDefinedFrame pelvis_frame: socket_point_a=/bodyset/pelvis/mid_pelvis
          socket_point_b=/bodyset/pelvis/ASIS_midpoint socket_point_c=/bodyset/pelvis/iliocrestale_midpoint
          socket_origin_point=/bodyset/pelvis/mid_pelvis ab_axis=+x ab_x_ac_axis=+z
      StationDefinedFrame hip_r_parent_frame: socket_point_a=/bodyset/pelvis/mid_pelvis
          socket_point_b=/bodyset/pelvis/ASIS_midpoint socket_point_c=/bodyset/pelvis/iliocrestale_midpoint
          socket_origin_point=/bodyset/pelvis/acetabulum_r ab_axis=+x ab_x_ac_axis=+z
      StationDefinedFrame hip_l_parent_frame: socket_point_a=/bodyset/pelvis/mid_pelvis
          socket_point_b=/bodyset/pelvis/ASIS_midpoint socket_point_c=/bodyset/pelvis/iliocrestale_midpoint
          socket_origin_point=/bodyset/pelvis/acetabulum_l ab_axis=+x ab_x_ac_axis=+z
    Body lumbar_spine: mass=5 mass_center=(0 -0.0875 0) inertia=(0.02233073 0.01914062 0.02233073 0 0 0)
    Body thorax: mass=16.83 mass_center=(-0.0591 -0.1486 0) inertia=(1.29841 0.55245 1.29841 0 0 0) meshes=ribs.obj
      Station suprasternale: .. (0 0 0)
      ContactEllipsoid thorax_r_obstacle: location=(-0.022 -0.1467 0.07) orientation=(-0.17 -0.0384 0.212)
          radii=(0.0741 0.17 0.0705)
      ContactEllipsoid thorax_l_obstacle: location=(-0.022 -0.1467 -0.07) orientation=(0.17 0.0384 0.212)
          radii=(0.0741 0.17 0.0705)
    Body head: mass=5 mass_center=(0 0.0375 0) inertia=(0.01569 0.01455 0.0186 0 0 0) meshes=skull.obj
      Station glabella: .. (0.09 0.07 0)
      Station euryon_r: .. (-0.0015 0.085 0.069)
      Station euryon_l: .. (-0.0015 0.085 -0.069)
      Station opisthocranion: .. (-0.075 0.05 0)
      Station vertex: .. (0 0.14 0)
    Body clavicle_r: mass=0.1898 mass_center=(-0.0111 0.0064 0.0542) inertia=(0.00027 0.00027 4.9e-5 0 0 0)
        meshes=clavicle_r.obj
    Body clavicle_l: mass=0.1898 mass_center=(-0.0111 0.0064 -0.0542) inertia=(0.00027 0.00027 4.9e-5 0 0 0)
        meshes=clavicle_l.obj
    Body scapula_r: mass=0.7054 mass_center=(-0.04612 -0.0319 -0.04565) inertia=(0.001 0.001 0.001 0 0 0)
        meshes=scapula_r.obj
      Station acromion_r: .. (0 0 0)
      ContactEllipsoid teres_major_r_obstacle: location=(-0.0893 -0.1062 -0.0501) orientation=(-1.4854 -0.3354 -0.8754)
          radii=(0.0075 0.0075 0.075)
      ContactEllipsoid infraspinatus_r_obstacle: location=(-0.069 -0.059 -0.05) orientation=(1.87 -0.543 -2.355)
          radii=(0.0197 0.0197 0.085)
      ContactEllipsoid subscapularis_r_obstacle: location=(-0.0251 -0.039 -0.0284) orientation=(1 -1 1)
          radii=(0.0126 0.0126 0.075)
    Body scapula_l: mass=0.7054 mass_center=(-0.04612 -0.0319 0.04565) inertia=(0.001 0.001 0.001 0 0 0)
        meshes=scapula_l.obj
      Station acromion_l: .. (0 0 0)
      ContactEllipsoid teres_major_l_obstacle: location=(-0.0893 -0.1062 0.0501) orientation=(1.4854 0.3354 -0.8754)
          radii=(0.0075 0.0075 0.075)
      ContactEllipsoid infraspinatus_l_obstacle: location=(-0.069 -0.059 0.05) orientation=(-1.87 0.543 -2.355)
          radii=(0.0197 0.0197 0.085)
      ContactEllipsoid subscapularis_l_obstacle: location=(-0.0251 -0.039 0.0284) orientation=(-1 1 1)
          radii=(0.0126 0.0126 0.075)
    Body humerus_r: mass=2.0325 mass_center=(0 -0.1645 0) inertia=(0.011946 0.004121 0.01341 0 0 0)
        meshes=humerus_r.obj
      ContactSphere humeral_head_r_obstacle: location=(0.005 -0.003 -0.004) radius=0.02
    Body humerus_l: mass=2.0325 mass_center=(0 -0.1645 0) inertia=(0.011946 0.004121 0.01341 0 0 0)
        meshes=humerus_l.obj
      ContactSphere humeral_head_l_obstacle: location=(0.005 -0.003 0.004) radius=0.02
    Body ulna_r: mass=0.6075 mass_center=(0 -0.120525 0) inertia=(0.002962 0.000618 0.003213 0 0 0) meshes=ulna_r.obj
      Station olecranon_r: .. (-0.03 -0.001 0)
    Body ulna_l: mass=0.6075 mass_center=(0 -0.120525 0) inertia=(0.002962 0.000618 0.003213 0 0 0) meshes=ulna_l.obj
      Station olecranon_l: .. (-0.03 -0.001 0)
    Body radius_r: mass=0.6075 mass_center=(0 -0.120525 0) inertia=(0.002962 0.000618 0.003213 0 0 0)
        meshes=radius_r.obj
      Station radiale_r: .. (0 -0.004 0.006)
      Station stylion_r: .. (0 -0.23 0.03)
    Body radius_l: mass=0.6075 mass_center=(0 -0.120525 0) inertia=(0.002962 0.000618 0.003213 0 0 0)
        meshes=radius_l.obj
      Station radiale_l: .. (0 -0.004 -0.006)
      Station stylion_l: .. (0 -0.23 -0.03)
    Body hand_r: mass=0.4575 mass_center=(0 -0.068095 0) inertia=(0.000892 0.000547 0.00134 0 0 0)
        meshes=(pisiform_r.obj lunate_r.obj scaphoid_r.obj triquetrum_r.obj hamate_r.obj capitate_r.obj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)
    Body hand_l: mass=0.4575 mass_center=(0 -0.068095 0) inertia=(0.000892 0.000547 0.00134 0 0 0)
        meshes=(pisiform_l.obj lunate_l.obj scaphoid_l.obj triquetrum_l.obj hamate_l.obj capitate_l.obj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)
  JointSet:
    WeldJoint ground_pelvis: socket_parent_frame=ground_offset socket_child_frame=/bodyset/pelvis/pelvis_frame
      PhysicalOffsetFrame ground_offset: socket_parent=/ground translation=(0 1 0) [meters]
      SpatialTransform:
        TransformAxis rotation1: coordinates=pelvis_tilt axis=(0 0 1) LinearFunction(coefficients=1 0)
        TransformAxis rotation2: coordinates=pelvis_list axis=(1 0 0) LinearFunction(coefficients=1 0)
        TransformAxis rotation3: coordinates=pelvis_rotation axis=(0 1 0) LinearFunction(coefficients=1 0)
        TransformAxis translation1: coordinates=pelvis_tx axis=(1 0 0) LinearFunction(coefficients=1 0)
        TransformAxis translation2: coordinates=pelvis_ty axis=(0 1 0) LinearFunction(coefficients=1 0)
        TransformAxis translation3: coordinates=pelvis_tz axis=(0 0 1) LinearFunction(coefficients=1 0)
    CantileverFreeBeamJoint lumbar: socket_parent_frame=lumbar_spine_parent_frame
        socket_child_frame=lumbar_spine_child_frame beam_length=0.175
      Coordinate lumbar_bending: default_value=0 range=(-0.5235988 0.5235988) clamped=true
      Coordinate lumbar_extension: default_value=-0.6414085 range=(-1.182461 0.4930555) clamped=true
      Coordinate lumbar_rotation: default_value=0 range=(-0.2617994 0.2617994) clamped=true
      PhysicalOffsetFrame lumbar_spine_parent_frame: socket_parent=/bodyset/pelvis translation=(-0.09 0.075 0)
          orientation=(-1.570796 0.25 0) [radians]
      PhysicalOffsetFrame lumbar_spine_child_frame: socket_parent=/bodyset/lumbar_spine translation=(0 0 0)
          orientation=(-1.570796 0 0)
    CantileverFreeBeamJoint thorax: socket_parent_frame=thoracic_spine_parent_frame
        socket_child_frame=thoracic_spine_child_frame beam_length=0.275
      Coordinate thorax_bending: default_value=0 range=(-0.5235988 0.5235988) clamped=true
      Coordinate thorax_extension: default_value=0.6326819 range=(0.2487094 1.086467) clamped=true
      Coordinate thorax_rotation: default_value=0 range=(-0.8203047 0.8203047) clamped=true
      PhysicalOffsetFrame thoracic_spine_parent_frame: socket_parent=/bodyset/lumbar_spine translation=(0 0 0)
          orientation=(-1.570796 0 0)
      PhysicalOffsetFrame thoracic_spine_child_frame: socket_parent=/bodyset/thorax translation=(-0.0275 0.057 0)
          orientation=(-1.570796 0.25 0)
    CantileverFreeBeamJoint cervical: socket_parent_frame=cervical_spine_parent_frame
        socket_child_frame=cervical_spine_child_frame beam_length=0.075
      Coordinate cervical_bending: default_value=0 range=(-0.8552113 0.8552113) clamped=true
      Coordinate cervical_extension: default_value=-0.2487094 range=(-1.348267 0.8683013) clamped=true
      Coordinate cervical_rotation: default_value=0 range=(-1.48353 1.48353) clamped=true
      PhysicalOffsetFrame cervical_spine_parent_frame: socket_parent=/bodyset/thorax translation=(-0.0275 0.057 0)
          orientation=(-1.570796 0.25 0)
      PhysicalOffsetFrame cervical_spine_child_frame: socket_parent=/bodyset/head translation=(0 0 0)
          orientation=(-1.570796 0 0)
    WeldJoint sternoclavicular_r: socket_parent_frame=sternoclavicular_r_parent_frame
        socket_child_frame=sternoclavicular_r_child_frame
      PhysicalOffsetFrame sternoclavicular_r_parent_frame: socket_parent=/bodyset/thorax
          translation=(0.00632 0.00693 0.0255)
      PhysicalOffsetFrame sternoclavicular_r_child_frame: socket_parent=/bodyset/clavicle_r translation=(0 0 0)
    WeldJoint sternoclavicular_l: socket_parent_frame=sternoclavicular_l_parent_frame
        socket_child_frame=sternoclavicular_l_child_frame
      PhysicalOffsetFrame sternoclavicular_l_parent_frame: socket_parent=/bodyset/thorax
          translation=(0.00632 0.00693 -0.0255)
      PhysicalOffsetFrame sternoclavicular_l_child_frame: socket_parent=/bodyset/clavicle_l translation=(0 0 0)
    EllipsoidJoint scapulothoracic_r: socket_parent_frame=scapulothoracic_r_parent_frame
        socket_child_frame=scapulothoracic_r_child_frame radii_x_y_z=(0.2 0.083 0.083)
      Coordinate scapula_abduction_r: default_value=0 range=(-0.5235988 0.5235988) clamped=true
      Coordinate scapula_elevation_r: default_value=0 range=(-0.1745329 0.1745329) clamped=true
      Coordinate scapula_rotation_r: default_value=0 range=(-1 1) clamped=true
      PhysicalOffsetFrame scapulothoracic_r_parent_frame: socket_parent=/bodyset/thorax
          translation=(-0.0294 -0.0173 0.0703) orientation=(0 -0.87 1.570796)
      PhysicalOffsetFrame scapulothoracic_r_child_frame: socket_parent=/bodyset/scapula_r
          translation=(-0.05982 -0.03904 -0.056) orientation=(-0.5181 -1.14159 1.285396)
    EllipsoidJoint scapulothoracic_l: socket_parent_frame=scapulothoracic_l_parent_frame
        socket_child_frame=scapulothoracic_l_child_frame radii_x_y_z=(-0.2 -0.083 -0.083)
      Coordinate scapula_abduction_l: default_value=0 range=(-0.5235988 0.5235988) clamped=true
      Coordinate scapula_elevation_l: default_value=0 range=(-0.1745329 0.1745329) clamped=true
      Coordinate scapula_rotation_l: default_value=0 range=(-1 1) clamped=true
      PhysicalOffsetFrame scapulothoracic_l_parent_frame: socket_parent=/bodyset/thorax
          translation=(-0.0294 -0.0173 -0.0703) orientation=(0 0.87 -1.570796)
      PhysicalOffsetFrame scapulothoracic_l_child_frame: socket_parent=/bodyset/scapula_l
          translation=(-0.05982 -0.03904 0.056) orientation=(0.5181 1.14159 -1.856196)
    BallJoint glenohumeral_r: socket_parent_frame=glenohumeral_r_parent_frame socket_child_frame=/bodyset/humerus_r
      Coordinate shoulder_r_rot_x: default_value=0 range=(-1.047198 3.141593) clamped=true
      Coordinate shoulder_r_rot_y: default_value=0 range=(-1.047198 2.513274) clamped=true
      Coordinate shoulder_r_rot_z: default_value=0 range=(-0.5235988 0.5235988) clamped=true
      PhysicalOffsetFrame glenohumeral_r_parent_frame: socket_parent=/bodyset/scapula_r
          translation=(-0.00955 -0.034 0.009) orientation=(-0.25 0 -0.125)
    BallJoint glenohumeral_l: socket_parent_frame=glenohumeral_l_parent_frame socket_child_frame=/bodyset/humerus_l
      Coordinate shoulder_l_rot_x: default_value=0 range=(-1.047198 3.141593) clamped=true
      Coordinate shoulder_l_rot_y: default_value=0 range=(-1.047198 2.513274) clamped=true
      Coordinate shoulder_l_rot_z: default_value=0 range=(-0.5235988 0.5235988) clamped=true
      PhysicalOffsetFrame glenohumeral_l_parent_frame: socket_parent=/bodyset/scapula_l
          translation=(-0.00955 -0.034 -0.009) orientation=(0.25 0 -0.125)
    PinJoint elbow_r: socket_parent_frame=elbow_r_parent_frame socket_child_frame=elbow_r_child_frame
      Coordinate elbow_flex_r: default_value=0 range=(0 2.617994) clamped=true
      PhysicalOffsetFrame elbow_r_parent_frame: socket_parent=/bodyset/humerus_r
          translation=(0.013144 -0.286273 -0.009595) orientation=(-0.0228627 0.228018 0.0051689)
      PhysicalOffsetFrame elbow_r_child_frame: socket_parent=/bodyset/ulna_r translation=(0 0 0)
          orientation=(-0.0228627 0.228018 0.0051689)
    PinJoint elbow_l: socket_parent_frame=elbow_l_parent_frame socket_child_frame=elbow_l_child_frame
      Coordinate elbow_flex_l: default_value=0 range=(0 2.617994) clamped=true
      PhysicalOffsetFrame elbow_l_parent_frame: socket_parent=/bodyset/humerus_l
          translation=(0.013144 -0.286273 0.009595) orientation=(0.0228627 -0.228018 0.0051689)
      PhysicalOffsetFrame elbow_l_child_frame: socket_parent=/bodyset/ulna_l translation=(0 0 0)
          orientation=(0.0228627 -0.228018 0.0051689)
    PinJoint radioulnar_r: socket_parent_frame=radioulnar_r_parent_frame socket_child_frame=radioulnar_r_child_frame
      Coordinate pro_sup_r: default_value=0 range=(0 1.570796) clamped=true
      PhysicalOffsetFrame radioulnar_r_parent_frame: socket_parent=/bodyset/ulna_r
          translation=(-0.006727 -0.013007 0.026083) orientation=(-1.56884 0.056428 1.53614)
      PhysicalOffsetFrame radioulnar_r_child_frame: socket_parent=/bodyset/radius_r translation=(0 0 0)
          orientation=(-1.56884 0.056428 1.53614)
    PinJoint radioulnar_l: socket_parent_frame=radioulnar_l_parent_frame socket_child_frame=radioulnar_l_child_frame
      Coordinate pro_sup_l: default_value=0 range=(0 1.570796) clamped=true
      PhysicalOffsetFrame radioulnar_l_parent_frame: socket_parent=/bodyset/ulna_l
          translation=(-0.006727 -0.013007 -0.026083) orientation=(1.56884 -0.056428 1.53614)
      PhysicalOffsetFrame radioulnar_l_child_frame: socket_parent=/bodyset/radius_l translation=(0 0 0)
          orientation=(1.56884 -0.056428 1.53614)
    UniversalJoint radius_hand_r: socket_parent_frame=radius_hand_r_parent_frame
        socket_child_frame=radius_hand_r_child_frame
      Coordinate wrist_flex_r: default_value=0 range=(-1.256637 1.256637) clamped=true
      Coordinate wrist_dev_r: default_value=0 range=(-0.448799 0.6283185) clamped=true
      PhysicalOffsetFrame radius_hand_r_parent_frame: socket_parent=/bodyset/radius_r
          translation=(-0.008797 -0.235841 0.01361) orientation=(-1.5708 0 -1.5708)
      PhysicalOffsetFrame radius_hand_r_child_frame: socket_parent=/bodyset/hand_r translation=(0 0 0)
          orientation=(-1.5708 0 -1.5708)
    UniversalJoint radius_hand_l: socket_parent_frame=radius_hand_l_parent_frame
        socket_child_frame=radius_hand_l_child_frame
      Coordinate wrist_flex_l: default_value=0 range=(-1.256637 1.256637) clamped=true
      Coordinate wrist_dev_l: default_value=0 range=(-0.448799 0.6283185) clamped=true
      PhysicalOffsetFrame radius_hand_l_parent_frame: socket_parent=/bodyset/radius_l
          translation=(-0.008797 -0.235841 -0.01361) orientation=(1.5708 0 1.5708)
      PhysicalOffsetFrame radius_hand_l_child_frame: socket_parent=/bodyset/hand_l translation=(0 0 0)
          orientation=(1.5708 0 1.5708)
  ForceSet:
    SpringGeneralizedForce lumbar_bending_spring_force: coordinate=lumbar_bending stiffness=25 viscosity=5
    CoordinateLinearStop lumbar_bending_linear_stop: coordinate=lumbar_bending stiffness=500 [N-m/rad] damping=0.1
        q_high=0.5235988 [rad] q_low=-0.5235988 [rad]
    SpringGeneralizedForce lumbar_extension_spring_force: coordinate=lumbar_extension stiffness=25 viscosity=5
    CoordinateLinearStop lumbar_extension_linear_stop: coordinate=lumbar_extension stiffness=500 damping=0.1
        q_high=0.4930555 q_low=-1.182461
    SpringGeneralizedForce lumbar_rotation_spring_force: coordinate=lumbar_rotation stiffness=25 viscosity=5
    CoordinateLinearStop lumbar_rotation_linear_stop: coordinate=lumbar_rotation stiffness=500 damping=0.1
        q_high=0.2617994 q_low=-0.2617994
    SpringGeneralizedForce thorax_bending_spring_force: coordinate=thorax_bending stiffness=25 viscosity=5
    CoordinateLinearStop thorax_bending_linear_stop: coordinate=thorax_bending stiffness=500 damping=0.1
        q_high=0.5235988 q_low=-0.5235988
    SpringGeneralizedForce thorax_extension_spring_force: coordinate=thorax_extension stiffness=25 viscosity=5
    CoordinateLinearStop thorax_extension_linear_stop: coordinate=thorax_extension stiffness=500 damping=0.1
        q_high=1.086467 q_low=0.2487094
    SpringGeneralizedForce thorax_rotation_spring_force: coordinate=thorax_rotation stiffness=25 viscosity=5
    CoordinateLinearStop thorax_rotation_linear_stop: coordinate=thorax_rotation stiffness=500 damping=0.1
        q_high=0.8203047 q_low=-0.8203047
    SpringGeneralizedForce cervical_bending_spring_force: coordinate=cervical_bending stiffness=25 viscosity=5
    CoordinateLinearStop cervical_bending_linear_stop: coordinate=cervical_bending stiffness=500 damping=0.1
        q_high=0.8552113 q_low=-0.8552113
    SpringGeneralizedForce cervical_extension_spring_force: coordinate=cervical_extension stiffness=25 viscosity=5
    CoordinateLinearStop cervical_extension_linear_stop: coordinate=cervical_extension stiffness=500 damping=0.1
        q_high=0.8683013 q_low=-1.348267
    SpringGeneralizedForce cervical_rotation_spring_force: coordinate=cervical_rotation stiffness=25 viscosity=5
    CoordinateLinearStop cervical_rotation_linear_stop: coordinate=cervical_rotation stiffness=500 damping=0.1
        q_high=1.48353 q_low=-1.48353
    SpringGeneralizedForce scapula_abduction_r_spring_force: coordinate=scapula_abduction_r stiffness=5 viscosity=1
    CoordinateLinearStop scapula_abduction_r_linear_stop: coordinate=scapula_abduction_r stiffness=500 damping=0.1
        q_high=0.5235988 q_low=-0.5235988
    SpringGeneralizedForce scapula_elevation_r_spring_force: coordinate=scapula_elevation_r stiffness=5 viscosity=1
    CoordinateLinearStop scapula_elevation_r_linear_stop: coordinate=scapula_elevation_r stiffness=500 damping=0.1
        q_high=0.1745329 q_low=-0.1745329
    SpringGeneralizedForce scapula_rotation_r_spring_force: coordinate=scapula_rotation_r stiffness=5 viscosity=1
    CoordinateLinearStop scapula_rotation_r_linear_stop: coordinate=scapula_rotation_r stiffness=500 damping=0.1
        q_high=1 q_low=-1
    SpringGeneralizedForce scapula_abduction_l_spring_force: coordinate=scapula_abduction_l stiffness=5 viscosity=1
    CoordinateLinearStop scapula_abduction_l_linear_stop: coordinate=scapula_abduction_l stiffness=500 damping=0.1
        q_high=0.5235988 q_low=-0.5235988
    SpringGeneralizedForce scapula_elevation_l_spring_force: coordinate=scapula_elevation_l stiffness=5 viscosity=1
    CoordinateLinearStop scapula_elevation_l_linear_stop: coordinate=scapula_elevation_l stiffness=500 damping=0.1
        q_high=0.1745329 q_low=-0.1745329
    SpringGeneralizedForce scapula_rotation_l_spring_force: coordinate=scapula_rotation_l stiffness=5 viscosity=1
    CoordinateLinearStop scapula_rotation_l_linear_stop: coordinate=scapula_rotation_l stiffness=500 damping=0.1
        q_high=1 q_low=-1
    SpringGeneralizedForce shoulder_r_rot_x_spring_force: coordinate=shoulder_r_rot_x stiffness=1 viscosity=1
    SpringGeneralizedForce shoulder_r_rot_y_spring_force: coordinate=shoulder_r_rot_y stiffness=1 viscosity=1
    SpringGeneralizedForce shoulder_r_rot_z_spring_force: coordinate=shoulder_r_rot_z stiffness=1 viscosity=1
    SpringGeneralizedForce shoulder_l_rot_x_spring_force: coordinate=shoulder_l_rot_x stiffness=1 viscosity=1
    SpringGeneralizedForce shoulder_l_rot_y_spring_force: coordinate=shoulder_l_rot_y stiffness=1 viscosity=1
    SpringGeneralizedForce shoulder_l_rot_z_spring_force: coordinate=shoulder_l_rot_z stiffness=1 viscosity=1
    SpringGeneralizedForce elbow_flex_r_spring_force: coordinate=elbow_flex_r stiffness=0.001 viscosity=0.1
    CoordinateLinearStop elbow_flex_r_linear_stop: coordinate=elbow_flex_r stiffness=500 damping=0.1 q_high=2.617994
        q_low=0
    SpringGeneralizedForce elbow_flex_l_spring_force: coordinate=elbow_flex_l stiffness=0.001 viscosity=0.1
    CoordinateLinearStop elbow_flex_l_linear_stop: coordinate=elbow_flex_l stiffness=500 damping=0.1 q_high=2.617994
        q_low=0
    SpringGeneralizedForce pro_sup_r_spring_force: coordinate=pro_sup_r stiffness=5 viscosity=2
    CoordinateLinearStop pro_sup_r_linear_stop: coordinate=pro_sup_r stiffness=500 damping=0.1 q_high=1.570796 q_low=0
    SpringGeneralizedForce pro_sup_l_spring_force: coordinate=pro_sup_l stiffness=5 viscosity=2
    CoordinateLinearStop pro_sup_l_linear_stop: coordinate=pro_sup_l stiffness=500 damping=0.1 q_high=1.570796 q_low=0
    SpringGeneralizedForce wrist_flex_r_spring_force: coordinate=wrist_flex_r stiffness=5 viscosity=2
    CoordinateLinearStop wrist_flex_r_linear_stop: coordinate=wrist_flex_r stiffness=500 damping=0.1 q_high=1.256637
        q_low=-1.256637
    SpringGeneralizedForce wrist_dev_r_spring_force: coordinate=wrist_dev_r stiffness=5 viscosity=2
    CoordinateLinearStop wrist_dev_r_linear_stop: coordinate=wrist_dev_r stiffness=500 damping=0.1 q_high=0.6283185
        q_low=-0.448799
    SpringGeneralizedForce wrist_flex_l_spring_force: coordinate=wrist_flex_l stiffness=5 viscosity=2
    CoordinateLinearStop wrist_flex_l_linear_stop: coordinate=wrist_flex_l stiffness=500 damping=0.1 q_high=1.256637
        q_low=-1.256637
    SpringGeneralizedForce wrist_dev_l_spring_force: coordinate=wrist_dev_l stiffness=5 viscosity=2
    CoordinateLinearStop wrist_dev_l_linear_stop: coordinate=wrist_dev_l stiffness=500 damping=0.1 q_high=0.6283185
        q_low=-0.448799
    Millard2012EquilibriumMuscle [values shared by the 66 below unless stated]: min_control=0.01 max_control=1
        pennation_angle_at_optimal=0 [radians] ignore_tendon_compliance=true ignore_activation_dynamics=true
        fiber_damping=0.01
      ActiveForceLengthCurve: minimum_value=0
      ForceVelocityCurve: concentric_slope_at_vmax=0 concentric_slope_near_vmax=0.25 isometric_slope=5
          eccentric_slope_at_vmax=0 eccentric_slope_near_vmax=0.15 max_eccentric_velocity_force_multiplier=1.4
      FiberForceLengthCurve: strain_at_zero_force=0 strain_at_one_norm_force=0.7 stiffness_at_low_force=0.2
          stiffness_at_one_norm_force=2.857143 curviness=0.75
      TendonForceLengthCurve
    Millard2012EquilibriumMuscle trapezius_clav_r: max_isometric_force=201.6 optimal_fiber_length=0.1127
        tendon_slack_length=0.027
      Scholz2015GeometryPath path: algorithm=minimum_length
        path_elements:
          Scholz2015GeometryPathPoint path_point_0:
            PathPoint: head (-0.0372 -0.0108 0.00245)
          Scholz2015GeometryPathPoint path_point_1:
            PathPoint: clavicle_r (-0.0301 0.0249 0.091)
    Millard2012EquilibriumMuscle trapezius_sup_r: max_isometric_force=1043 optimal_fiber_length=0.1127
        tendon_slack_length=0.027
      Scholz2015GeometryPath path: algorithm=minimum_length
        path_elements:
          Scholz2015GeometryPathPoint path_point_0:
            PathPoint: thorax (-0.0748 0.045 -0.00363)
          Scholz2015GeometryPathObstacle obstacle_0: socket_contact_geometry=/bodyset/thorax/thorax_r_obstacle
              contact_hint=(0.003 0.165 0.065)
          Scholz2015GeometryPathPoint path_point_1:
            PathPoint: scapula_r (-0.0517 0.0069 -0.0244)
    Millard2012EquilibriumMuscle trapezius_med_r: max_isometric_force=470.4 optimal_fiber_length=0.0832
        tendon_slack_length=0.032
      Scholz2015GeometryPath path: algorithm=minimum_length
        path_elements:
          Scholz2015GeometryPathPoint path_point_0:
            PathPoint: thorax (-0.0845 -0.0003 -0.00177)
          Scholz2015GeometryPathObstacle obstacle_0: socket_contact_geometry=/bodyset/thorax/thorax_r_obstacle
              contact_hint=(-0.042 0.155 0.029)
          Scholz2015GeometryPathPoint path_point_1:
            PathPoint: scapula_r (-0.0582 -0.00196 -0.0363)
    Millard2012EquilibriumMuscle trapezius_inf_r: max_isometric_force=414.4 optimal_fiber_length=0.1264
        tendon_slack_length=0.035
      Scholz2015GeometryPath path: algorithm=minimum_length
        path_elements:
          Scholz2015GeometryPathPoint path_point_0:
            PathPoint: thorax (-0.1016 -0.1346 0.00115)
          Scholz2015GeometryPathObstacle obstacle_0: socket_contact_geometry=/bodyset/thorax/thorax_r_obstacle
              contact_hint=(-0.082 0.12 0.0195)
          Scholz2015GeometryPathPoint path_point_1:
            PathPoint: scapula_r (-0.0757 -0.00945 -0.0739)
    Millard2012EquilibriumMuscle serratus_sup_r: max_isometric_force=387.8 optimal_fiber_length=0.0945
        tendon_slack_length=0
      Scholz2015GeometryPath path: algorithm=minimum_length
        path_elements:
          Scholz2015GeometryPathPoint path_point_0:
            PathPoint: thorax (-0.0285 -0.0145 0.0993)
          Scholz2015GeometryPathObstacle obstacle_0: socket_contact_geometry=/bodyset/thorax/thorax_r_obstacle
              contact_hint=(0.0125 0.16 0.07)
          Scholz2015GeometryPathPoint path_point_1:
            PathPoint: scapula_r (-0.0485 0.009 -0.0846)
    Millard2012EquilibriumMuscle serratus_med_r: max_isometric_force=508 optimal_fiber_length=0.1538
        tendon_slack_length=0.012
      Scholz2015GeometryPath path: algorithm=minimum_length
        path_elements:
          Scholz2015GeometryPathPoint path_point_0:
            PathPoint: thorax (0.0167 -0.0763 0.1147)
          Scholz2015GeometryPathObstacle obstacle_0: socket_contact_geometry=/bodyset/thorax/thorax_r_obstacle
              contact_hint=(-0.032 0.089 0.077)
          Scholz2015GeometryPathPoint path_point_1:
            PathPoint: scapula_r (-0.1031 -0.0831 -0.0986)
    Millard2012EquilibriumMuscle serratus_inf_r: max_isometric_force=430 optimal_fiber_length=0.1587
        tendon_slack_length=0
      Scholz2015GeometryPath path: algorithm=minimum_length
        path_elements:
          Scholz2015GeometryPathPoint path_point_0:
            PathPoint: thorax (-0.00054 -0.1705 0.1482)
          Scholz2015GeometryPathObstacle obstacle_0: socket_contact_geometry=/bodyset/thorax/thorax_r_obstacle
              contact_hint=(-0.05 0.0155 0.085)
          Scholz2015GeometryPathPoint path_point_1:
            PathPoint: scapula_r (-0.1135 -0.1122 -0.0855)
    Millard2012EquilibriumMuscle rhomboideus_sup_r: max_isometric_force=200.2 optimal_fiber_length=0.0986
        tendon_slack_length=0.015
      Scholz2015GeometryPath path: algorithm=minimum_length
        path_elements:
          Scholz2015GeometryPathPoint path_point_0:
            PathPoint: thorax (-0.0733 0.0402 -0.00204)
          Scholz2015GeometryPathObstacle obstacle_0: socket_contact_geometry=/bodyset/thorax/thorax_r_obstacle
              contact_hint=(-0.062 0.2 0.0075)
          Scholz2015GeometryPathPoint path_point_1:
            PathPoint: scapula_r (-0.0827 -0.0229 -0.1017)
    Millard2012EquilibriumMuscle rhomboideus_inf_r: max_isometric_force=407.4 optimal_fiber_length=0.1152
        tendon_slack_length=0.028
      Scholz2015GeometryPath path: algorithm=minimum_length
        path_elements:
          Scholz2015GeometryPathPoint path_point_0:
            PathPoint: thorax (-0.0907 -0.00927 -0.00051)
          Scholz2015GeometryPathObstacle obstacle_0: socket_contact_geometry=/bodyset/thorax/thorax_r_obstacle
              contact_hint=(-0.085 0.135 -0.015)
          Scholz2015GeometryPathPoint path_point_1:
            PathPoint: scapula_r (-0.1063 -0.1067 -0.0927)
    Millard2012EquilibriumMuscle levator_scapulae_r: max_isometric_force=280 optimal_fiber_length=0.1578
        tendon_slack_length=0.019
      Scholz2015GeometryPath path: algorithm=minimum_length
        path_elements:
          Scholz2015GeometryPathPoint path_point_0:
            PathPoint: head (-0.00967 -0.0102 0.0311)
          Scholz2015GeometryPathObstacle obstacle_0: socket_contact_geometry=/bodyset/thorax/thorax_r_obstacle
              contact_hint=(-0.035 0.225 0.04)
          Scholz2015GeometryPathPoint path_point_1:
            PathPoint: scapula_r (-0.078 -0.0081 -0.1029)
    Millard2012EquilibriumMuscle coracobrachialis_r: max_isometric_force=648.2 optimal_fiber_length=0.0683
        tendon_slack_length=0.104
      Scholz2015GeometryPath path: algorithm=minimum_length
        path_elements:
          Scholz2015GeometryPathPoint path_point_0:
            PathPoint: scapula_r (0.0083 -0.0424 -0.0281)
          Scholz2015GeometryPathPoint path_point_1:
            PathPoint: humerus_r (-0.00231 -0.145 -0.00933)
    Millard2012EquilibriumMuscle deltoideus_ant_r: max_isometric_force=707.7 optimal_fiber_length=0.094
        tendon_slack_length=0.088 pennation_angle_at_optimal=0.08726646
      Scholz2015GeometryPath path: algorithm=minimum_length
        path_elements:
          Scholz2015GeometryPathPoint path_point_0:
            PathPoint: clavicle_r (-0.0228 0.0195 0.0841)
          Scholz2015GeometryPathPoint path_point_1:
            PathPoint: scapula_r (0.0196 -0.0066 0.0104)
          Scholz2015GeometryPathPoint path_point_2:
            PathPoint: humerus_r (0.00664 -0.1098 0.00115)
    Millard2012EquilibriumMuscle deltoideus_med_r: max_isometric_force=2597.8 optimal_fiber_length=0.0748
        tendon_slack_length=0.064 pennation_angle_at_optimal=0.08726646
      Scholz2015GeometryPath path: algorithm=minimum_length
        path_elements:
          Scholz2015GeometryPathPoint path_point_0:
            PathPoint: scapula_r (-0.016 0.00203 0.0078)
          Scholz2015GeometryPathPoint path_point_1:
            PathPoint: scapula_r (-0.0051 -0.0067 0.031)
          Scholz2015GeometryPathPoint path_point_2:
            PathPoint: humerus_r (-0.0043 -0.1005 0.00385)
    Millard2012EquilibriumMuscle deltoideus_post_r: max_isometric_force=1324.4 optimal_fiber_length=0.0949
        tendon_slack_length=0.076 pennation_angle_at_optimal=0.08726646
      Scholz2015GeometryPath path: algorithm=minimum_length
        path_elements:
          Scholz2015GeometryPathPoint path_point_0:
            PathPoint: scapula_r (-0.0577 -0.0069 -0.0272)
          Scholz2015GeometryPathPoint path_point_1:
            PathPoint: scapula_r (-0.055 -0.0324 0.00735)
          Scholz2015GeometryPathPoint path_point_2:
            PathPoint: humerus_r (-0.0048 -0.0862 0.00624)
    Millard2012EquilibriumMuscle latissimus_sup_r: max_isometric_force=201.6 optimal_fiber_length=0.2109
        tendon_slack_length=0.081
      Scholz2015GeometryPath path: algorithm=minimum_length
        path_elements:
          Scholz2015GeometryPathPoint path_point_0:
            PathPoint: thorax (-0.10088 -0.1166 0.00171)
          Scholz2015GeometryPathPoint path_point_1:
            PathPoint: thorax (-0.1155 -0.1164 0.0288)
          Scholz2015GeometryPathPoint path_point_2:
            PathPoint: thorax (-0.1227 -0.0995 0.1024)
          Scholz2015GeometryPathObstacle obstacle_0: socket_contact_geometry=/bodyset/thorax/thorax_r_obstacle
              contact_hint=(-0.015 0.075 0.115)
          Scholz2015GeometryPathPoint path_point_3:
            PathPoint: humerus_r (0.0059 -0.019 -0.00345)
    Millard2012EquilibriumMuscle latissimus_med_r: max_isometric_force=315 optimal_fiber_length=0.2656
        tendon_slack_length=0.0945
      Scholz2015GeometryPath path: algorithm=minimum_length
        path_elements:
          Scholz2015GeometryPathPoint path_point_0:
            PathPoint: thorax (-0.0908 -0.2175 -0.00156)
          Scholz2015GeometryPathPoint path_point_1:
            PathPoint: thorax (-0.1077 -0.2054 0.0262)
          Scholz2015GeometryPathPoint path_point_2:
            PathPoint: thorax (-0.1037 -0.1478 0.1146)
          Scholz2015GeometryPathObstacle obstacle_0: socket_contact_geometry=/bodyset/thorax/thorax_r_obstacle
              contact_hint=(-0.013 0.045 0.105)
          Scholz2015GeometryPathPoint path_point_3:
            PathPoint: humerus_r (0.0058 -0.041 -0.001)
    Millard2012EquilibriumMuscle latissimus_inf_r: max_isometric_force=270.2 optimal_fiber_length=0.3062
        tendon_slack_length=0.0621
      Scholz2015GeometryPath path: algorithm=minimum_length
        path_elements:
          Scholz2015GeometryPathPoint path_point_0:
            PathPoint: thorax (-0.0627 -0.2548 0.0906)
          Scholz2015GeometryPathPoint path_point_1:
            PathPoint: thorax (-0.0672 -0.1862 0.1456)
          Scholz2015GeometryPathObstacle obstacle_0: socket_contact_geometry=/bodyset/thorax/thorax_r_obstacle
              contact_hint=(-0.016 0.012 0.103)
          Scholz2015GeometryPathPoint path_point_2:
            PathPoint: humerus_r (0.0042 -0.05 -0.00018)
    Millard2012EquilibriumMuscle pectoralis_major_sup_r: max_isometric_force=408.8 optimal_fiber_length=0.1091
        tendon_slack_length=0.014
      Scholz2015GeometryPath path: algorithm=minimum_length
        path_elements:
          Scholz2015GeometryPathPoint path_point_0:
            PathPoint: clavicle_r (0.0046 0.0068 0.0474)
          Scholz2015GeometryPathObstacle obstacle_0: socket_contact_geometry=/bodyset/thorax/thorax_r_obstacle
              contact_hint=(0.065 0.107 0.074)
          Scholz2015GeometryPathPoint path_point_1:
            PathPoint: humerus_r (0.0101 -0.0421 -0.0026)
    Millard2012EquilibriumMuscle pectoralis_major_med_r: max_isometric_force=683.2 optimal_fiber_length=0.15
        tendon_slack_length=0.026
      Scholz2015GeometryPath path: algorithm=minimum_length
        path_elements:
          Scholz2015GeometryPathPoint path_point_0:
            PathPoint: thorax (0.0195 -0.038 0.013)
          Scholz2015GeometryPathObstacle obstacle_0: socket_contact_geometry=/bodyset/thorax/thorax_r_obstacle
              contact_hint=(0.08 0.1 0.037)
          Scholz2015GeometryPathPoint path_point_1:
            PathPoint: humerus_r (0.0102 -0.0262 -0.0032)
    Millard2012EquilibriumMuscle pectoralis_major_inf_r: max_isometric_force=571.2 optimal_fiber_length=0.183
        tendon_slack_length=0.043
      Scholz2015GeometryPath path: algorithm=minimum_length
        path_elements:
          Scholz2015GeometryPathPoint path_point_0:
            PathPoint: thorax (0.0532 -0.1157 0.0247)
          Scholz2015GeometryPathObstacle obstacle_0: socket_contact_geometry=/bodyset/thorax/thorax_r_obstacle
              contact_hint=(0.082 0.05 0.039)
          Scholz2015GeometryPathPoint path_point_1:
            PathPoint: humerus_r (0.01 -0.03 0)
    Millard2012EquilibriumMuscle pectoralis_minor_r: max_isometric_force=429.8 optimal_fiber_length=0.1183
        tendon_slack_length=0.032
      Scholz2015GeometryPath path: algorithm=minimum_length
        path_elements:
          Scholz2015GeometryPathPoint path_point_0:
            PathPoint: thorax (0.0477 -0.104 0.0912)
          Scholz2015GeometryPathObstacle obstacle_0: socket_contact_geometry=/bodyset/thorax/thorax_r_obstacle
              contact_hint=(0.072 0.076 0.059)
          Scholz2015GeometryPathPoint path_point_1:
            PathPoint: scapula_r (0.0109 -0.035 -0.0229)
    Millard2012EquilibriumMuscle teres_major_r: max_isometric_force=851.2 optimal_fiber_length=0.141
        tendon_slack_length=0.006
      Scholz2015GeometryPath path: algorithm=minimum_length
        path_elements:
          Scholz2015GeometryPathPoint path_point_0:
            PathPoint: scapula_r (-0.1044 -0.1174 -0.0721)
          Scholz2015GeometryPathObstacle obstacle_0: socket_contact_geometry=/bodyset/scapula_r/teres_major_r_obstacle
              contact_hint=(0.001 -0.025 0.021)
          Scholz2015GeometryPathObstacle obstacle_1: socket_contact_geometry=/bodyset/thorax/thorax_r_obstacle
              contact_hint=(-0.041 0.07 0.114)
          Scholz2015GeometryPathPoint path_point_1:
            PathPoint: humerus_r (0.0043 -0.039 -0.0017)
    Millard2012EquilibriumMuscle teres_minor_r: max_isometric_force=695.8 optimal_fiber_length=0.055
        tendon_slack_length=0.051
      Scholz2015GeometryPath path: algorithm=minimum_length
        path_elements:
          Scholz2015GeometryPathPoint path_point_0:
            PathPoint: scapula_r (-0.0844 -0.0661 -0.0423)
          Scholz2015GeometryPathObstacle obstacle_0: socket_contact_geometry=/bodyset/humerus_r/humeral_head_r_obstacle
              contact_hint=(-0.06 -0.017 -0.012)
          Scholz2015GeometryPathPoint path_point_1:
            PathPoint: humerus_r (-0.0159 -0.0094 0.0109)
    Millard2012EquilibriumMuscle infraspinatus_inf_r: max_isometric_force=1037.4 optimal_fiber_length=0.0677
        tendon_slack_length=0.084
      Scholz2015GeometryPath path: algorithm=minimum_length
        path_elements:
          Scholz2015GeometryPathPoint path_point_0:
            PathPoint: scapula_r (-0.0991 -0.0809 -0.0813)
          Scholz2015GeometryPathObstacle obstacle_0: socket_contact_geometry=/bodyset/scapula_r/infraspinatus_r_obstacle
              contact_hint=(0.015 -0.031 0.007)
          Scholz2015GeometryPathObstacle obstacle_1: socket_contact_geometry=/bodyset/humerus_r/humeral_head_r_obstacle
              contact_hint=(-0.039 -0.008 0.023)
          Scholz2015GeometryPathPoint path_point_1:
            PathPoint: humerus_r (-0.0172 -0.0057 0.0248)
    Millard2012EquilibriumMuscle infraspinatus_sup_r: max_isometric_force=967.4 optimal_fiber_length=0.0698
        tendon_slack_length=0.05
      Scholz2015GeometryPath path: algorithm=minimum_length
        path_elements:
          Scholz2015GeometryPathPoint path_point_0:
            PathPoint: scapula_r (-0.0834 -0.0323 -0.0869)
          Scholz2015GeometryPathObstacle obstacle_0: socket_contact_geometry=/bodyset/scapula_r/infraspinatus_r_obstacle
              contact_hint=(0.018 -0.033 -0.037)
          Scholz2015GeometryPathObstacle obstacle_1: socket_contact_geometry=/bodyset/humerus_r/humeral_head_r_obstacle
              contact_hint=(-0.039 0.008 0.023)
          Scholz2015GeometryPathPoint path_point_1:
            PathPoint: humerus_r (-0.0143 0.0027 0.0222)
    Millard2012EquilibriumMuscle subscapularis_sup_r: max_isometric_force=540.4 optimal_fiber_length=0.0676
        tendon_slack_length=0.059 pennation_angle_at_optimal=0.08726646
      Scholz2015GeometryPath path: algorithm=minimum_length
        path_elements:
          Scholz2015GeometryPathPoint path_point_0:
            PathPoint: scapula_r (-0.0788 -0.0313 -0.0903)
          Scholz2015GeometryPathObstacle obstacle_0: socket_contact_geometry=/bodyset/scapula_r/subscapularis_r_obstacle
              contact_hint=(-0.004 -0.028 -0.008)
          Scholz2015GeometryPathObstacle obstacle_1: socket_contact_geometry=/bodyset/humerus_r/humeral_head_r_obstacle
              contact_hint=(0.02 -0.006 -0.038)
          Scholz2015GeometryPathPoint path_point_1:
            PathPoint: humerus_r (0.0225 0 -0.018)
    Millard2012EquilibriumMuscle subscapularis_med_r: max_isometric_force=609 optimal_fiber_length=0.0744
        tendon_slack_length=0.055 pennation_angle_at_optimal=0.08726646
      Scholz2015GeometryPath path: algorithm=minimum_length
        path_elements:
          Scholz2015GeometryPathPoint path_point_0:
            PathPoint: scapula_r (-0.0836 -0.0549 -0.0747)
          Scholz2015GeometryPathObstacle obstacle_0: socket_contact_geometry=/bodyset/scapula_r/subscapularis_r_obstacle
              contact_hint=(-0.004 -0.028 -0.008)
          Scholz2015GeometryPathObstacle obstacle_1: socket_contact_geometry=/bodyset/humerus_r/humeral_head_r_obstacle
              contact_hint=(0.02 -0.006 -0.038)
          Scholz2015GeometryPathPoint path_point_1:
            PathPoint: humerus_r (0.0225 0 -0.018)
    Millard2012EquilibriumMuscle subscapularis_inf_r: max_isometric_force=854 optimal_fiber_length=0.0721
        tendon_slack_length=0.059
      Scholz2015GeometryPath path: algorithm=minimum_length
        path_elements:
          Scholz2015GeometryPathPoint path_point_0:
            PathPoint: scapula_r (-0.0951 -0.0977 -0.0854)
          Scholz2015GeometryPathObstacle obstacle_0: socket_contact_geometry=/bodyset/scapula_r/subscapularis_r_obstacle
              contact_hint=(-0.004 -0.028 -0.008)
          Scholz2015GeometryPathObstacle obstacle_1: socket_contact_geometry=/bodyset/humerus_r/humeral_head_r_obstacle
              contact_hint=(0.02 -0.006 -0.038)
          Scholz2015GeometryPathPoint path_point_1:
            PathPoint: humerus_r (0.0225 0 -0.018)
    Millard2012EquilibriumMuscle supraspinatus_post_r: max_isometric_force=326.2 optimal_fiber_length=0.0591
        tendon_slack_length=0.025
      Scholz2015GeometryPath path: algorithm=minimum_length
        path_elements:
          Scholz2015GeometryPathPoint path_point_0:
            PathPoint: scapula_r (-0.0605 -0.0014 -0.0495)
          Scholz2015GeometryPathObstacle obstacle_0: socket_contact_geometry=/bodyset/humerus_r/humeral_head_r_obstacle
              contact_hint=(-0.027 0.048 -0.011)
          Scholz2015GeometryPathPoint path_point_1:
            PathPoint: humerus_r (0.0102 0.0096 0.0201)
    Millard2012EquilibriumMuscle supraspinatus_ant_r: max_isometric_force=543.2 optimal_fiber_length=0.0554
        tendon_slack_length=0.031
      Scholz2015GeometryPath path: algorithm=minimum_length
        path_elements:
          Scholz2015GeometryPathPoint path_point_0:
            PathPoint: scapula_r (-0.049 0.0014 -0.0692)
          Scholz2015GeometryPathObstacle obstacle_0: socket_contact_geometry=/bodyset/humerus_r/humeral_head_r_obstacle
              contact_hint=(-0.025 0.054 -0.028)
          Scholz2015GeometryPathPoint path_point_1:
            PathPoint: humerus_r (0.0178 0.0176 0.0096)
    Millard2012EquilibriumMuscle triceps_long_r: max_isometric_force=1580.6 optimal_fiber_length=0.0969
        tendon_slack_length=0.2412 pennation_angle_at_optimal=0.174533
      Scholz2015GeometryPath path: algorithm=minimum_length
        path_elements:
          Scholz2015GeometryPathPoint path_point_0:
            PathPoint: scapula_r (-0.0421 -0.0519 -0.0129)
          Scholz2015GeometryPathPoint path_point_1:
            PathPoint: ulna_r (-0.0195 -0.0291 0.0087)
    Millard2012EquilibriumMuscle biceps_long_r: max_isometric_force=485.8 optimal_fiber_length=0.1421
        tendon_slack_length=0.2568
      Scholz2015GeometryPath path: algorithm=minimum_length
        path_elements:
          Scholz2015GeometryPathPoint path_point_0:
            PathPoint: scapula_r (-0.0226 -0.0163 -0.0181)
          Scholz2015GeometryPathPoint path_point_1:
            PathPoint: humerus_r (0.0118 0.0281 0.02)
          Scholz2015GeometryPathObstacle obstacle_0: socket_contact_geometry=/bodyset/humerus_r/humeral_head_r_obstacle
              contact_hint=(0.016 -0.006 0.04)
          Scholz2015GeometryPathPoint path_point_2:
            PathPoint: radius_r (-0.0009 -0.044 -0.0095)
    Millard2012EquilibriumMuscle biceps_brevis_r: max_isometric_force=693 optimal_fiber_length=0.1264
        tendon_slack_length=0.212
      Scholz2015GeometryPath path: algorithm=minimum_length
        path_elements:
          Scholz2015GeometryPathPoint path_point_0:
            PathPoint: scapula_r (0.0095 -0.0382 -0.0242)
          Scholz2015GeometryPathPoint path_point_1:
            PathPoint: humerus_r (-0.0002 -0.0443 -0.0099)
    Millard2012EquilibriumMuscle trapezius_clav_l: max_isometric_force=201.6 optimal_fiber_length=0.1127
        tendon_slack_length=0.027
      Scholz2015GeometryPath path: algorithm=minimum_length
        path_elements:
          Scholz2015GeometryPathPoint path_point_0:
            PathPoint: head (-0.0372 -0.0108 -0.00245)
          Scholz2015GeometryPathPoint path_point_1:
            PathPoint: clavicle_l (-0.0301 0.0249 -0.091)
    Millard2012EquilibriumMuscle trapezius_sup_l: max_isometric_force=1043 optimal_fiber_length=0.1127
        tendon_slack_length=0.027
      Scholz2015GeometryPath path: algorithm=minimum_length
        path_elements:
          Scholz2015GeometryPathPoint path_point_0:
            PathPoint: thorax (-0.0748 0.045 -0.00363)
          Scholz2015GeometryPathObstacle obstacle_0: socket_contact_geometry=/bodyset/thorax/thorax_l_obstacle
              contact_hint=(0.003 0.165 -0.065)
          Scholz2015GeometryPathPoint path_point_1:
            PathPoint: scapula_l (-0.0517 0.0069 0.0244)
    Millard2012EquilibriumMuscle trapezius_med_l: max_isometric_force=470.4 optimal_fiber_length=0.0832
        tendon_slack_length=0.032
      Scholz2015GeometryPath path: algorithm=minimum_length
        path_elements:
          Scholz2015GeometryPathPoint path_point_0:
            PathPoint: thorax (-0.0845 -0.0003 0.00177)
          Scholz2015GeometryPathObstacle obstacle_0: socket_contact_geometry=/bodyset/thorax/thorax_l_obstacle
              contact_hint=(-0.042 0.155 -0.029)
          Scholz2015GeometryPathPoint path_point_1:
            PathPoint: scapula_l (-0.0582 -0.00196 0.0363)
    Millard2012EquilibriumMuscle trapezius_inf_l: max_isometric_force=414.4 optimal_fiber_length=0.1264
        tendon_slack_length=0.035
      Scholz2015GeometryPath path: algorithm=minimum_length
        path_elements:
          Scholz2015GeometryPathPoint path_point_0:
            PathPoint: thorax (-0.1016 -0.1346 -0.00115)
          Scholz2015GeometryPathObstacle obstacle_0: socket_contact_geometry=/bodyset/thorax/thorax_l_obstacle
              contact_hint=(-0.082 0.12 -0.0195)
          Scholz2015GeometryPathPoint path_point_1:
            PathPoint: scapula_l (-0.0757 -0.00945 0.0739)
    Millard2012EquilibriumMuscle serratus_sup_l: max_isometric_force=387.8 optimal_fiber_length=0.0945
        tendon_slack_length=0
      Scholz2015GeometryPath path: algorithm=minimum_length
        path_elements:
          Scholz2015GeometryPathPoint path_point_0:
            PathPoint: thorax (-0.0285 -0.0145 -0.0993)
          Scholz2015GeometryPathObstacle obstacle_0: socket_contact_geometry=/bodyset/thorax/thorax_l_obstacle
              contact_hint=(0.0125 0.16 -0.07)
          Scholz2015GeometryPathPoint path_point_1:
            PathPoint: scapula_l (-0.0485 0.009 0.0846)
    Millard2012EquilibriumMuscle serratus_med_l: max_isometric_force=508 optimal_fiber_length=0.1538
        tendon_slack_length=0.012
      Scholz2015GeometryPath path: algorithm=minimum_length
        path_elements:
          Scholz2015GeometryPathPoint path_point_0:
            PathPoint: thorax (0.0167 -0.0763 -0.1147)
          Scholz2015GeometryPathObstacle obstacle_0: socket_contact_geometry=/bodyset/thorax/thorax_l_obstacle
              contact_hint=(-0.032 0.089 -0.077)
          Scholz2015GeometryPathPoint path_point_1:
            PathPoint: scapula_l (-0.1031 -0.0831 0.0986)
    Millard2012EquilibriumMuscle serratus_inf_l: max_isometric_force=430 optimal_fiber_length=0.1587
        tendon_slack_length=0
      Scholz2015GeometryPath path: algorithm=minimum_length
        path_elements:
          Scholz2015GeometryPathPoint path_point_0:
            PathPoint: thorax (-0.00054 -0.1705 -0.1482)
          Scholz2015GeometryPathObstacle obstacle_0: socket_contact_geometry=/bodyset/thorax/thorax_l_obstacle
              contact_hint=(-0.05 0.0155 -0.085)
          Scholz2015GeometryPathPoint path_point_1:
            PathPoint: scapula_l (-0.1135 -0.1122 0.0855)
    Millard2012EquilibriumMuscle rhomboideus_sup_l: max_isometric_force=200.2 optimal_fiber_length=0.0986
        tendon_slack_length=0.015
      Scholz2015GeometryPath path: algorithm=minimum_length
        path_elements:
          Scholz2015GeometryPathPoint path_point_0:
            PathPoint: thorax (-0.0733 0.0402 0.00204)
          Scholz2015GeometryPathObstacle obstacle_0: socket_contact_geometry=/bodyset/thorax/thorax_l_obstacle
              contact_hint=(-0.062 0.2 -0.0075)
          Scholz2015GeometryPathPoint path_point_1:
            PathPoint: scapula_l (-0.0827 -0.0229 0.1017)
    Millard2012EquilibriumMuscle rhomboideus_inf_l: max_isometric_force=407.4 optimal_fiber_length=0.1152
        tendon_slack_length=0.028
      Scholz2015GeometryPath path: algorithm=minimum_length
        path_elements:
          Scholz2015GeometryPathPoint path_point_0:
            PathPoint: thorax (-0.0907 -0.00927 0.00051)
          Scholz2015GeometryPathObstacle obstacle_0: socket_contact_geometry=/bodyset/thorax/thorax_l_obstacle
              contact_hint=(-0.085 0.135 0.015)
          Scholz2015GeometryPathPoint path_point_1:
            PathPoint: scapula_l (-0.1063 -0.1067 0.0927)
    Millard2012EquilibriumMuscle levator_scapulae_l: max_isometric_force=280 optimal_fiber_length=0.1578
        tendon_slack_length=0.019
      Scholz2015GeometryPath path: algorithm=minimum_length
        path_elements:
          Scholz2015GeometryPathPoint path_point_0:
            PathPoint: head (-0.00967 -0.0102 -0.0311)
          Scholz2015GeometryPathObstacle obstacle_0: socket_contact_geometry=/bodyset/thorax/thorax_l_obstacle
              contact_hint=(-0.035 0.225 -0.04)
          Scholz2015GeometryPathPoint path_point_1:
            PathPoint: scapula_l (-0.078 -0.0081 0.1029)
    Millard2012EquilibriumMuscle coracobrachialis_l: max_isometric_force=648.2 optimal_fiber_length=0.0683
        tendon_slack_length=0.104
      Scholz2015GeometryPath path: algorithm=minimum_length
        path_elements:
          Scholz2015GeometryPathPoint path_point_0:
            PathPoint: scapula_l (0.0083 -0.0424 0.0281)
          Scholz2015GeometryPathPoint path_point_1:
            PathPoint: humerus_l (-0.00231 -0.145 0.00933)
    Millard2012EquilibriumMuscle deltoideus_ant_l: max_isometric_force=707.7 optimal_fiber_length=0.094
        tendon_slack_length=0.088 pennation_angle_at_optimal=0.08726646
      Scholz2015GeometryPath path: algorithm=minimum_length
        path_elements:
          Scholz2015GeometryPathPoint path_point_0:
            PathPoint: clavicle_l (-0.0228 0.0195 -0.0841)
          Scholz2015GeometryPathPoint path_point_1:
            PathPoint: scapula_l (0.0196 -0.0066 -0.0104)
          Scholz2015GeometryPathPoint path_point_2:
            PathPoint: humerus_l (0.00664 -0.1098 -0.00115)
    Millard2012EquilibriumMuscle deltoideus_med_l: max_isometric_force=2597.8 optimal_fiber_length=0.0748
        tendon_slack_length=0.064 pennation_angle_at_optimal=0.08726646
      Scholz2015GeometryPath path: algorithm=minimum_length
        path_elements:
          Scholz2015GeometryPathPoint path_point_0:
            PathPoint: scapula_l (-0.016 0.00203 -0.0078)
          Scholz2015GeometryPathPoint path_point_1:
            PathPoint: scapula_l (-0.0051 -0.0067 -0.031)
          Scholz2015GeometryPathPoint path_point_2:
            PathPoint: humerus_l (-0.0043 -0.1005 -0.00385)
    Millard2012EquilibriumMuscle deltoideus_post_l: max_isometric_force=1324.4 optimal_fiber_length=0.0949
        tendon_slack_length=0.076 pennation_angle_at_optimal=0.08726646
      Scholz2015GeometryPath path: algorithm=minimum_length
        path_elements:
          Scholz2015GeometryPathPoint path_point_0:
            PathPoint: scapula_l (-0.0577 -0.0069 0.0272)
          Scholz2015GeometryPathPoint path_point_1:
            PathPoint: scapula_l (-0.055 -0.0324 -0.00735)
          Scholz2015GeometryPathPoint path_point_2:
            PathPoint: humerus_l (-0.0048 -0.0862 -0.00624)
    Millard2012EquilibriumMuscle latissimus_sup_l: max_isometric_force=201.6 optimal_fiber_length=0.2109
        tendon_slack_length=0.081
      Scholz2015GeometryPath path: algorithm=minimum_length
        path_elements:
          Scholz2015GeometryPathPoint path_point_0:
            PathPoint: thorax (-0.10088 -0.1166 -0.00171)
          Scholz2015GeometryPathPoint path_point_1:
            PathPoint: thorax (-0.1155 -0.1164 -0.0288)
          Scholz2015GeometryPathPoint path_point_2:
            PathPoint: thorax (-0.1227 -0.0995 -0.1024)
          Scholz2015GeometryPathObstacle obstacle_0: socket_contact_geometry=/bodyset/thorax/thorax_l_obstacle
              contact_hint=(-0.015 0.075 -0.115)
          Scholz2015GeometryPathPoint path_point_3:
            PathPoint: humerus_l (0.0059 -0.019 0.00345)
    Millard2012EquilibriumMuscle latissimus_med_l: max_isometric_force=315 optimal_fiber_length=0.2656
        tendon_slack_length=0.0945
      Scholz2015GeometryPath path: algorithm=minimum_length
        path_elements:
          Scholz2015GeometryPathPoint path_point_0:
            PathPoint: thorax (-0.0908 -0.2175 0.00156)
          Scholz2015GeometryPathPoint path_point_1:
            PathPoint: thorax (-0.1077 -0.2054 -0.0262)
          Scholz2015GeometryPathPoint path_point_2:
            PathPoint: thorax (-0.1037 -0.1478 -0.1146)
          Scholz2015GeometryPathObstacle obstacle_0: socket_contact_geometry=/bodyset/thorax/thorax_l_obstacle
              contact_hint=(-0.013 0.045 -0.105)
          Scholz2015GeometryPathPoint path_point_3:
            PathPoint: humerus_l (0.0058 -0.041 0.001)
    Millard2012EquilibriumMuscle latissimus_inf_l: max_isometric_force=270.2 optimal_fiber_length=0.3062
        tendon_slack_length=0.0621
      Scholz2015GeometryPath path: algorithm=minimum_length
        path_elements:
          Scholz2015GeometryPathPoint path_point_0:
            PathPoint: thorax (-0.0627 -0.2548 -0.0906)
          Scholz2015GeometryPathPoint path_point_1:
            PathPoint: thorax (-0.0672 -0.1862 -0.1456)
          Scholz2015GeometryPathObstacle obstacle_0: socket_contact_geometry=/bodyset/thorax/thorax_l_obstacle
              contact_hint=(-0.016 0.012 -0.103)
          Scholz2015GeometryPathPoint path_point_2:
            PathPoint: humerus_l (0.0042 -0.05 0.00018)
    Millard2012EquilibriumMuscle pectoralis_major_sup_l: max_isometric_force=408.8 optimal_fiber_length=0.1091
        tendon_slack_length=0.014
      Scholz2015GeometryPath path: algorithm=minimum_length
        path_elements:
          Scholz2015GeometryPathPoint path_point_0:
            PathPoint: clavicle_l (0.0046 0.0068 -0.0474)
          Scholz2015GeometryPathObstacle obstacle_0: socket_contact_geometry=/bodyset/thorax/thorax_l_obstacle
              contact_hint=(0.065 0.107 -0.074)
          Scholz2015GeometryPathPoint path_point_1:
            PathPoint: humerus_l (0.0101 -0.0421 0.0026)
    Millard2012EquilibriumMuscle pectoralis_major_med_l: max_isometric_force=683.2 optimal_fiber_length=0.15
        tendon_slack_length=0.026
      Scholz2015GeometryPath path: algorithm=minimum_length
        path_elements:
          Scholz2015GeometryPathPoint path_point_0:
            PathPoint: thorax (0.0195 -0.038 -0.013)
          Scholz2015GeometryPathObstacle obstacle_0: socket_contact_geometry=/bodyset/thorax/thorax_l_obstacle
              contact_hint=(0.08 0.1 -0.037)
          Scholz2015GeometryPathPoint path_point_1:
            PathPoint: humerus_l (0.0102 -0.0262 0.0032)
    Millard2012EquilibriumMuscle pectoralis_major_inf_l: max_isometric_force=571.2 optimal_fiber_length=0.183
        tendon_slack_length=0.043
      Scholz2015GeometryPath path: algorithm=minimum_length
        path_elements:
          Scholz2015GeometryPathPoint path_point_0:
            PathPoint: thorax (0.0532 -0.1157 -0.0247)
          Scholz2015GeometryPathObstacle obstacle_0: socket_contact_geometry=/bodyset/thorax/thorax_l_obstacle
              contact_hint=(0.082 0.05 -0.039)
          Scholz2015GeometryPathPoint path_point_1:
            PathPoint: humerus_l (0.01 -0.03 0)
    Millard2012EquilibriumMuscle pectoralis_minor_l: max_isometric_force=429.8 optimal_fiber_length=0.1183
        tendon_slack_length=0.032
      Scholz2015GeometryPath path: algorithm=minimum_length
        path_elements:
          Scholz2015GeometryPathPoint path_point_0:
            PathPoint: thorax (0.0477 -0.104 -0.0912)
          Scholz2015GeometryPathObstacle obstacle_0: socket_contact_geometry=/bodyset/thorax/thorax_l_obstacle
              contact_hint=(0.072 0.076 -0.059)
          Scholz2015GeometryPathPoint path_point_1:
            PathPoint: scapula_l (0.0109 -0.035 0.0229)
    Millard2012EquilibriumMuscle teres_major_l: max_isometric_force=851.2 optimal_fiber_length=0.141
        tendon_slack_length=0.006
      Scholz2015GeometryPath path: algorithm=minimum_length
        path_elements:
          Scholz2015GeometryPathPoint path_point_0:
            PathPoint: scapula_l (-0.1044 -0.1174 0.0721)
          Scholz2015GeometryPathObstacle obstacle_0: socket_contact_geometry=/bodyset/scapula_l/teres_major_l_obstacle
              contact_hint=(0.001 -0.025 -0.021)
          Scholz2015GeometryPathObstacle obstacle_1: socket_contact_geometry=/bodyset/thorax/thorax_l_obstacle
              contact_hint=(-0.041 0.07 -0.114)
          Scholz2015GeometryPathPoint path_point_1:
            PathPoint: humerus_l (0.0043 -0.039 0.0017)
    Millard2012EquilibriumMuscle teres_minor_l: max_isometric_force=695.8 optimal_fiber_length=0.055
        tendon_slack_length=0.051
      Scholz2015GeometryPath path: algorithm=minimum_length
        path_elements:
          Scholz2015GeometryPathPoint path_point_0:
            PathPoint: scapula_l (-0.0844 -0.0661 0.0423)
          Scholz2015GeometryPathObstacle obstacle_0: socket_contact_geometry=/bodyset/humerus_l/humeral_head_l_obstacle
              contact_hint=(-0.06 -0.017 0.012)
          Scholz2015GeometryPathPoint path_point_1:
            PathPoint: humerus_l (-0.0159 -0.0094 -0.0109)
    Millard2012EquilibriumMuscle infraspinatus_inf_l: max_isometric_force=1037.4 optimal_fiber_length=0.0677
        tendon_slack_length=0.084
      Scholz2015GeometryPath path: algorithm=minimum_length
        path_elements:
          Scholz2015GeometryPathPoint path_point_0:
            PathPoint: scapula_l (-0.0991 -0.0809 0.0813)
          Scholz2015GeometryPathObstacle obstacle_0: socket_contact_geometry=/bodyset/scapula_l/infraspinatus_l_obstacle
              contact_hint=(0.015 -0.031 -0.007)
          Scholz2015GeometryPathObstacle obstacle_1: socket_contact_geometry=/bodyset/humerus_l/humeral_head_l_obstacle
              contact_hint=(-0.039 -0.008 -0.023)
          Scholz2015GeometryPathPoint path_point_1:
            PathPoint: humerus_l (-0.0172 -0.0057 -0.0248)
    Millard2012EquilibriumMuscle infraspinatus_sup_l: max_isometric_force=967.4 optimal_fiber_length=0.0698
        tendon_slack_length=0.05
      Scholz2015GeometryPath path: algorithm=minimum_length
        path_elements:
          Scholz2015GeometryPathPoint path_point_0:
            PathPoint: scapula_l (-0.0834 -0.0323 0.0869)
          Scholz2015GeometryPathObstacle obstacle_0: socket_contact_geometry=/bodyset/scapula_l/infraspinatus_l_obstacle
              contact_hint=(0.018 -0.033 0.037)
          Scholz2015GeometryPathObstacle obstacle_1: socket_contact_geometry=/bodyset/humerus_l/humeral_head_l_obstacle
              contact_hint=(-0.039 0.008 -0.023)
          Scholz2015GeometryPathPoint path_point_1:
            PathPoint: humerus_l (-0.0143 0.0027 -0.0222)
    Millard2012EquilibriumMuscle subscapularis_sup_l: max_isometric_force=540.4 optimal_fiber_length=0.0676
        tendon_slack_length=0.059 pennation_angle_at_optimal=0.08726646
      Scholz2015GeometryPath path: algorithm=minimum_length
        path_elements:
          Scholz2015GeometryPathPoint path_point_0:
            PathPoint: scapula_l (-0.0788 -0.0313 0.0903)
          Scholz2015GeometryPathObstacle obstacle_0: socket_contact_geometry=/bodyset/scapula_l/subscapularis_l_obstacle
              contact_hint=(-0.004 -0.028 0.008)
          Scholz2015GeometryPathObstacle obstacle_1: socket_contact_geometry=/bodyset/humerus_l/humeral_head_l_obstacle
              contact_hint=(0.02 -0.006 0.038)
          Scholz2015GeometryPathPoint path_point_1:
            PathPoint: humerus_l (0.0225 0 0.018)
    Millard2012EquilibriumMuscle subscapularis_med_l: max_isometric_force=609 optimal_fiber_length=0.0744
        tendon_slack_length=0.055 pennation_angle_at_optimal=0.08726646
      Scholz2015GeometryPath path: algorithm=minimum_length
        path_elements:
          Scholz2015GeometryPathPoint path_point_0:
            PathPoint: scapula_l (-0.0836 -0.0549 0.0747)
          Scholz2015GeometryPathObstacle obstacle_0: socket_contact_geometry=/bodyset/scapula_l/subscapularis_l_obstacle
              contact_hint=(-0.004 -0.028 0.008)
          Scholz2015GeometryPathObstacle obstacle_1: socket_contact_geometry=/bodyset/humerus_l/humeral_head_l_obstacle
              contact_hint=(0.02 -0.006 0.038)
          Scholz2015GeometryPathPoint path_point_1:
            PathPoint: humerus_l (0.0225 0 0.018)
    Millard2012EquilibriumMuscle subscapularis_inf_l: max_isometric_force=854 optimal_fiber_length=0.0721
        tendon_slack_length=0.059
      Scholz2015GeometryPath path: algorithm=minimum_length
        path_elements:
          Scholz2015GeometryPathPoint path_point_0:
            PathPoint: scapula_l (-0.0951 -0.0977 0.0854)
          Scholz2015GeometryPathObstacle obstacle_0: socket_contact_geometry=/bodyset/scapula_l/subscapularis_l_obstacle
              contact_hint=(-0.004 -0.028 0.008)
          Scholz2015GeometryPathObstacle obstacle_1: socket_contact_geometry=/bodyset/humerus_l/humeral_head_l_obstacle
              contact_hint=(0.02 -0.006 0.038)
          Scholz2015GeometryPathPoint path_point_1:
            PathPoint: humerus_l (0.0225 0 0.018)
    Millard2012EquilibriumMuscle supraspinatus_post_l: max_isometric_force=326.2 optimal_fiber_length=0.0591
        tendon_slack_length=0.025
      Scholz2015GeometryPath path: algorithm=minimum_length
        path_elements:
          Scholz2015GeometryPathPoint path_point_0:
            PathPoint: scapula_l (-0.0605 -0.0014 0.0495)
          Scholz2015GeometryPathObstacle obstacle_0: socket_contact_geometry=/bodyset/humerus_l/humeral_head_l_obstacle
              contact_hint=(-0.027 0.048 0.011)
          Scholz2015GeometryPathPoint path_point_1:
            PathPoint: humerus_l (0.0102 0.0096 -0.0201)
    Millard2012EquilibriumMuscle supraspinatus_ant_l: max_isometric_force=543.2 optimal_fiber_length=0.0554
        tendon_slack_length=0.031
      Scholz2015GeometryPath path: algorithm=minimum_length
        path_elements:
          Scholz2015GeometryPathPoint path_point_0:
            PathPoint: scapula_l (-0.049 0.0014 0.0692)
          Scholz2015GeometryPathObstacle obstacle_0: socket_contact_geometry=/bodyset/humerus_l/humeral_head_l_obstacle
              contact_hint=(-0.025 0.054 0.028)
          Scholz2015GeometryPathPoint path_point_1:
            PathPoint: humerus_l (0.0178 0.0176 -0.0096)
    Millard2012EquilibriumMuscle triceps_long_l: max_isometric_force=1580.6 optimal_fiber_length=0.0969
        tendon_slack_length=0.2412 pennation_angle_at_optimal=0.174533
      Scholz2015GeometryPath path: algorithm=minimum_length
        path_elements:
          Scholz2015GeometryPathPoint path_point_0:
            PathPoint: scapula_l (-0.0421 -0.0519 0.0129)
          Scholz2015GeometryPathPoint path_point_1:
            PathPoint: ulna_l (-0.0195 -0.0291 -0.0087)
    Millard2012EquilibriumMuscle biceps_long_l: max_isometric_force=485.8 optimal_fiber_length=0.1421
        tendon_slack_length=0.2568
      Scholz2015GeometryPath path: algorithm=minimum_length
        path_elements:
          Scholz2015GeometryPathPoint path_point_0:
            PathPoint: scapula_l (-0.0226 -0.0163 0.0181)
          Scholz2015GeometryPathPoint path_point_1:
            PathPoint: humerus_l (0.0118 0.0281 -0.02)
          Scholz2015GeometryPathObstacle obstacle_0: socket_contact_geometry=/bodyset/humerus_l/humeral_head_l_obstacle
              contact_hint=(0.016 -0.006 -0.04)
          Scholz2015GeometryPathPoint path_point_2:
            PathPoint: radius_l (-0.0009 -0.044 0.0095)
    Millard2012EquilibriumMuscle biceps_brevis_l: max_isometric_force=693 optimal_fiber_length=0.1264
        tendon_slack_length=0.212
      Scholz2015GeometryPath path: algorithm=minimum_length
        path_elements:
          Scholz2015GeometryPathPoint path_point_0:
            PathPoint: scapula_l (0.0095 -0.0382 0.0242)
          Scholz2015GeometryPathPoint path_point_1:
            PathPoint: humerus_l (-0.0002 -0.0443 0.0099)
    ActivationCoordinateActuator [values shared by the 9 below unless stated]: activation_time_constant=0.035
        default_activation=0.5
    ActivationCoordinateActuator lumbar_bending_actuator: coordinate=lumbar_bending optimal_force=100
    ActivationCoordinateActuator lumbar_extension_actuator: coordinate=lumbar_extension optimal_force=100
    ActivationCoordinateActuator lumbar_rotation_actuator: coordinate=lumbar_rotation optimal_force=50
    ActivationCoordinateActuator thorax_bending_actuator: coordinate=thorax_bending optimal_force=100
    ActivationCoordinateActuator thorax_extension_actuator: coordinate=thorax_extension optimal_force=100
    ActivationCoordinateActuator thorax_rotation_actuator: coordinate=thorax_rotation optimal_force=50
    ActivationCoordinateActuator cervical_bending_actuator: coordinate=cervical_bending optimal_force=100
    ActivationCoordinateActuator cervical_extension_actuator: coordinate=cervical_extension optimal_force=100
    ActivationCoordinateActuator cervical_rotation_actuator: coordinate=cervical_rotation optimal_force=50
  MSKOnlySet:
    SwingTwistLimit glenohumeral_r_swing_twist: joint=glenohumeral_r twist_low=-1.04 twist_high=1.04
        swing1_neg_limit=3.14 swing1_pos_limit=0.52 swing2_neg_limit=0.87 swing2_pos_limit=3.14 stiffness=500
        damping=0.1
    SwingTwistLimit glenohumeral_l_swing_twist: joint=glenohumeral_l twist_low=-1.04 twist_high=1.04
        swing1_neg_limit=0.52 swing1_pos_limit=3.14 swing2_neg_limit=0.87 swing2_pos_limit=3.14 stiffness=500
        damping=0.1
