# OpenSim document version 40500
Model subject01:
  gravity: 0 -9.80665 0
  length_units: meters
  force_units: N
  credits:
    Delp S.L., Loan J.P., Hoy M.G., Zajac F.E., Topp E.L., Rosen J.M., Thelen D.G., Anderson F.C., Seth A., Hamner S.R.
  publications:
    Notes: 3D, 23 DOF gait model created by D.G. Thelen, Univ. of Wisconsin-Madison, and Samuel Hamner, Ajay Seth, Frank C. Anderson, and Scott L. Delp, Stanford University. Lower extremity joint defintions based on Delp et al. (1990). Low back joint and anthropometry based on Anderson and Pandy (1999, 2001). Planar knee model of Yamaguchi and Zajac (1989). Seth removed the patella to avoid kinematic constraints; insertions of the quadrucepts are handled with moving points in the tibia frame. Hamner added arms adapted from Holzbaur et al., 2005. Hamner, S.R., Seth, A, Delp, S.L.: Muscle contributions to propulsion and support during running. Journal of Biomechanics, 2010. Delp, S.L., Loan, J.P., Hoy, M.G., Zajac, F.E., Topp E.L., Rosen, J.M.: An interactive graphics-based model of the lower extremity to study orthopaedic surgical procedures, IEEE Transactions on Biomedical Engineering, vol. 37, pp. 757-767, 1990. Yamaguchi G.T., Zajac F.E.: A planar model of the knee joint to characterize the knee extensor mechanism." J . Biomech. vol. 21. pp. 1-10. 1989. Anderson F.C., Pandy M.G.: A dynamic optimization solution for vertical jumping in three dimensions. Computer Methods in Biomechanics and Biomedical Engineering 2:201-231, 1999. Anderson F.C., Pandy M.G.: Dynamic optimization of human walking. Journal of Biomechanical Engineering 123:381-390, 2001. Holzbaur, KR, WM Murray and SL Delp, 2005. A model of the upper extremity for simulating musculoskeletal surgery and analyzing neuromuscular control. Ann Biomed Eng 33(6): 829-840.
  Ground
  BodySet:
    Body pelvis: mass=11.777 [kg] mass_center=(-0.0707 0 0) inertia=(0.1028 0.0871 0.0579 0 0 0)
        meshes=(pelvis_r.obj pelvis_l.obj sacrum.obj)
    Body femur_r: mass=9.3014 mass_center=(0 -0.17 0) inertia=(0.1339 0.0351 0.1412 0 0 0) meshes=femur_r.obj
    Body femur_l: mass=9.3014 mass_center=(0 -0.17 0) inertia=(0.1339 0.0351 0.1412 0 0 0) meshes=femur_l.obj
    Body tibia_r: mass=3.7075 mass_center=(0 -0.1867 0) inertia=(0.0504 0.0051 0.0511 0 0 0)
        meshes=(tibia_r.obj fibula_r.obj)
    Body tibia_l: mass=3.7075 mass_center=(0 -0.1867 0) inertia=(0.0504 0.0051 0.0511 0 0 0)
        meshes=(tibia_l.obj fibula_l.obj)
    Body talus_r: mass=0.1 mass_center=(0 0 0) inertia=(0.001 0.001 0.001 0 0 0) meshes=talus_r.obj
    Body talus_l: mass=0.1 mass_center=(0 0 0) inertia=(0.001 0.001 0.001 0 0 0) meshes=talus_l.obj
    Body calcn_r: mass=1.25 mass_center=(0.1 0.03 0) inertia=(0.0014 0.0039 0.0041 0 0 0) meshes=calcn_r.obj
    Body calcn_l: mass=1.25 mass_center=(0.1 0.03 0) inertia=(0.0014 0.0039 0.0041 0 0 0) meshes=calcn_l.obj
    Body toes_r: mass=0.2166 mass_center=(0.0346 0.006 -0.0175) inertia=(0.0001 0.0002 0.001 0 0 0) meshes=toes_r.obj
    Body toes_l: mass=0.2166 mass_center=(0.0346 0.006 -0.0175) inertia=(0.0001 0.0002 0.001 0 0 0) meshes=toes_l.obj
    Body lumbar_spine: mass=5 mass_center=(0 -0.0875 0) inertia=(0.02233073 0.01914062 0.02233073 0 0 0)
    Body thorax: mass=16.83 mass_center=(-0.0591 -0.1486 0) inertia=(1.29841 0.55245 1.29841 0 0 0) meshes=ribs.obj
    Body head: mass=5 mass_center=(0 0.0375 0) inertia=(0.01569 0.01455 0.0186 0 0 0) meshes=skull.obj
    Body clavicle_r: mass=0.1898 mass_center=(-0.0111 0.0064 0.0542) inertia=(0.00027 0.00027 4.9e-5 0 0 0)
        meshes=clavicle_r.obj
    Body clavicle_l: mass=0.1898 mass_center=(-0.0111 0.0064 -0.0542) inertia=(0.00027 0.00027 4.9e-5 0 0 0)
        meshes=clavicle_l.obj
    Body scapula_r: mass=0.7054 mass_center=(-0.04612 -0.0319 -0.04565) inertia=(0.001 0.001 0.001 0 0 0)
        meshes=scapula_r.obj
      Station acromion_r: .. (0 0 0)
    Body scapula_l: mass=0.7054 mass_center=(-0.04612 -0.0319 0.04565) inertia=(0.001 0.001 0.001 0 0 0)
        meshes=scapula_l.obj
      Station acromion_l: .. (0 0 0)
    Body humerus_r: mass=2.0325 mass_center=(0 -0.1645 0) inertia=(0.011946 0.004121 0.01341 0 0 0)
        meshes=humerus_r.obj
    Body humerus_l: mass=2.0325 mass_center=(0 -0.1645 0) inertia=(0.011946 0.004121 0.01341 0 0 0)
        meshes=humerus_l.obj
    Body ulna_r: mass=0.6075 mass_center=(0 -0.120525 0) inertia=(0.002962 0.000618 0.003213 0 0 0) meshes=ulna_r.obj
      Station olecranon_r: .. (-0.03 -0.001 0)
    Body ulna_l: mass=0.6075 mass_center=(0 -0.120525 0) inertia=(0.002962 0.000618 0.003213 0 0 0) meshes=ulna_l.obj
      Station olecranon_l: .. (-0.03 -0.001 0)
    Body radius_r: mass=0.6075 mass_center=(0 -0.120525 0) inertia=(0.002962 0.000618 0.003213 0 0 0)
        meshes=radius_r.obj
      Station radiale_r: .. (0 -0.004 0.006)
      Station stylion_r: .. (0 -0.23 0.03)
    Body radius_l: mass=0.6075 mass_center=(0 -0.120525 0) inertia=(0.002962 0.000618 0.003213 0 0 0)
        meshes=radius_l.obj
      Station radiale_l: .. (0 -0.004 -0.006)
      Station stylion_l: .. (0 -0.23 -0.03)
    Body hand_r: mass=0.4575 mass_center=(0 -0.068095 0) inertia=(0.000892 0.000547 0.00134 0 0 0)
        meshes=(pisiform_r.obj lunate_r.obj scaphoid_r.obj triquetrum_r.obj hamate_r.obj capitate_r.obj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)
    Body hand_l: mass=0.4575 mass_center=(0 -0.068095 0) inertia=(0.000892 0.000547 0.00134 0 0 0)
        meshes=(pisiform_l.obj lunate_l.obj scaphoid_l.obj triquetrum_l.obj hamate_l.obj capitate_l.obj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)
  JointSet:
    CustomJoint ground_pelvis: socket_parent_frame=ground_offset socket_child_frame=pelvis_offset
      Coordinate pelvis_tilt: default_value=0 range=(-1.570796 1.570796) clamped=true
      Coordinate pelvis_list: default_value=0 range=(-1.570796 1.570796) clamped=true
      Coordinate pelvis_rotation: default_value=0 range=(-1.570796 1.570796) clamped=true
      Coordinate pelvis_tx: default_value=0 range=(-5 25) clamped=true
      Coordinate pelvis_ty: default_value=0 range=(-1 2) clamped=true
      Coordinate pelvis_tz: default_value=0 range=(-3 3) clamped=true
      PhysicalOffsetFrame ground_offset: socket_parent=/ground translation=(0 0 0) [meters]
      PhysicalOffsetFrame pelvis_offset: socket_parent=/bodyset/pelvis translation=(0 0 0)
      SpatialTransform:
        TransformAxis rotation1: coordinates=pelvis_tilt axis=(0 0 1) LinearFunction(coefficients=1 0)
        TransformAxis rotation2: coordinates=pelvis_list axis=(1 0 0) LinearFunction(coefficients=1 0)
        TransformAxis rotation3: coordinates=pelvis_rotation axis=(0 1 0) LinearFunction(coefficients=1 0)
        TransformAxis translation1: coordinates=pelvis_tx axis=(1 0 0) LinearFunction(coefficients=1 0)
        TransformAxis translation2: coordinates=pelvis_ty axis=(0 1 0) LinearFunction(coefficients=1 0)
        TransformAxis translation3: coordinates=pelvis_tz axis=(0 0 1) LinearFunction(coefficients=1 0)
    GimbalJoint hip_r: socket_parent_frame=pelvis_offset socket_child_frame=femur_r_offset
      Coordinate hip_flexion_r: default_value=0 range=(-2.094395 2.094395) clamped=true
      Coordinate hip_adduction_r: default_value=0 range=(-2.094395 2.094395) clamped=true
      Coordinate hip_rotation_r: default_value=0 range=(-2.094395 2.094395) clamped=true
      PhysicalOffsetFrame pelvis_offset: socket_parent=/bodyset/pelvis translation=(-0.0623853 -0.0583263 0.0728399)
          orientation=(-1.570796 0 -1.570796) [radians]
      PhysicalOffsetFrame femur_r_offset: socket_parent=/bodyset/femur_r translation=(0 0 0)
          orientation=(-1.570796 0 -1.570796)
    GimbalJoint hip_l: socket_parent_frame=pelvis_offset socket_child_frame=femur_l_offset
      Coordinate hip_flexion_l: default_value=0 range=(-2.094395 2.094395) clamped=true
      Coordinate hip_adduction_l: default_value=0 range=(-2.094395 2.094395) clamped=true
      Coordinate hip_rotation_l: default_value=0 range=(-2.094395 2.094395) clamped=true
      PhysicalOffsetFrame pelvis_offset: socket_parent=/bodyset/pelvis translation=(-0.0623853 -0.0583263 -0.0728399)
          orientation=(1.570796 0 1.570796)
      PhysicalOffsetFrame femur_l_offset: socket_parent=/bodyset/femur_l translation=(0 0 0)
          orientation=(1.570796 0 1.570796)
    CustomJoint knee_r: socket_parent_frame=knee_r_parent_frame socket_child_frame=knee_r_child_frame
      Coordinate knee_angle_r: default_value=0 range=(0 2.444819) clamped=true
      PhysicalOffsetFrame knee_r_parent_frame: socket_parent=/bodyset/femur_r translation=(-0.0045 -0.4096 -0.00175)
          orientation=(-1.64157 1.44618 1.5708)
      PhysicalOffsetFrame knee_r_child_frame: socket_parent=/bodyset/tibia_r
          translation=(-0.00808954 -0.0035348 -0.00148474) orientation=(-1.64157 1.44618 1.5708)
      SpatialTransform:
        TransformAxis rotation1: coordinates=knee_angle_r axis=(1 0 0) LinearFunction(coefficients=1 0)
        TransformAxis rotation2: coordinates=knee_angle_r axis=(0 0 1)
          PolynomialFunction: coefficients=(0.01083209 -0.02521833 -0.03284781 0.07910001 -1.473252e-8)
        TransformAxis rotation3: coordinates=knee_angle_r axis=(0 1 0)
          PolynomialFunction: coefficients=(0.02516576 -0.1694801 0.3694993 -4.430358e-8)
        TransformAxis translation1: coordinates=knee_angle_r axis=(1 0 0)
          PolynomialFunction: coefficients=(0.0001590448 -0.00101515 0.001817511 2.641427e-5 -7.746564e-7)
        TransformAxis translation2: coordinates=knee_angle_r axis=(0 1 0)
          PolynomialFunction: coefficients=(-0.0005796878 0.005079766 -0.01144238 0.003936909 -2.51635e-5)
        TransformAxis translation3: coordinates=knee_angle_r axis=(0 0 1)
          PolynomialFunction: coefficients=(0.001208087 -0.004453611 0.0006116494 0.00626543 -1.461913e-5)
    CustomJoint knee_l: socket_parent_frame=knee_l_parent_frame socket_child_frame=knee_l_child_frame
      Coordinate knee_angle_l: default_value=0 range=(0 2.444819) clamped=true
      PhysicalOffsetFrame knee_l_parent_frame: socket_parent=/bodyset/femur_l translation=(-0.0045 -0.4096 0.00175)
          orientation=(1.64157 -1.44618 1.5708)
      PhysicalOffsetFrame knee_l_child_frame: socket_parent=/bodyset/tibia_l
          translation=(-0.00808954 -0.0035348 0.00148474) orientation=(1.64157 -1.44618 1.5708)
      SpatialTransform:
        TransformAxis rotation1: coordinates=knee_angle_l axis=(-1 0 0) LinearFunction(coefficients=1 0)
        TransformAxis rotation2: coordinates=knee_angle_l axis=(0 0 1)
          PolynomialFunction: coefficients=(0.01083209 -0.02521833 -0.03284781 0.07910001 -1.473252e-8)
        TransformAxis rotation3: coordinates=knee_angle_l axis=(0 1 0)
          PolynomialFunction: coefficients=(-0.02516576 0.1694801 -0.3694993 4.430358e-8)
        TransformAxis translation1: coordinates=knee_angle_l axis=(1 0 0)
          PolynomialFunction: coefficients=(0.0001590448 -0.00101515 0.001817511 2.641427e-5 -7.746564e-7)
        TransformAxis translation2: coordinates=knee_angle_l axis=(0 1 0)
          PolynomialFunction: coefficients=(-0.0005796878 0.005079766 -0.01144238 0.003936909 -2.51635e-5)
        TransformAxis translation3: coordinates=knee_angle_l axis=(0 0 1)
          PolynomialFunction: coefficients=(-0.001208087 0.004453611 -0.0006116494 -0.00626543 1.461913e-5)
    PinJoint ankle_r: socket_parent_frame=ankle_r_parent_frame socket_child_frame=ankle_r_child_frame
      Coordinate ankle_angle_r: default_value=0 range=(-0.8975979 0.8975979) clamped=true
      PhysicalOffsetFrame ankle_r_parent_frame: socket_parent=/bodyset/tibia_r translation=(-0.01 -0.4 0)
          orientation=(0.175895 -0.105208 0.0186622)
      PhysicalOffsetFrame ankle_r_child_frame: socket_parent=/bodyset/talus_r translation=(0 0 0)
          orientation=(0.175895 -0.105208 0.0186622)
    PinJoint ankle_l: socket_parent_frame=ankle_l_parent_frame socket_child_frame=ankle_l_child_frame
      Coordinate ankle_angle_l: default_value=0 range=(-0.8975979 0.8975979) clamped=true
      PhysicalOffsetFrame ankle_l_parent_frame: socket_parent=/bodyset/tibia_l translation=(-0.01 -0.4 0)
          orientation=(-0.175895 0.105208 0.0186622)
      PhysicalOffsetFrame ankle_l_child_frame: socket_parent=/bodyset/talus_l translation=(0 0 0)
          orientation=(-0.175895 0.105208 0.0186622)
    PinJoint subtalar_r: socket_parent_frame=subtalar_r_parent_frame socket_child_frame=subtalar_r_child_frame
      Coordinate subtalar_angle_r: default_value=0 range=(-0.6283185 0.6283185) clamped=true
      PhysicalOffsetFrame subtalar_r_parent_frame: socket_parent=/bodyset/talus_r
          translation=(-0.04877 -0.04195 0.00792) orientation=(-1.76819 0.906223 1.8196)
      PhysicalOffsetFrame subtalar_r_child_frame: socket_parent=/bodyset/calcn_r translation=(0 0 0)
          orientation=(-1.76819 0.906223 1.8196)
    PinJoint subtalar_l: socket_parent_frame=subtalar_l_parent_frame socket_child_frame=subtalar_l_child_frame
      Coordinate subtalar_angle_l: default_value=0 range=(-0.6283185 0.6283185) clamped=true
      PhysicalOffsetFrame subtalar_l_parent_frame: socket_parent=/bodyset/talus_l
          translation=(-0.04877 -0.04195 -0.00792) orientation=(1.76819 -0.906223 1.8196)
      PhysicalOffsetFrame subtalar_l_child_frame: socket_parent=/bodyset/calcn_l translation=(0 0 0)
          orientation=(1.76819 -0.906223 1.8196)
    PinJoint mtp_r: socket_parent_frame=mtp_r_parent_frame socket_child_frame=mtp_r_child_frame
      Coordinate mtp_angle_r: default_value=0 range=(-0.7853982 0.5235988) clamped=true
      PhysicalOffsetFrame mtp_r_parent_frame: socket_parent=/bodyset/calcn_r translation=(0.1788 -0.002 0.00108)
          orientation=(-3.141593 0.619901 0)
      PhysicalOffsetFrame mtp_r_child_frame: socket_parent=/bodyset/toes_r translation=(0 0 0)
          orientation=(-3.141593 0.619901 0)
    PinJoint mtp_l: socket_parent_frame=mtp_l_parent_frame socket_child_frame=mtp_l_child_frame
      Coordinate mtp_angle_l: default_value=0 range=(-0.7853982 0.5235988) clamped=true
      PhysicalOffsetFrame mtp_l_parent_frame: socket_parent=/bodyset/calcn_l translation=(0.1788 -0.002 -0.00108)
          orientation=(-3.141593 -0.619901 0)
      PhysicalOffsetFrame mtp_l_child_frame: socket_parent=/bodyset/toes_l translation=(0 0 0)
          orientation=(-3.141593 -0.619901 0)
    CantileverFreeBeamJoint lumbar: socket_parent_frame=lumbar_spine_parent_frame
        socket_child_frame=lumbar_spine_child_frame beam_length=0.175
      Coordinate lumbar_bending: default_value=0 range=(-0.5235988 0.5235988) clamped=true
      Coordinate lumbar_extension: default_value=-0.6414085 range=(-1.182461 0.4930555) clamped=true
      Coordinate lumbar_rotation: default_value=0 range=(-0.2617994 0.2617994) clamped=true
      PhysicalOffsetFrame lumbar_spine_parent_frame: socket_parent=/bodyset/pelvis translation=(-0.09 0.075 0)
          orientation=(-1.570796 0.25 0)
      PhysicalOffsetFrame lumbar_spine_child_frame: socket_parent=/bodyset/lumbar_spine translation=(0 0 0)
          orientation=(-1.570796 0 0)
    CantileverFreeBeamJoint thorax: socket_parent_frame=thoracic_spine_parent_frame
        socket_child_frame=thoracic_spine_child_frame beam_length=0.275
      Coordinate thorax_bending: default_value=0 range=(-0.5235988 0.5235988) clamped=true
      Coordinate thorax_extension: default_value=0.6326819 range=(0.2487094 1.086467) clamped=true
      Coordinate thorax_rotation: default_value=0 range=(-0.8203047 0.8203047) clamped=true
      PhysicalOffsetFrame thoracic_spine_parent_frame: socket_parent=/bodyset/lumbar_spine translation=(0 0 0)
          orientation=(-1.570796 0 0)
      PhysicalOffsetFrame thoracic_spine_child_frame: socket_parent=/bodyset/thorax translation=(-0.0275 0.057 0)
          orientation=(-1.570796 0.25 0)
    CantileverFreeBeamJoint cervical: socket_parent_frame=cervical_spine_parent_frame
        socket_child_frame=cervical_spine_child_frame beam_length=0.075
      Coordinate cervical_bending: default_value=0 range=(-0.8552113 0.8552113) clamped=true
      Coordinate cervical_extension: default_value=-0.2487094 range=(-1.348267 0.8683013) clamped=true
      Coordinate cervical_rotation: default_value=0 range=(-1.48353 1.48353) clamped=true
      PhysicalOffsetFrame cervical_spine_parent_frame: socket_parent=/bodyset/thorax translation=(-0.0275 0.057 0)
          orientation=(-1.570796 0.25 0)
      PhysicalOffsetFrame cervical_spine_child_frame: socket_parent=/bodyset/head translation=(0 0 0)
          orientation=(-1.570796 0 0)
    WeldJoint sternoclavicular_r: socket_parent_frame=sternoclavicular_r_parent_frame
        socket_child_frame=sternoclavicular_r_child_frame
      PhysicalOffsetFrame sternoclavicular_r_parent_frame: socket_parent=/bodyset/thorax
          translation=(0.00632 0.00693 0.0255)
      PhysicalOffsetFrame sternoclavicular_r_child_frame: socket_parent=/bodyset/clavicle_r translation=(0 0 0)
    WeldJoint sternoclavicular_l: socket_parent_frame=sternoclavicular_l_parent_frame
        socket_child_frame=sternoclavicular_l_child_frame
      PhysicalOffsetFrame sternoclavicular_l_parent_frame: socket_parent=/bodyset/thorax
          translation=(0.00632 0.00693 -0.0255)
      PhysicalOffsetFrame sternoclavicular_l_child_frame: socket_parent=/bodyset/clavicle_l translation=(0 0 0)
    EllipsoidJoint scapulothoracic_r: socket_parent_frame=scapulothoracic_r_parent_frame
        socket_child_frame=scapulothoracic_r_child_frame radii_x_y_z=(0.2 0.083 0.083)
      Coordinate scapula_abduction_r: default_value=0 range=(-0.5235988 0.5235988) clamped=true
      Coordinate scapula_elevation_r: default_value=0 range=(-0.1745329 0.1745329) clamped=true
      Coordinate scapula_rotation_r: default_value=0 range=(-0.2617994 0.2617994) clamped=true
      PhysicalOffsetFrame scapulothoracic_r_parent_frame: socket_parent=/bodyset/thorax
          translation=(-0.0294 -0.0173 0.0703) orientation=(0 -0.87 1.570796)
      PhysicalOffsetFrame scapulothoracic_r_child_frame: socket_parent=/bodyset/scapula_r
          translation=(-0.05982 -0.03904 -0.056) orientation=(-0.5181 -1.14159 1.285396)
    EllipsoidJoint scapulothoracic_l: socket_parent_frame=scapulothoracic_l_parent_frame
        socket_child_frame=scapulothoracic_l_child_frame radii_x_y_z=(-0.2 -0.083 -0.083)
      Coordinate scapula_abduction_l: default_value=0 range=(-0.5235988 0.5235988) clamped=true
      Coordinate scapula_elevation_l: default_value=0 range=(-0.1745329 0.1745329) clamped=true
      Coordinate scapula_rotation_l: default_value=0 range=(-0.2617994 0.2617994) clamped=true
      PhysicalOffsetFrame scapulothoracic_l_parent_frame: socket_parent=/bodyset/thorax
          translation=(-0.0294 -0.0173 -0.0703) orientation=(0 0.87 -1.570796)
      PhysicalOffsetFrame scapulothoracic_l_child_frame: socket_parent=/bodyset/scapula_l
          translation=(-0.05982 -0.03904 0.056) orientation=(0.5181 1.14159 -1.856196)
    CustomJoint glenohumeral_r: socket_parent_frame=glenohumeral_r_parent_frame
        socket_child_frame=glenohumeral_r_child_frame
      Coordinate shoulder_flexion_r: default_value=0 range=(-1.570796 3.141593) clamped=true
      Coordinate shoulder_abduction_r: default_value=0 range=(-1.570796 2.513274) clamped=true
      Coordinate shoulder_rotation_r: default_value=0 range=(-1.570796 1.570796) clamped=true
      PhysicalOffsetFrame glenohumeral_r_parent_frame: socket_parent=/bodyset/scapula_r
          translation=(-0.00955 -0.034 0.009) orientation=(-0.25 0 -0.125)
      PhysicalOffsetFrame glenohumeral_r_child_frame: socket_parent=/bodyset/humerus_r translation=(0 0 0)
      SpatialTransform:
        TransformAxis rotation1: coordinates=shoulder_flexion_r axis=(0 0 1) LinearFunction(coefficients=1 0)
        TransformAxis rotation2: coordinates=shoulder_abduction_r axis=(1 0 0) LinearFunction(coefficients=-1 0)
        TransformAxis rotation3: coordinates=shoulder_rotation_r axis=(0 1 0) LinearFunction(coefficients=1 0)
        TransformAxis translation1: coordinates=shoulder_rotation_r axis=(1 0 0) Constant(value=0)
        TransformAxis translation2: coordinates=shoulder_rotation_r axis=(0 1 0) Constant(value=0)
        TransformAxis translation3: coordinates=shoulder_rotation_r axis=(0 0 1) Constant(value=0)
    CustomJoint glenohumeral_l: socket_parent_frame=glenohumeral_l_parent_frame
        socket_child_frame=glenohumeral_l_child_frame
      Coordinate shoulder_flexion_l: default_value=0 range=(-1.570796 3.141593) clamped=true
      Coordinate shoulder_abduction_l: default_value=0 range=(-1.570796 2.513274) clamped=true
      Coordinate shoulder_rotation_l: default_value=0 range=(-1.570796 1.570796) clamped=true
      PhysicalOffsetFrame glenohumeral_l_parent_frame: socket_parent=/bodyset/scapula_l
          translation=(-0.00955 -0.034 -0.009) orientation=(0.25 0 -0.125)
      PhysicalOffsetFrame glenohumeral_l_child_frame: socket_parent=/bodyset/humerus_l translation=(0 0 0)
      SpatialTransform:
        TransformAxis rotation1: coordinates=shoulder_flexion_l axis=(0 0 1) LinearFunction(coefficients=1 0)
        TransformAxis rotation2: coordinates=shoulder_abduction_l axis=(1 0 0) LinearFunction(coefficients=1 0)
        TransformAxis rotation3: coordinates=shoulder_rotation_l axis=(0 1 0) LinearFunction(coefficients=-1 0)
        TransformAxis translation1: coordinates=shoulder_flexion_l axis=(1 0 0) Constant(value=0)
        TransformAxis translation2: coordinates=shoulder_flexion_l axis=(0 1 0) Constant(value=0)
        TransformAxis translation3: coordinates=shoulder_flexion_l axis=(0 0 1) Constant(value=0)
    PinJoint elbow_r: socket_parent_frame=elbow_r_parent_frame socket_child_frame=elbow_r_child_frame
      Coordinate elbow_flex_r: default_value=0 range=(0 2.617994) clamped=true
      PhysicalOffsetFrame elbow_r_parent_frame: socket_parent=/bodyset/humerus_r
          translation=(0.013144 -0.286273 -0.009595) orientation=(-0.0228627 0.228018 0.0051689)
      PhysicalOffsetFrame elbow_r_child_frame: socket_parent=/bodyset/ulna_r translation=(0 0 0)
          orientation=(-0.0228627 0.228018 0.0051689)
    PinJoint elbow_l: socket_parent_frame=elbow_l_parent_frame socket_child_frame=elbow_l_child_frame
      Coordinate elbow_flex_l: default_value=0 range=(0 2.617994) clamped=true
      PhysicalOffsetFrame elbow_l_parent_frame: socket_parent=/bodyset/humerus_l
          translation=(0.013144 -0.286273 0.009595) orientation=(0.0228627 -0.228018 0.0051689)
      PhysicalOffsetFrame elbow_l_child_frame: socket_parent=/bodyset/ulna_l translation=(0 0 0)
          orientation=(0.0228627 -0.228018 0.0051689)
    PinJoint radioulnar_r: socket_parent_frame=radioulnar_r_parent_frame socket_child_frame=radioulnar_r_child_frame
      Coordinate pro_sup_r: default_value=0 range=(0 1.570796) clamped=true
      PhysicalOffsetFrame radioulnar_r_parent_frame: socket_parent=/bodyset/ulna_r
          translation=(-0.006727 -0.013007 0.026083) orientation=(-1.56884 0.056428 1.53614)
      PhysicalOffsetFrame radioulnar_r_child_frame: socket_parent=/bodyset/radius_r translation=(0 0 0)
          orientation=(-1.56884 0.056428 1.53614)
    PinJoint radioulnar_l: socket_parent_frame=radioulnar_l_parent_frame socket_child_frame=radioulnar_l_child_frame
      Coordinate pro_sup_l: default_value=0 range=(0 1.570796) clamped=true
      PhysicalOffsetFrame radioulnar_l_parent_frame: socket_parent=/bodyset/ulna_l
          translation=(-0.006727 -0.013007 -0.026083) orientation=(1.56884 -0.056428 1.53614)
      PhysicalOffsetFrame radioulnar_l_child_frame: socket_parent=/bodyset/radius_l translation=(0 0 0)
          orientation=(1.56884 -0.056428 1.53614)
    UniversalJoint radius_hand_r: socket_parent_frame=radius_hand_r_parent_frame
        socket_child_frame=radius_hand_r_child_frame
      Coordinate wrist_flex_r: default_value=0 range=(-1.256637 1.256637) clamped=true
      Coordinate wrist_dev_r: default_value=0 range=(-0.448799 0.6283185) clamped=true
      PhysicalOffsetFrame radius_hand_r_parent_frame: socket_parent=/bodyset/radius_r
          translation=(-0.008797 -0.235841 0.01361) orientation=(-1.5708 0 -1.5708)
      PhysicalOffsetFrame radius_hand_r_child_frame: socket_parent=/bodyset/hand_r translation=(0 0 0)
          orientation=(-1.5708 0 -1.5708)
    UniversalJoint radius_hand_l: socket_parent_frame=radius_hand_l_parent_frame
        socket_child_frame=radius_hand_l_child_frame
      Coordinate wrist_flex_l: default_value=0 range=(-1.256637 1.256637) clamped=true
      Coordinate wrist_dev_l: default_value=0 range=(-0.448799 0.6283185) clamped=true
      PhysicalOffsetFrame radius_hand_l_parent_frame: socket_parent=/bodyset/radius_l
          translation=(-0.008797 -0.235841 -0.01361) orientation=(1.5708 0 1.5708)
      PhysicalOffsetFrame radius_hand_l_child_frame: socket_parent=/bodyset/hand_l translation=(0 0 0)
          orientation=(1.5708 0 1.5708)
  ContactGeometrySet:
    ContactHalfSpace ground: socket_frame=/ground location=(0 0 0)
    ContactCapsule pelvis_col: socket_frame=pelvis location=(-0.06 -0.02 0) radius=0.065 length=0.06
    ContactCapsule lumbar_col: socket_frame=lumbar_spine location=(0 -0.085 0) radius=0.05 length=0.03
    ContactCapsule thorax_col: socket_frame=thorax location=(0 -0.145 0.07) orientation=(1.5707 0 0) radius=0.08
        length=0.08
    ContactCapsule thorax_col2: socket_frame=thorax location=(0 -0.145 -0.07) orientation=(1.5707 0 0) radius=0.08
        length=0.08
    ContactSphere head_col: socket_frame=head location=(0 0.04 0) radius=0.12
    ContactSphere right_foot_1: socket_frame=/bodyset/toes_r location=(0.0699 -0.0299 -0.0286) radius=0.02
    ContactSphere right_foot_2: socket_frame=/bodyset/toes_r location=(0.0294 -0.0299 1.521175e-8) radius=0.02
    ContactSphere right_foot_3: socket_frame=/bodyset/calcn_r location=(0.1499 -0.0282 6.884226e-8) radius=0.02
    ContactSphere right_foot_4: socket_frame=/bodyset/calcn_r location=(0.1499 -0.0282 -0.02272616) radius=0.02
    ContactSphere right_foot_5: socket_frame=/bodyset/calcn_r location=(0.07 -0.0282 0.0449) radius=0.02
    ContactSphere right_foot_6: socket_frame=/bodyset/calcn_r location=(0.119 -0.0282 -6.092648e-8) radius=0.02
    ContactSphere right_foot_7: socket_frame=/bodyset/calcn_r location=(0 -0.0282 0) radius=0.02
    ContactSphere left_foot_1: socket_frame=/bodyset/toes_l location=(0.0699 -0.0299 0.0286) radius=0.02
    ContactSphere left_foot_2: socket_frame=/bodyset/toes_l location=(0.0294 -0.0299 -1.521175e-8) radius=0.02
    ContactSphere left_foot_3: socket_frame=/bodyset/calcn_l location=(0.1499 -0.0282 -6.884226e-8) radius=0.02
    ContactSphere left_foot_4: socket_frame=/bodyset/calcn_l location=(0.1499 -0.0282 0.02272616) radius=0.02
    ContactSphere left_foot_5: socket_frame=/bodyset/calcn_l location=(0.07 -0.0282 -0.0449) radius=0.02
    ContactSphere left_foot_6: socket_frame=/bodyset/calcn_l location=(0.119 -0.0282 6.092648e-8) radius=0.02
    ContactSphere left_foot_7: socket_frame=/bodyset/calcn_l location=(0 -0.0282 0) radius=0.02
    ContactCapsule right_femur_col: socket_frame=femur_r location=(0 -0.225 0.01) orientation=(1.5707 0.1 0)
        radius=0.06 length=0.16
    ContactCapsule right_tibia_col: socket_frame=tibia_r location=(0 -0.245 0) orientation=(1.5707 0 0) radius=0.05
        length=0.18
    ContactCapsule left_femur_col: socket_frame=femur_l location=(0 -0.225 0) orientation=(1.5707 0.1 0) radius=0.06
        length=0.16
    ContactCapsule left_tibia_col: socket_frame=tibia_l location=(0 -0.245 0) orientation=(1.5707 0 0) radius=0.05
        length=0.18
