# OpenSim document version 40500
Model subject01:
  gravity: 0 -9.80665 0
  length_units: meters
  force_units: N
  credits:
    Delp S.L., Loan J.P., Hoy M.G., Zajac F.E., Topp E.L., Rosen J.M., Thelen D.G., Anderson F.C., Seth A., Hamner S.R.
  publications:
    Notes: 3D, 23 DOF gait model created by D.G. Thelen, Univ. of Wisconsin-Madison, and Samuel Hamner, Ajay Seth, Frank C. Anderson, and Scott L. Delp, Stanford University. Lower extremity joint defintions based on Delp et al. (1990). Low back joint and anthropometry based on Anderson and Pandy (1999, 2001). Planar knee model of Yamaguchi and Zajac (1989). Seth removed the patella to avoid kinematic constraints; insertions of the quadrucepts are handled with moving points in the tibia frame. Hamner added arms adapted from Holzbaur et al., 2005. Hamner, S.R., Seth, A, Delp, S.L.: Muscle contributions to propulsion and support during running. Journal of Biomechanics, 2010. Delp, S.L., Loan, J.P., Hoy, M.G., Zajac, F.E., Topp E.L., Rosen, J.M.: An interactive graphics-based model of the lower extremity to study orthopaedic surgical procedures, IEEE Transactions on Biomedical Engineering, vol. 37, pp. 757-767, 1990. Yamaguchi G.T., Zajac F.E.: A planar model of the knee joint to characterize the knee extensor mechanism." J . Biomech. vol. 21. pp. 1-10. 1989. Anderson F.C., Pandy M.G.: A dynamic optimization solution for vertical jumping in three dimensions. Computer Methods in Biomechanics and Biomedical Engineering 2:201-231, 1999. Anderson F.C., Pandy M.G.: Dynamic optimization of human walking. Journal of Biomechanical Engineering 123:381-390, 2001. Holzbaur, KR, WM Murray and SL Delp, 2005. A model of the upper extremity for simulating musculoskeletal surgery and analyzing neuromuscular control. Ann Biomed Eng 33(6): 829-840.
  Ground
  BodySet:
    Body pelvis: mass=11.777 [kg] mass_center=(0 0 0) inertia=(0.1028 0.0871 0.0579 0 0 0)
    Body torso: mass=34.2366 mass_center=(0 0 0) inertia=(1.4745 0.7555 1.4314 0 0 0)
    Body femur_r: mass=9.3014 mass_center=(0 0 0) inertia=(0.1339 0.0351 0.1412 0 0 0)
    Body tibia_r: mass=3.7075 mass_center=(0 0 0) inertia=(0.0504 0.0051 0.0511 0 0 0)
    Body talus_r: mass=1.25 mass_center=(0 0 0) inertia=(0.0014 0.0039 0.0041 0 0 0)
    Body femur_l: mass=9.3014 mass_center=(0 0 0) inertia=(0.1339 0.0351 0.1412 0 0 0)
    Body tibia_l: mass=3.7075 mass_center=(0 0 0) inertia=(0.0504 0.0051 0.0511 0 0 0)
    Body talus_l: mass=0.09601594 mass_center=(0 0 0) inertia=(0.000739195 0.000703926 0.000703926 0 0 0)
        meshes=talus_lv.vtp
  JointSet:
    CustomJoint ground_pelvis: socket_parent_frame=ground_offset socket_child_frame=pelvis_offset
      Coordinate pelvis_tilt: default_value=0 range=(-1.570796 1.570796) clamped=true
      Coordinate pelvis_list: default_value=0 range=(-1.570796 1.570796) clamped=true
      Coordinate pelvis_rotation: default_value=0 range=(-1.570796 1.570796) clamped=true
      Coordinate pelvis_tx: default_value=0 range=(-5 25) clamped=true
      Coordinate pelvis_ty: default_value=0 range=(-1 2) clamped=true
      Coordinate pelvis_tz: default_value=0 range=(-3 3) clamped=true
      PhysicalOffsetFrame ground_offset: socket_parent=/ground translation=(0 0 0) [meters]
      PhysicalOffsetFrame pelvis_offset: socket_parent=/bodyset/pelvis translation=(0 0 0)
      SpatialTransform:
        TransformAxis rotation1: coordinates=pelvis_tilt axis=(0 0 1) LinearFunction(coefficients=1 0)
        TransformAxis rotation2: coordinates=pelvis_list axis=(1 0 0) LinearFunction(coefficients=1 0)
        TransformAxis rotation3: coordinates=pelvis_rotation axis=(0 1 0) LinearFunction(coefficients=1 0)
        TransformAxis translation1: coordinates=pelvis_tx axis=(1 0 0) LinearFunction(coefficients=1 0)
        TransformAxis translation2: coordinates=pelvis_ty axis=(0 1 0) LinearFunction(coefficients=1 0)
        TransformAxis translation3: coordinates=pelvis_tz axis=(0 0 1) LinearFunction(coefficients=1 0)
    CustomJoint back: socket_parent_frame=pelvis_offset socket_child_frame=torso_offset
      Coordinate lumbar_bending: default_value=0 range=(-0.35 0.15) clamped=true
      Coordinate lumbar_rotation: default_value=0 range=(-0.15 0.21) clamped=true
      Coordinate lumbar_extension: default_value=0 range=(-0.64 0.03) clamped=true
      PhysicalOffsetFrame pelvis_offset: socket_parent=/bodyset/pelvis translation=(0 0.05 0)
      PhysicalOffsetFrame torso_offset: socket_parent=/bodyset/torso translation=(0 0.25 0)
      SpatialTransform: axes_held_at_zero=(translation1 translation2 translation3)
        TransformAxis rotation1: coordinates=lumbar_bending axis=(1 0 0) LinearFunction(coefficients=1 0)
        TransformAxis rotation2: coordinates=lumbar_rotation axis=(0 1 0) LinearFunction(coefficients=1 0)
        TransformAxis rotation3: coordinates=lumbar_extension axis=(0 0 1) LinearFunction(coefficients=1 0)
    CustomJoint hip_r: socket_parent_frame=pelvis_offset socket_child_frame=femur_r_offset
      Coordinate hip_adduction_r: default_value=0 range=(-0.31 0.22) clamped=true
      Coordinate hip_rotation_r: default_value=0 range=(-0.49 0.2) clamped=true
      Coordinate hip_flexion_r: default_value=0 range=(-0.49 1.89) clamped=true
      PhysicalOffsetFrame pelvis_offset: socket_parent=/bodyset/pelvis translation=(0 -0.0661 0.0835)
      PhysicalOffsetFrame femur_r_offset: socket_parent=/bodyset/femur_r translation=(0 -0.17 0)
      SpatialTransform: axes_held_at_zero=(translation1 translation2 translation3)
        TransformAxis rotation1: coordinates=hip_adduction_r axis=(1 0 0) LinearFunction(coefficients=1 0)
        TransformAxis rotation2: coordinates=hip_rotation_r axis=(0 1 0) LinearFunction(coefficients=1 0)
        TransformAxis rotation3: coordinates=hip_flexion_r axis=(0 0 1) LinearFunction(coefficients=1 0)
    PinJoint knee_r: socket_parent_frame=femur_r_offset socket_child_frame=tibia_r_offset
      Coordinate knee_angle_r: default_value=0 range=(-2.5 0) clamped=true
      PhysicalOffsetFrame femur_r_offset: socket_parent=/bodyset/femur_r translation=(0 -0.226 0)
      PhysicalOffsetFrame tibia_r_offset: socket_parent=/bodyset/tibia_r translation=(0 -0.1867 0)
    PinJoint ankle_r: socket_parent_frame=tibia_r_offset socket_child_frame=talus_r_offset
      Coordinate ankle_angle_r: default_value=0 range=(-0.91 0.49) clamped=true
      PhysicalOffsetFrame tibia_r_offset: socket_parent=/bodyset/tibia_r translation=(0 -0.2433 0)
      PhysicalOffsetFrame talus_r_offset: socket_parent=/bodyset/talus_r translation=(0.05123 -0.01195 0.00792)
    CustomJoint hip_l: socket_parent_frame=pelvis_offset socket_child_frame=femur_l_offset
      Coordinate hip_adduction_l: default_value=0 range=(-0.31 0.22) clamped=true
      Coordinate hip_rotation_l: default_value=0 range=(-0.49 0.2) clamped=true
      Coordinate hip_flexion_l: default_value=0 range=(-0.49 1.89) clamped=true
      PhysicalOffsetFrame pelvis_offset: socket_parent=/bodyset/pelvis translation=(0 -0.0661 -0.0835)
      PhysicalOffsetFrame femur_l_offset: socket_parent=/bodyset/femur_l translation=(0 -0.17 0)
      SpatialTransform: axes_held_at_zero=(translation1 translation2 translation3)
        TransformAxis rotation1: coordinates=hip_adduction_l axis=(-1 0 0) LinearFunction(coefficients=1 0)
        TransformAxis rotation2: coordinates=hip_rotation_l axis=(0 -1 0) LinearFunction(coefficients=1 0)
        TransformAxis rotation3: coordinates=hip_flexion_l axis=(0 0 1) LinearFunction(coefficients=1 0)
    PinJoint knee_l: socket_parent_frame=femur_l_offset socket_child_frame=tibia_l_offset
      Coordinate knee_angle_l: default_value=0 range=(-2.5 0) clamped=true
      PhysicalOffsetFrame femur_l_offset: socket_parent=/bodyset/femur_l translation=(0 -0.226 0)
      PhysicalOffsetFrame tibia_l_offset: socket_parent=/bodyset/tibia_l translation=(0 -0.1867 0)
    PinJoint ankle_l: socket_parent_frame=tibia_l_offset socket_child_frame=talus_l_offset
      Coordinate ankle_angle_l: default_value=0 range=(-0.91 0.49) clamped=true
      PhysicalOffsetFrame tibia_l_offset: socket_parent=/bodyset/tibia_l translation=(0 -0.2433 0)
      PhysicalOffsetFrame talus_l_offset: socket_parent=/bodyset/talus_l translation=(0.05123 -0.01195 -0.00792)
  ContactGeometrySet:
    ContactHalfSpace ground: socket_frame=/ground location=(0 0 0)
    ContactCapsule right_foot: socket_frame=/bodyset/talus_r location=(0 0 0) orientation=(0 1.5707 0) radius=0.03
        length=0.05
    ContactSphere right_1: socket_frame=/bodyset/talus_r location=(-0.085 -0.015 -0.005) radius=0.02
    ContactSphere right_2: socket_frame=/bodyset/talus_r location=(0.0425 -0.03 0.041) radius=0.02
    ContactSphere right_3: socket_frame=/bodyset/talus_r location=(0.085 -0.03 -0.0275) radius=0.02
    ContactCapsule left_foot: socket_frame=/bodyset/talus_l location=(0 0 0) orientation=(0 1.5707 0) radius=0.03
        length=0.05
    ContactSphere left_1: socket_frame=/bodyset/talus_l location=(-0.085 -0.015 0.005) radius=0.02
    ContactSphere left_2: socket_frame=/bodyset/talus_l location=(0.0425 -0.03 -0.041) radius=0.02
    ContactSphere left_3: socket_frame=/bodyset/talus_l location=(0.085 -0.03 0.0275) radius=0.02
    ContactCapsule right_femur_col: socket_frame=femur_r location=(0 0 0) orientation=(1.5707 0 0) radius=0.05
        length=0.155
    ContactCapsule right_tibia_col: socket_frame=tibia_r location=(0 0 0) orientation=(1.5707 0 0) radius=0.04
        length=0.18
    ContactCapsule left_femur_col: socket_frame=femur_l location=(0 0 0) orientation=(1.5707 0 0) radius=0.05
        length=0.155
    ContactCapsule left_tibia_col: socket_frame=tibia_l location=(0 0 0) orientation=(1.5707 0 0) radius=0.04
        length=0.18
    ContactCapsule pelvis_col: socket_frame=pelvis location=(0 0 0) radius=0.07 length=0.06
    ContactCapsule torso_col_1: socket_frame=torso location=(0 0 0) orientation=(1.5707 0 0) radius=0.1 length=0.135
    ContactCapsule head_col: socket_frame=torso location=(0 0.38 0) radius=0.09 length=0
