# OpenSim document version 40500
Model subject01:
  gravity: 0 -9.80665 0
  Ground
  BodySet:
    Body Pelvis: mass=11.3078 mass_center=(-0.0623853 0 0) inertia=(0.0756014 0.0756014 0.043286 0 0 0)
    Body Torso: mass=25.75781 mass_center=(-0.0349193 0.309569 0) inertia=(1.44131 0.911586 1.44131 0 0 0)
    Body LeftFemur: mass=8.930827 mass_center=(0 -0.181569 0) inertia=(0.139837 0.0248011 0.139837 0 0 0)
    Body RightFemur: mass=8.930827 mass_center=(0 -0.181569 0) inertia=(0.139837 0.0248011 0.139837 0 0 0)
    Body LeftShank: mass=3.559791 mass_center=(0 -0.208895 0) inertia=(0.059175 0.00331717 0.059175 0 0 0)
    Body RightShank: mass=3.559791 mass_center=(0 -0.208895 0) inertia=(0.059175 0.00331717 0.059175 0 0 0)
    Body LeftFoot: mass=0.09601594 mass_center=(0 0 0) inertia=(0.000739195 0.000703926 0.000703926 0 0 0)
    Body RightFoot: mass=0.09601594 mass_center=(0 0 0) inertia=(0.000739195 0.000703926 0.000703926 0 0 0)
  JointSet:
    CustomJoint ground_Pelvis: socket_parent_frame=ground_offset socket_child_frame=Pelvis_offset
      Coordinate Pelvis_tilt: default_value=0 range=(-1.570796 1.570796) clamped=true
      Coordinate Pelvis_list: default_value=0 range=(-1.570796 1.570796) clamped=true
      Coordinate Pelvis_rotation: default_value=0 range=(-1.570796 1.570796) clamped=true
      Coordinate Pelvis_tx: default_value=0 range=(-5 25) clamped=true
      Coordinate Pelvis_ty: default_value=0 range=(-1 2) clamped=true
      Coordinate Pelvis_tz: default_value=0 range=(-3 3) clamped=true
      PhysicalOffsetFrame ground_offset: socket_parent=/ground translation=(0 1.5 0)
      PhysicalOffsetFrame Pelvis_offset: socket_parent=/bodyset/Pelvis translation=(0 0 0)
      SpatialTransform:
        TransformAxis rotation1: coordinates=Pelvis_tilt axis=(0 0 1) LinearFunction(coefficients=1 0)
        TransformAxis rotation2: coordinates=Pelvis_list axis=(1 0 0) LinearFunction(coefficients=1 0)
        TransformAxis rotation3: coordinates=Pelvis_rotation axis=(0 1 0) LinearFunction(coefficients=1 0)
        TransformAxis translation1: coordinates=Pelvis_tx axis=(1 0 0) LinearFunction(coefficients=1 0)
        TransformAxis translation2: coordinates=Pelvis_ty axis=(0 1 0) LinearFunction(coefficients=1 0)
        TransformAxis translation3: coordinates=Pelvis_tz axis=(0 0 1) LinearFunction(coefficients=1 0)
    PinJoint back: socket_parent_frame=Pelvis_offset socket_child_frame=Torso_offset
      Coordinate lumbar_bending: default_value=0 range=(-0.35 0.15) clamped=true
      PhysicalOffsetFrame Pelvis_offset: socket_parent=/bodyset/Pelvis translation=(-0.0888571 0.0719151 0)
      PhysicalOffsetFrame Torso_offset: socket_parent=/bodyset/Torso translation=(0 0 0)
    PinJoint hip_l: socket_parent_frame=Pelvis_offset socket_child_frame=LeftFemur_offset
      Coordinate hip_flexion_l: default_value=0 range=(-0.49 1.89) clamped=true
      PhysicalOffsetFrame Pelvis_offset: socket_parent=/bodyset/Pelvis translation=(-0.0623853 -0.0583263 -0.0728399)
      PhysicalOffsetFrame LeftFemur_offset: socket_parent=/bodyset/LeftFemur translation=(0 0 0)
    PinJoint knee_l: socket_parent_frame=LeftFemur_offset socket_child_frame=LeftShank_offset
      Coordinate knee_angle_l: default_value=0 range=(-2.5 0) clamped=true
      PhysicalOffsetFrame LeftFemur_offset: socket_parent=/bodyset/LeftFemur translation=(0.0041 -0.41 0)
      PhysicalOffsetFrame LeftShank_offset: socket_parent=/bodyset/LeftShank translation=(0 0 0)
    PinJoint ankle_l: socket_parent_frame=LeftShank_offset socket_child_frame=LeftFoot_offset
      Coordinate ankle_angle_l: default_value=0 range=(-0.91 0.49) clamped=true
      PhysicalOffsetFrame LeftShank_offset: socket_parent=/bodyset/LeftShank translation=(0 -0.481118 0)
      PhysicalOffsetFrame LeftFoot_offset: socket_parent=/bodyset/LeftFoot translation=(0 0 0)
    PinJoint hip_r: socket_parent_frame=Pelvis_offset socket_child_frame=RightFemur_offset
      Coordinate hip_flexion_r: default_value=0 range=(-0.49 1.89) clamped=true
      PhysicalOffsetFrame Pelvis_offset: socket_parent=/bodyset/Pelvis translation=(-0.0623853 -0.0583263 0.0728399)
      PhysicalOffsetFrame RightFemur_offset: socket_parent=/bodyset/RightFemur translation=(0 0 0)
    PinJoint knee_r: socket_parent_frame=RightFemur_offset socket_child_frame=RightShank_offset
      Coordinate knee_angle_r: default_value=0 range=(-2.5 0) clamped=true
      PhysicalOffsetFrame RightFemur_offset: socket_parent=/bodyset/RightFemur translation=(0.0041 -0.41 0)
      PhysicalOffsetFrame RightShank_offset: socket_parent=/bodyset/RightShank translation=(0 0 0)
    PinJoint ankle_r: socket_parent_frame=RightShank_offset socket_child_frame=RightFoot_offset
      Coordinate ankle_angle_r: default_value=0 range=(-0.91 0.49) clamped=true
      PhysicalOffsetFrame RightShank_offset: socket_parent=/bodyset/RightShank translation=(0 -0.481118 0)
      PhysicalOffsetFrame RightFoot_offset: socket_parent=/bodyset/RightFoot translation=(0 0 0)
  ContactGeometrySet:
    ContactHalfSpace ground: socket_frame=/ground location=(0 0 0)
    ContactCapsule right_foot: socket_frame=/bodyset/RightFoot location=(0 0 0) orientation=(0 1.5707 0) radius=0.03
        length=0.05
    ContactSphere right_1: socket_frame=/bodyset/RightFoot location=(-0.085 -0.015 -0.005) radius=0.02
    ContactSphere right_2: socket_frame=/bodyset/RightFoot location=(0.0425 -0.03 0.041) radius=0.02
    ContactSphere right_3: socket_frame=/bodyset/RightFoot location=(0.085 -0.03 -0.0275) radius=0.02
    ContactCapsule left_foot: socket_frame=/bodyset/LeftFoot location=(0 0 0) orientation=(0 1.5707 0) radius=0.03
        length=0.05
    ContactSphere left_1: socket_frame=/bodyset/LeftFoot location=(-0.085 -0.015 0.005) radius=0.02
    ContactSphere left_2: socket_frame=/bodyset/LeftFoot location=(0.0425 -0.03 -0.041) radius=0.02
    ContactSphere left_3: socket_frame=/bodyset/LeftFoot location=(0.085 -0.03 0.0275) radius=0.02
    ContactCapsule Pelvis_col: socket_frame=Pelvis location=(-0.0623853 0 0) radius=0.07 length=0.06
    ContactCapsule Torso_col_1: socket_frame=Torso location=(-0.0349193 0.309569 0) orientation=(1.5707 0 0) radius=0.1
        length=0.135
    ContactSphere head_col: socket_frame=Torso location=(-0.0349193 0.689569 0) radius=0.09
    ContactCapsule right_femur_col: socket_frame=RightFemur location=(0 -0.181569 0) orientation=(1.5707 0 0)
        radius=0.05 length=0.155
    ContactCapsule left_femur_col: socket_frame=LeftFemur location=(0 -0.181569 0) orientation=(1.5707 0 0) radius=0.05
        length=0.155
    ContactCapsule right_tibia_col: socket_frame=RightShank location=(0 -0.208895 0) orientation=(1.5707 0 0)
        radius=0.04 length=0.18
    ContactCapsule left_tibia_col: socket_frame=LeftShank location=(0 -0.208895 0) orientation=(1.5707 0 0) radius=0.04
        length=0.18
