# OpenSim document version 40500
Model subject01:
  gravity: 0 -9.80665 0
  Ground
  BodySet:
    Body pelvis: mass=11.777 mass_center=(0 0 0) inertia=(0.1028 0.0871 0.0579 0 0 0)
    Body torso: mass=34.2366 mass_center=(0 0 0) inertia=(1.4745 0.7555 1.4314 0 0 0)
  JointSet:
    CustomJoint ground_pelvis: socket_parent_frame=ground_offset socket_child_frame=pelvis_offset
      Coordinate pelvis_tilt: default_value=0 range=(-1.570796 1.570796) clamped=true
      Coordinate pelvis_list: default_value=0 range=(-1.570796 1.570796) clamped=true
      Coordinate pelvis_rotation: default_value=0 range=(-1.570796 1.570796) clamped=true
      Coordinate pelvis_tx: default_value=0 range=(-5 25) clamped=true
      Coordinate pelvis_ty: default_value=0 range=(-1 2) clamped=true
      Coordinate pelvis_tz: default_value=0 range=(-3 3) clamped=true
      PhysicalOffsetFrame ground_offset: socket_parent=/ground translation=(0 0 0) [meters]
      PhysicalOffsetFrame pelvis_offset: socket_parent=/bodyset/pelvis translation=(0 0 0)
      SpatialTransform:
        TransformAxis rotation1: coordinates=pelvis_tilt axis=(0 0 1) LinearFunction(coefficients=1 0)
        TransformAxis rotation2: coordinates=pelvis_list axis=(1 0 0) LinearFunction(coefficients=1 0)
        TransformAxis rotation3: coordinates=pelvis_rotation axis=(0 1 0) LinearFunction(coefficients=1 0)
        TransformAxis translation1: coordinates=pelvis_tx axis=(1 0 0) LinearFunction(coefficients=1 0)
        TransformAxis translation2: coordinates=pelvis_ty axis=(0 1 0) LinearFunction(coefficients=1 0)
        TransformAxis translation3: coordinates=pelvis_tz axis=(0 0 1) LinearFunction(coefficients=1 0)
    PinJoint back: socket_parent_frame=pelvis_offset socket_child_frame=torso_offset
      Coordinate lumbar_bending: default_value=0 range=(-0.35 0.15) clamped=true
      PhysicalOffsetFrame pelvis_offset: socket_parent=/bodyset/pelvis translation=(0 0.05 0)
      PhysicalOffsetFrame torso_offset: socket_parent=/bodyset/torso translation=(0 -0.25 0)
  ContactGeometrySet:
    ContactHalfSpace ground: socket_frame=/ground location=(0 0 0)
    ContactCapsule pelvis_col: socket_frame=pelvis location=(0 0 0) radius=0.07 length=0.06
    ContactCapsule torso_col_1: socket_frame=torso location=(0 0 0) orientation=(1.5707 0 0) radius=0.1 length=0.135
    ContactCapsule head_col: socket_frame=torso location=(0 0.38 0) radius=0.09 length=0
