# OpenSim document version 40500
Model subject01:
  gravity: 0 -9.80665 0
  Ground
  BodySet:
    Body pelvis: mass=11.777 mass_center=(0 0 0) inertia=(0.1028 0.0871 0.0579 0 0 0)
    Body femur_r: mass=9.3014 mass_center=(0 0 0) inertia=(0.1339 0.0351 0.1412 0 0 0)
    Body tibia_r: mass=3.7075 mass_center=(0 0 0) inertia=(0.0504 0.0051 0.0511 0 0 0)
    Body calcn_r: mass=1.25 mass_center=(0 0 0) inertia=(0.0014 0.0039 0.0041 0 0 0)
    Body femur_l: mass=9.3014 mass_center=(0 0 0) inertia=(0.1339 0.0351 0.1412 0 0 0)
    Body tibia_l: mass=3.7075 mass_center=(0 0 0) inertia=(0.0504 0.0051 0.0511 0 0 0)
    Body calcn_l: mass=1.25 mass_center=(0 0 0) inertia=(0.0014 0.0039 0.0041 0 0 0)
    Body torso: mass=34.2366 mass_center=(0 0 0) inertia=(1.4745 0.7555 1.4314 0 0 0)
  JointSet:
    CustomJoint ground_pelvis: socket_parent_frame=ground_offset socket_child_frame=pelvis_offset
      Coordinate pelvis_tilt: default_value=0 range=(-1.570796 1.570796) clamped=true
      Coordinate pelvis_list: default_value=0 range=(-1.570796 1.570796) clamped=true
      Coordinate pelvis_rotation: default_value=0 range=(-1.570796 1.570796) clamped=true
      Coordinate pelvis_tx: default_value=0 range=(-5 25) clamped=true
      Coordinate pelvis_ty: default_value=0 range=(-1 2) clamped=true
      Coordinate pelvis_tz: default_value=0 range=(-3 3) clamped=true
      PhysicalOffsetFrame ground_offset: socket_parent=/ground translation=(0 0 0)
      PhysicalOffsetFrame pelvis_offset: socket_parent=/bodyset/pelvis translation=(0 0 0)
      SpatialTransform:
        TransformAxis rotation1: coordinates=pelvis_tilt axis=(0 0 1) LinearFunction(coefficients=1 0)
        TransformAxis rotation2: coordinates=pelvis_list axis=(1 0 0) LinearFunction(coefficients=1 0)
        TransformAxis rotation3: coordinates=pelvis_rotation axis=(0 1 0) LinearFunction(coefficients=1 0)
        TransformAxis translation1: coordinates=pelvis_tx axis=(1 0 0) LinearFunction(coefficients=1 0)
        TransformAxis translation2: coordinates=pelvis_ty axis=(0 1 0) LinearFunction(coefficients=1 0)
        TransformAxis translation3: coordinates=pelvis_tz axis=(0 0 1) LinearFunction(coefficients=1 0)
    BallJoint hip_r: socket_parent_frame=pelvis_offset socket_child_frame=femur_r_offset
      Coordinate hip_adduction_r: default_value=0 range=(-0.31 0.22) clamped=true
      Coordinate hip_rotation_r: default_value=0 range=(-0.49 0.2) clamped=true
      Coordinate hip_flexion_r: default_value=0 range=(-0.49 1.89) clamped=true
      PhysicalOffsetFrame pelvis_offset: socket_parent=/bodyset/pelvis translation=(0 -0.0661 0.0835)
      PhysicalOffsetFrame femur_r_offset: socket_parent=/bodyset/femur_r translation=(0 0.17 0)
    PinJoint knee_r: socket_parent_frame=femur_r_offset socket_child_frame=tibia_r_offset
      Coordinate knee_angle_r: default_value=0 range=(-2.5 0) clamped=true
      PhysicalOffsetFrame femur_r_offset: socket_parent=/bodyset/femur_r translation=(0 -0.226 0)
      PhysicalOffsetFrame tibia_r_offset: socket_parent=/bodyset/tibia_r translation=(0 0.1867 0)
    PinJoint ankle_r: socket_parent_frame=tibia_r_offset socket_child_frame=calcn_r_offset
      Coordinate ankle_angle_r: default_value=0 range=(-0.91 0.49) clamped=true
      PhysicalOffsetFrame tibia_r_offset: socket_parent=/bodyset/tibia_r translation=(0 -0.2433 0)
      PhysicalOffsetFrame calcn_r_offset: socket_parent=/bodyset/calcn_r translation=(-0.05123 0.01195 -0.00792)
    BallJoint hip_l: socket_parent_frame=pelvis_offset socket_child_frame=femur_l_offset
      Coordinate hip_adduction_l: default_value=0 range=(-0.31 0.22) clamped=true
      Coordinate hip_rotation_l: default_value=0 range=(-0.49 0.2) clamped=true
      Coordinate hip_flexion_l: default_value=0 range=(-0.49 1.89) clamped=true
      PhysicalOffsetFrame pelvis_offset: socket_parent=/bodyset/pelvis translation=(0 -0.0661 -0.0835)
      PhysicalOffsetFrame femur_l_offset: socket_parent=/bodyset/femur_l translation=(0 0.17 0)
    PinJoint knee_l: socket_parent_frame=femur_l_offset socket_child_frame=tibia_l_offset
      Coordinate knee_angle_l: default_value=0 range=(-2.5 0) clamped=true
      PhysicalOffsetFrame femur_l_offset: socket_parent=/bodyset/femur_l translation=(0 -0.226 0)
      PhysicalOffsetFrame tibia_l_offset: socket_parent=/bodyset/tibia_l translation=(0 0.1867 0)
    PinJoint ankle_l: socket_parent_frame=tibia_l_offset socket_child_frame=calcn_l_offset
      Coordinate ankle_angle_l: default_value=0 range=(-0.91 0.49) clamped=true
      PhysicalOffsetFrame tibia_l_offset: socket_parent=/bodyset/tibia_l translation=(0 -0.2433 0)
      PhysicalOffsetFrame calcn_l_offset: socket_parent=/bodyset/calcn_l translation=(-0.05123 0.01195 0.00792)
    BallJoint back: socket_parent_frame=pelvis_offset socket_child_frame=torso_offset
      Coordinate lumbar_bending: default_value=0 range=(-0.35 0.15) clamped=true
      Coordinate lumbar_rotation: default_value=0 range=(-0.15 0.21) clamped=true
      Coordinate lumbar_extension: default_value=0 range=(-0.64 0.03) clamped=true
      PhysicalOffsetFrame pelvis_offset: socket_parent=/bodyset/pelvis translation=(-0.03 0.0815 0)
      PhysicalOffsetFrame torso_offset: socket_parent=/bodyset/torso translation=(0.03 -0.32 0)
  ForceSet:
    Thelen2003Muscle [values shared by the 90 below unless stated]: FmaxTendonStrain=0.033 FmaxMuscleStrain=0.6
        KshapeActive=0.5 KshapePassive=4 Af=0.3 Flen=1.8 activation_time_constant=0.01 deactivation_time_constant=0.04
    Thelen2003Muscle glut_med1_r: max_isometric_force=819 optimal_fiber_length=0.0535 tendon_slack_length=0.078
        pennation_angle_at_optimal=0.139626
      PathPoint P1: pelvis (0.0299 0.0304 0.1209)
      PathPoint P2: femur_r (-0.0218 0.1583 0.0555)
    Thelen2003Muscle glut_med2_r: max_isometric_force=573 optimal_fiber_length=0.0845 tendon_slack_length=0.053
        pennation_angle_at_optimal=0
      PathPoint P1: pelvis (-0.0148 0.0445 0.0766)
      PathPoint P2: femur_r (-0.0258 0.1642 0.0527)
    Thelen2003Muscle glut_med3_r: max_isometric_force=653 optimal_fiber_length=0.0646 tendon_slack_length=0.053
        pennation_angle_at_optimal=0.331613
      PathPoint P1: pelvis (-0.0516 0.0105 0.0648)
      PathPoint P2: femur_r (-0.0309 0.1653 0.0518)
    Thelen2003Muscle glut_min1_r: max_isometric_force=270 optimal_fiber_length=0.068 tendon_slack_length=0.016
        pennation_angle_at_optimal=0.174533
      PathPoint P1: pelvis (0.024 -0.008 0.1056)
      PathPoint P2: femur_r (-0.0072 0.1596 0.056)
    Thelen2003Muscle glut_min2_r: max_isometric_force=285 optimal_fiber_length=0.056 tendon_slack_length=0.026
        pennation_angle_at_optimal=0
      PathPoint P1: pelvis (0.0074 -0.0065 0.0991)
      PathPoint P2: femur_r (-0.0096 0.1596 0.056)
    Thelen2003Muscle glut_min3_r: max_isometric_force=323 optimal_fiber_length=0.038 tendon_slack_length=0.051
        pennation_angle_at_optimal=0.0174533
      PathPoint P1: pelvis (-0.0127 -0.0063 0.0856)
      PathPoint P2: femur_r (-0.0135 0.1617 0.055)
    Thelen2003Muscle semimem_r: max_isometric_force=1288 optimal_fiber_length=0.069 tendon_slack_length=0.34
        pennation_angle_at_optimal=0.263545
      PathPoint P1: pelvis (-0.0485 -0.09747 0.07151)
      PathPoint P2: tibia_r (-0.03 0.1557 -0.02)
    Thelen2003Muscle semiten_r: max_isometric_force=410 optimal_fiber_length=0.193 tendon_slack_length=0.262
        pennation_angle_at_optimal=0.225147
      PathPoint P1: pelvis (-0.05565 -0.10988 0.06039)
      PathPoint P2: tibia_r (-0.033 0.1487 -0.023)
      PathPoint P3: tibia_r (-0.0113 0.1121 -0.0245)
      PathPoint P4: tibia_r (0.0027 0.0911 -0.0193)
    Thelen2003Muscle bifemlh_r: max_isometric_force=896 optimal_fiber_length=0.0976 tendon_slack_length=0.325
        pennation_angle_at_optimal=0.202458
      PathPoint P1: pelvis (-0.05526 -0.10257 0.06944)
      PathPoint P2: tibia_r (-0.028 0.1667 0.02943)
      PathPoint P3: tibia_r (-0.021 0.1467 0.0343)
    Thelen2003Muscle bifemsh_r: max_isometric_force=804 optimal_fiber_length=0.1103 tendon_slack_length=0.1
        pennation_angle_at_optimal=0.214675
      PathPoint P1: femur_r (0.005 -0.0411 0.0234)
      PathPoint P2: tibia_r (-0.028 0.1667 0.02943)
      PathPoint P3: tibia_r (-0.021 0.1467 0.0343)
    Thelen2003Muscle sar_r: max_isometric_force=156 optimal_fiber_length=0.475 tendon_slack_length=0.064
        pennation_angle_at_optimal=0
      PathPoint P1: pelvis (0.0554 -0.0013 0.1242)
      PathPoint P2: tibia_r (0 0.1657 -0.0399)
    Thelen2003Muscle add_long_r: max_isometric_force=627 optimal_fiber_length=0.138 tendon_slack_length=0.11
        pennation_angle_at_optimal=0.10472
      PathPoint P1: pelvis (0.0391 -0.0836 0.0169)
      PathPoint P2: femur_r (0.005 -0.0411 0.0234)
    Thelen2003Muscle add_brev_r: max_isometric_force=429 optimal_fiber_length=0.133 tendon_slack_length=0.02
        pennation_angle_at_optimal=0
      PathPoint P1: pelvis (0.012 -0.0915 0.0164)
      PathPoint P2: femur_r (0.0009 0.0504 0.0294)
    Thelen2003Muscle add_mag1_r: max_isometric_force=381 optimal_fiber_length=0.087 tendon_slack_length=0.06
        pennation_angle_at_optimal=0.0872665
      PathPoint P1: pelvis (-0.0025 -0.1174 0.0255)
      PathPoint P2: femur_r (-0.0045 0.0489 0.0339)
    Thelen2003Muscle add_mag2_r: max_isometric_force=343 optimal_fiber_length=0.121 tendon_slack_length=0.12
        pennation_angle_at_optimal=0.0523599
      PathPoint P1: pelvis (-0.0124 -0.1192 0.0308)
      PathPoint P2: femur_r (0.0054 -0.0585 0.0227)
    Thelen2003Muscle add_mag3_r: max_isometric_force=488 optimal_fiber_length=0.131 tendon_slack_length=0.249
        pennation_angle_at_optimal=0.0872665
      PathPoint P1: pelvis (-0.04038 -0.11413 0.04882)
      PathPoint P2: femur_r (0.007 -0.2137 -0.0266)
    Thelen2003Muscle tfl_r: max_isometric_force=233 optimal_fiber_length=0.098 tendon_slack_length=0.407
        pennation_angle_at_optimal=0.0523599
      PathPoint P1: pelvis (0.0396 0.01 0.135)
      PathPoint P2: tibia_r (0.001 0.1882 0.037)
      PathPoint P3: tibia_r (0.006 0.138 0.035)
    Thelen2003Muscle pect_r: max_isometric_force=266 optimal_fiber_length=0.1 tendon_slack_length=0.033
        pennation_angle_at_optimal=0
      PathPoint P1: pelvis (0.0276 -0.0768 0.0451)
      PathPoint P2: femur_r (-0.0122 0.0878 0.0253)
    Thelen2003Muscle grac_r: max_isometric_force=162 optimal_fiber_length=0.345 tendon_slack_length=0.069
        pennation_angle_at_optimal=0.0523599
      PathPoint P1: pelvis (-0.00331 -0.1187 0.02794)
      PathPoint P2: tibia_r (-0.021 0.1547 -0.03774)
    Thelen2003Muscle glut_max1_r: max_isometric_force=573 optimal_fiber_length=0.142 tendon_slack_length=0.125
        pennation_angle_at_optimal=0.0872665
      PathPoint P1: pelvis (-0.0488 0.0612 0.07)
      PathPoint P2: pelvis (-0.0584 0.0012 0.0886)
      PathPoint P3: femur_r (-0.0457 0.1452 0.0392)
      PathPoint P4: femur_r (-0.0277 0.1134 0.047)
    Thelen2003Muscle glut_max2_r: max_isometric_force=819 optimal_fiber_length=0.147 tendon_slack_length=0.127
        pennation_angle_at_optimal=0
      PathPoint P1: pelvis (-0.0642 0.0176 0.0563)
      PathPoint P2: pelvis (-0.0669 -0.052 0.0914)
      PathPoint P3: femur_r (-0.0426 0.117 0.0293)
      PathPoint P4: femur_r (-0.0156 0.0684 0.0419)
    Thelen2003Muscle glut_max3_r: max_isometric_force=552 optimal_fiber_length=0.144 tendon_slack_length=0.145
        pennation_angle_at_optimal=0.0872665
      PathPoint P1: pelvis (-0.0849 -0.0314 0.0058)
      PathPoint P2: pelvis (-0.0822 -0.1052 0.0403)
      PathPoint P3: femur_r (-0.0299 0.0659 0.0135)
      PathPoint P4: femur_r (-0.006 0.0281 0.0411)
    Thelen2003Muscle iliacus_r: max_isometric_force=1073 optimal_fiber_length=0.1066 tendon_slack_length=0.0934
        pennation_angle_at_optimal=0.279914
      PathPoint P1: pelvis (0.0033 0.0365 0.0854)
      PathPoint P2: pelvis (0.0407 -0.01 0.081)
      PathPoint P3: femur_r (0.025 0.135 0.008)
      PathPoint P4: femur_r (-0.0193 0.1079 0.0129)
    Thelen2003Muscle psoas_r: max_isometric_force=1113 optimal_fiber_length=0.1169 tendon_slack_length=0.197
        pennation_angle_at_optimal=0.215525
      PathPoint P1: torso (0.045 -0.24 0.02)
      PathPoint P2: pelvis (0.0407 -0.01 0.07)
      PathPoint P3: femur_r (0.025 0.135 0.0038)
      PathPoint P4: femur_r (-0.0188 0.1103 0.0104)
    Thelen2003Muscle quad_fem_r: max_isometric_force=381 optimal_fiber_length=0.054 tendon_slack_length=0.024
        pennation_angle_at_optimal=0
      PathPoint P1: pelvis (-0.0436 -0.1151 0.052)
      PathPoint P2: femur_r (-0.0381 0.1341 0.0366)
    Thelen2003Muscle gem_r: max_isometric_force=164 optimal_fiber_length=0.024 tendon_slack_length=0.039
        pennation_angle_at_optimal=0
      PathPoint P1: pelvis (-0.0426 -0.082 0.0714)
      PathPoint P2: femur_r (-0.0142 0.1667 0.0443)
    Thelen2003Muscle peri_r: max_isometric_force=444 optimal_fiber_length=0.026 tendon_slack_length=0.115
        pennation_angle_at_optimal=0.174533
      PathPoint P1: pelvis (-0.0689 0.0003 0.0235)
      PathPoint P2: pelvis (-0.0486 -0.0276 0.0657)
      PathPoint P3: femur_r (-0.0148 0.1664 0.0437)
    Thelen2003Muscle rect_fem_r: max_isometric_force=1169 optimal_fiber_length=0.114 tendon_slack_length=0.305
        pennation_angle_at_optimal=0.0872665
      PathPoint P1: pelvis (0.0412 -0.0311 0.0968)
      PathPoint P2: femur_r (0.038 -0.17 0.004)
      PathPoint P3: tibia_r (0.04 0.2117 0.0018)
    Thelen2003Muscle vas_lat_r: max_isometric_force=1871 optimal_fiber_length=0.0994 tendon_slack_length=0.116
        pennation_angle_at_optimal=0.252867
      PathPoint P1: femur_r (0.0048 -0.0154 0.0349)
      PathPoint P2: femur_r (0.036 -0.17 0.0229)
      PathPoint P3: tibia_r (0.04 0.2087 0.016)
    Thelen2003Muscle vas_int_r: max_isometric_force=1365 optimal_fiber_length=0.0993 tendon_slack_length=0.101
        pennation_angle_at_optimal=0.0631
      PathPoint P1: femur_r (0.029 -0.0224 0.031)
      PathPoint P2: femur_r (0.038 -0.17 0.007)
      PathPoint P3: tibia_r (0.04 0.2117 0.0018)
    Thelen2003Muscle vas_med_r: max_isometric_force=1294 optimal_fiber_length=0.0968 tendon_slack_length=0.1
        pennation_angle_at_optimal=0.422223
      PathPoint P1: femur_r (0.014 -0.0399 0.0188)
      PathPoint P2: femur_r (0.037 -0.167 -0.008)
      PathPoint P3: tibia_r (0.04 0.2087 -0.012)
    Thelen2003Muscle gas_lat_r: max_isometric_force=683 optimal_fiber_length=0.066 tendon_slack_length=0.384
        pennation_angle_at_optimal=0.139626
      PathPoint P1: femur_r (-0.02 -0.218 0.0272)
      PathPoint P2: calcn_r (-0.1 0.001 -0.0053)
    Thelen2003Muscle gas_med_r: max_isometric_force=1558 optimal_fiber_length=0.06 tendon_slack_length=0.39
        pennation_angle_at_optimal=0.296706
      PathPoint P1: femur_r (-0.02 -0.218 -0.024)
      PathPoint P2: calcn_r (-0.1 0.001 -0.0053)
    Thelen2003Muscle soleus_r: max_isometric_force=3549 optimal_fiber_length=0.05 tendon_slack_length=0.25
        pennation_angle_at_optimal=0.436332
      PathPoint P1: tibia_r (-0.0024 0.0334 0.0071)
      PathPoint P2: calcn_r (-0.1 0.001 -0.0053)
    Thelen2003Muscle tib_post_r: max_isometric_force=1588 optimal_fiber_length=0.031 tendon_slack_length=0.31
        pennation_angle_at_optimal=0.20944
      PathPoint P1: tibia_r (-0.0094 0.0519 0.0019)
      PathPoint P2: tibia_r (-0.0144 -0.2184 -0.0229)
      PathPoint P3: calcn_r (-0.0583 0.0034 -0.0286)
      PathPoint P4: calcn_r (-0.0228 -0.0141 -0.0281)
    Thelen2003Muscle tib_ant_r: max_isometric_force=1067 optimal_fiber_length=0.098 tendon_slack_length=0.223
        pennation_angle_at_optimal=0.0872665
      PathPoint P1: tibia_r (0.0179 0.0243 0.0115)
      PathPoint P2: tibia_r (0.0329 -0.2084 -0.0177)
      PathPoint P3: calcn_r (0.0166 -0.0122 -0.0305)
    Thelen2003Muscle per_brev_r: max_isometric_force=435 optimal_fiber_length=0.05 tendon_slack_length=0.161
        pennation_angle_at_optimal=0.0872665
      PathPoint P1: tibia_r (-0.007 -0.0779 0.0325)
      PathPoint P2: tibia_r (-0.0198 -0.2317 0.0283)
      PathPoint P3: tibia_r (-0.0144 -0.2428 0.0289)
      PathPoint P4: calcn_r (-0.0529 -0.003 0.0233)
      PathPoint P5: calcn_r (-0.0323 -0.0081 0.0343)
    Thelen2003Muscle per_long_r: max_isometric_force=943 optimal_fiber_length=0.049 tendon_slack_length=0.345
        pennation_angle_at_optimal=0.174533
      PathPoint P1: tibia_r (0.0005 0.0299 0.0362)
      PathPoint P2: tibia_r (-0.0207 -0.2338 0.0286)
      PathPoint P3: tibia_r (-0.0162 -0.2452 0.0289)
      PathPoint P4: calcn_r (-0.0562 -0.007 0.0221)
      PathPoint P5: calcn_r (-0.0319 -0.0194 0.0284)
      PathPoint P6: calcn_r (-0.0148 -0.0231 0.0118)
      PathPoint P7: calcn_r (0.0203 -0.0215 -0.0184)
    Thelen2003Muscle per_tert_r: max_isometric_force=180 optimal_fiber_length=0.079 tendon_slack_length=0.1
        pennation_angle_at_optimal=0.226893
      PathPoint P1: tibia_r (0.001 -0.0937 0.0231)
      PathPoint P2: tibia_r (0.0229 -0.2202 0.0159)
      PathPoint P3: calcn_r (-0.0143 -0.0072 0.0299)
    Thelen2003Muscle ext_dig_r: max_isometric_force=512 optimal_fiber_length=0.102 tendon_slack_length=0.345
        pennation_angle_at_optimal=0.139626
      PathPoint P1: tibia_r (0.0032 0.0486 0.0276)
      PathPoint P2: tibia_r (0.0289 -0.214 0.0072)
      PathPoint P3: calcn_r (-0.0078 0.0088 -0.0001)
      PathPoint P4: calcn_r (0.0616 -0.0245 0.013)
      PathPoint P5: calcn_r (0.0791 -0.0273 0.01638)
      PathPoint P6: calcn_r (0.1231 -0.0324 0.02608)
    Thelen2003Muscle glut_med1_l: max_isometric_force=819 optimal_fiber_length=0.0535 tendon_slack_length=0.078
        pennation_angle_at_optimal=0.139626
      PathPoint P1: pelvis (0.0299 0.0304 -0.1209)
      PathPoint P2: femur_l (-0.0218 0.1583 -0.0555)
    Thelen2003Muscle glut_med2_l: max_isometric_force=573 optimal_fiber_length=0.0845 tendon_slack_length=0.053
        pennation_angle_at_optimal=0
      PathPoint P1: pelvis (-0.0148 0.0445 -0.0766)
      PathPoint P2: femur_l (-0.0258 0.1642 -0.0527)
    Thelen2003Muscle glut_med3_l: max_isometric_force=653 optimal_fiber_length=0.0646 tendon_slack_length=0.053
        pennation_angle_at_optimal=0.331613
      PathPoint P1: pelvis (-0.0516 0.0105 -0.0648)
      PathPoint P2: femur_l (-0.0309 0.1653 -0.0518)
    Thelen2003Muscle glut_min1_l: max_isometric_force=270 optimal_fiber_length=0.068 tendon_slack_length=0.016
        pennation_angle_at_optimal=0.174533
      PathPoint P1: pelvis (0.024 -0.008 -0.1056)
      PathPoint P2: femur_l (-0.0072 0.1596 -0.056)
    Thelen2003Muscle glut_min2_l: max_isometric_force=285 optimal_fiber_length=0.056 tendon_slack_length=0.026
        pennation_angle_at_optimal=0
      PathPoint P1: pelvis (0.0074 -0.0065 -0.0991)
      PathPoint P2: femur_l (-0.0096 0.1596 -0.056)
    Thelen2003Muscle glut_min3_l: max_isometric_force=323 optimal_fiber_length=0.038 tendon_slack_length=0.051
        pennation_angle_at_optimal=0.0174533
      PathPoint P1: pelvis (-0.0127 -0.0063 -0.0856)
      PathPoint P2: femur_l (-0.0135 0.1617 -0.055)
    Thelen2003Muscle semimem_l: max_isometric_force=1288 optimal_fiber_length=0.069 tendon_slack_length=0.34
        pennation_angle_at_optimal=0.263545
      PathPoint P1: pelvis (-0.0485 -0.09747 -0.07151)
      PathPoint P2: tibia_l (-0.03 0.1557 0.02)
    Thelen2003Muscle semiten_l: max_isometric_force=410 optimal_fiber_length=0.193 tendon_slack_length=0.262
        pennation_angle_at_optimal=0.225147
      PathPoint P1: pelvis (-0.05565 -0.10988 -0.06039)
      PathPoint P2: tibia_l (-0.033 0.1487 0.023)
      PathPoint P3: tibia_l (-0.0113 0.1121 0.0245)
      PathPoint P4: tibia_l (0.0027 0.0911 0.0193)
    Thelen2003Muscle bifemlh_l: max_isometric_force=896 optimal_fiber_length=0.0976 tendon_slack_length=0.325
        pennation_angle_at_optimal=0.202458
      PathPoint P1: pelvis (-0.05526 -0.10257 -0.06944)
      PathPoint P2: tibia_l (-0.028 0.1667 -0.02943)
      PathPoint P3: tibia_l (-0.021 0.1467 -0.0343)
    Thelen2003Muscle bifemsh_l: max_isometric_force=804 optimal_fiber_length=0.1103 tendon_slack_length=0.1
        pennation_angle_at_optimal=0.214675
      PathPoint P1: femur_l (0.005 -0.0411 -0.0234)
      PathPoint P2: tibia_l (-0.028 0.1667 -0.02943)
      PathPoint P3: tibia_l (-0.021 0.1467 -0.0343)
    Thelen2003Muscle sar_l: max_isometric_force=156 optimal_fiber_length=0.475 tendon_slack_length=0.064
        pennation_angle_at_optimal=0
      PathPoint P1: pelvis (0.0554 -0.0013 -0.1242)
      PathPoint P2: tibia_l (0 0.1657 0.0399)
    Thelen2003Muscle add_long_l: max_isometric_force=627 optimal_fiber_length=0.138 tendon_slack_length=0.11
        pennation_angle_at_optimal=0.10472
      PathPoint P1: pelvis (0.0391 -0.0836 -0.0169)
      PathPoint P2: femur_l (0.005 -0.0411 -0.0234)
    Thelen2003Muscle add_brev_l: max_isometric_force=429 optimal_fiber_length=0.133 tendon_slack_length=0.02
        pennation_angle_at_optimal=0
      PathPoint P1: pelvis (0.012 -0.0915 -0.0164)
      PathPoint P2: femur_l (0.0009 0.0504 -0.0294)
    Thelen2003Muscle add_mag1_l: max_isometric_force=381 optimal_fiber_length=0.087 tendon_slack_length=0.06
        pennation_angle_at_optimal=0.0872665
      PathPoint P1: pelvis (-0.0025 -0.1174 -0.0255)
      PathPoint P2: femur_l (-0.0045 0.0489 -0.0339)
    Thelen2003Muscle add_mag2_l: max_isometric_force=343 optimal_fiber_length=0.121 tendon_slack_length=0.12
        pennation_angle_at_optimal=0.0523599
      PathPoint P1: pelvis (-0.0124 -0.1192 -0.0308)
      PathPoint P2: femur_l (0.0054 -0.0585 -0.0227)
    Thelen2003Muscle add_mag3_l: max_isometric_force=488 optimal_fiber_length=0.131 tendon_slack_length=0.249
        pennation_angle_at_optimal=0.0872665
      PathPoint P1: pelvis (-0.04038 -0.11413 -0.04882)
      PathPoint P2: femur_l (0.007 -0.2137 0.0266)
    Thelen2003Muscle tfl_l: max_isometric_force=233 optimal_fiber_length=0.098 tendon_slack_length=0.407
        pennation_angle_at_optimal=0.0523599
      PathPoint P1: pelvis (0.0396 0.01 -0.135)
      PathPoint P2: tibia_l (0.001 0.1882 -0.037)
      PathPoint P3: tibia_l (0.006 0.138 -0.035)
    Thelen2003Muscle pect_l: max_isometric_force=266 optimal_fiber_length=0.1 tendon_slack_length=0.033
        pennation_angle_at_optimal=0
      PathPoint P1: pelvis (0.0276 -0.0768 -0.0451)
      PathPoint P2: femur_l (-0.0122 0.0878 -0.0253)
    Thelen2003Muscle grac_l: max_isometric_force=162 optimal_fiber_length=0.345 tendon_slack_length=0.069
        pennation_angle_at_optimal=0.0523599
      PathPoint P1: pelvis (-0.00331 -0.1187 -0.02794)
      PathPoint P2: tibia_l (-0.021 0.1547 0.03774)
    Thelen2003Muscle glut_max1_l: max_isometric_force=573 optimal_fiber_length=0.142 tendon_slack_length=0.125
        pennation_angle_at_optimal=0.0872665
      PathPoint P1: pelvis (-0.0488 0.0612 -0.07)
      PathPoint P2: pelvis (-0.0584 0.0012 -0.0886)
      PathPoint P3: femur_l (-0.0457 0.1452 -0.0392)
      PathPoint P4: femur_l (-0.0277 0.1134 -0.047)
    Thelen2003Muscle glut_max2_l: max_isometric_force=819 optimal_fiber_length=0.147 tendon_slack_length=0.127
        pennation_angle_at_optimal=0
      PathPoint P1: pelvis (-0.0642 0.0176 -0.0563)
      PathPoint P2: pelvis (-0.0669 -0.052 -0.0914)
      PathPoint P3: femur_l (-0.0426 0.117 -0.0293)
      PathPoint P4: femur_l (-0.0156 0.0684 -0.0419)
    Thelen2003Muscle glut_max3_l: max_isometric_force=552 optimal_fiber_length=0.144 tendon_slack_length=0.145
        pennation_angle_at_optimal=0.0872665
      PathPoint P1: pelvis (-0.0849 -0.0314 -0.0058)
      PathPoint P2: pelvis (-0.0822 -0.1052 -0.0403)
      PathPoint P3: femur_l (-0.0299 0.0659 -0.0135)
      PathPoint P4: femur_l (-0.006 0.0281 -0.0411)
    Thelen2003Muscle iliacus_l: max_isometric_force=1073 optimal_fiber_length=0.1066 tendon_slack_length=0.0934
        pennation_angle_at_optimal=0.279914
      PathPoint P1: pelvis (0.0033 0.0365 -0.0854)
      PathPoint P2: pelvis (0.0407 -0.01 -0.081)
      PathPoint P3: femur_l (0.025 0.135 -0.008)
      PathPoint P4: femur_l (-0.0193 0.1079 -0.0129)
    Thelen2003Muscle psoas_l: max_isometric_force=1113 optimal_fiber_length=0.1169 tendon_slack_length=0.197
        pennation_angle_at_optimal=0.215525
      PathPoint P1: torso (0.045 -0.24 -0.02)
      PathPoint P2: pelvis (0.0407 -0.01 -0.07)
      PathPoint P3: femur_l (0.025 0.135 -0.0038)
      PathPoint P4: femur_l (-0.0188 0.1103 -0.0104)
    Thelen2003Muscle quad_fem_l: max_isometric_force=381 optimal_fiber_length=0.054 tendon_slack_length=0.024
        pennation_angle_at_optimal=0
      PathPoint P1: pelvis (-0.0436 -0.1151 -0.052)
      PathPoint P2: femur_l (-0.0381 0.1341 -0.0366)
    Thelen2003Muscle gem_l: max_isometric_force=164 optimal_fiber_length=0.024 tendon_slack_length=0.039
        pennation_angle_at_optimal=0
      PathPoint P1: pelvis (-0.0426 -0.082 -0.0714)
      PathPoint P2: femur_l (-0.0142 0.1667 -0.0443)
    Thelen2003Muscle peri_l: max_isometric_force=444 optimal_fiber_length=0.026 tendon_slack_length=0.115
        pennation_angle_at_optimal=0.174533
      PathPoint P1: pelvis (-0.0689 0.0003 -0.0235)
      PathPoint P2: pelvis (-0.0486 -0.0276 -0.0657)
      PathPoint P3: femur_l (-0.0148 0.1664 -0.0437)
    Thelen2003Muscle rect_fem_l: max_isometric_force=1169 optimal_fiber_length=0.114 tendon_slack_length=0.305
        pennation_angle_at_optimal=0.0872665
      PathPoint P1: pelvis (0.0412 -0.0311 -0.0968)
      PathPoint P2: femur_l (0.038 -0.17 -0.004)
      PathPoint P3: tibia_l (0.04 0.2117 -0.0018)
    Thelen2003Muscle vas_lat_l: max_isometric_force=1871 optimal_fiber_length=0.0994 tendon_slack_length=0.116
        pennation_angle_at_optimal=0.252867
      PathPoint P1: femur_l (0.0048 -0.0154 -0.0349)
      PathPoint P2: femur_l (0.036 -0.17 -0.0229)
      PathPoint P3: tibia_l (0.04 0.2087 -0.016)
    Thelen2003Muscle vas_int_l: max_isometric_force=1365 optimal_fiber_length=0.0993 tendon_slack_length=0.101
        pennation_angle_at_optimal=0.0631
      PathPoint P1: femur_l (0.029 -0.0224 -0.031)
      PathPoint P2: femur_l (0.038 -0.17 -0.007)
      PathPoint P3: tibia_l (0.04 0.2117 -0.0018)
    Thelen2003Muscle vas_med_l: max_isometric_force=1294 optimal_fiber_length=0.0968 tendon_slack_length=0.1
        pennation_angle_at_optimal=0.422223
      PathPoint P1: femur_l (0.014 -0.0399 -0.0188)
      PathPoint P2: femur_l (0.037 -0.167 0.008)
      PathPoint P3: tibia_l (0.04 0.2087 0.012)
    Thelen2003Muscle gas_lat_l: max_isometric_force=683 optimal_fiber_length=0.066 tendon_slack_length=0.384
        pennation_angle_at_optimal=0.139626
      PathPoint P1: femur_l (-0.02 -0.218 -0.0272)
      PathPoint P2: calcn_l (-0.1 0.001 0.0053)
    Thelen2003Muscle gas_med_l: max_isometric_force=1558 optimal_fiber_length=0.06 tendon_slack_length=0.39
        pennation_angle_at_optimal=0.296706
      PathPoint P1: femur_l (-0.02 -0.218 0.024)
      PathPoint P2: calcn_l (-0.1 0.001 0.0053)
    Thelen2003Muscle soleus_l: max_isometric_force=3549 optimal_fiber_length=0.05 tendon_slack_length=0.25
        pennation_angle_at_optimal=0.436332
      PathPoint P1: tibia_l (-0.0024 0.0334 -0.0071)
      PathPoint P2: calcn_l (-0.1 0.001 0.0053)
    Thelen2003Muscle tib_post_l: max_isometric_force=1588 optimal_fiber_length=0.031 tendon_slack_length=0.31
        pennation_angle_at_optimal=0.20944
      PathPoint P1: tibia_l (-0.0094 0.0519 -0.0019)
      PathPoint P2: tibia_l (-0.0144 -0.2184 0.0229)
      PathPoint P3: calcn_l (-0.0583 0.0034 0.0286)
      PathPoint P4: calcn_l (-0.0228 -0.0141 0.0281)
    Thelen2003Muscle tib_ant_l: max_isometric_force=1067 optimal_fiber_length=0.098 tendon_slack_length=0.223
        pennation_angle_at_optimal=0.0872665
      PathPoint P1: tibia_l (0.0179 0.0243 -0.0115)
      PathPoint P2: tibia_l (0.0329 -0.2084 0.0177)
      PathPoint P3: calcn_l (0.0166 -0.0122 0.0305)
    Thelen2003Muscle per_brev_l: max_isometric_force=435 optimal_fiber_length=0.05 tendon_slack_length=0.161
        pennation_angle_at_optimal=0.0872665
      PathPoint P1: tibia_l (-0.007 -0.0779 -0.0325)
      PathPoint P2: tibia_l (-0.0198 -0.2317 -0.0283)
      PathPoint P3: tibia_l (-0.0144 -0.2428 -0.0289)
      PathPoint P4: calcn_l (-0.0529 -0.003 -0.0233)
      PathPoint P5: calcn_l (-0.0323 -0.0081 -0.0343)
    Thelen2003Muscle per_long_l: max_isometric_force=943 optimal_fiber_length=0.049 tendon_slack_length=0.345
        pennation_angle_at_optimal=0.174533
      PathPoint P1: tibia_l (0.0005 0.0299 -0.0362)
      PathPoint P2: tibia_l (-0.0207 -0.2338 -0.0286)
      PathPoint P3: tibia_l (-0.0162 -0.2452 -0.0289)
      PathPoint P4: calcn_l (-0.0562 -0.007 -0.0221)
      PathPoint P5: calcn_l (-0.0319 -0.0194 -0.0284)
      PathPoint P6: calcn_l (-0.0148 -0.0231 -0.0118)
      PathPoint P7: calcn_l (0.0203 -0.0215 0.0184)
    Thelen2003Muscle per_tert_l: max_isometric_force=180 optimal_fiber_length=0.079 tendon_slack_length=0.1
        pennation_angle_at_optimal=0.226893
      PathPoint P1: tibia_l (0.001 -0.0937 -0.0231)
      PathPoint P2: tibia_l (0.0229 -0.2202 -0.0159)
      PathPoint P3: calcn_l (-0.0143 -0.0072 -0.0299)
    Thelen2003Muscle ext_dig_l: max_isometric_force=512 optimal_fiber_length=0.102 tendon_slack_length=0.345
        pennation_angle_at_optimal=0.139626
      PathPoint P1: tibia_l (0.0032 0.0486 -0.0276)
      PathPoint P2: tibia_l (0.0289 -0.214 -0.0072)
      PathPoint P3: calcn_l (-0.0078 0.0088 0.0001)
      PathPoint P4: calcn_l (0.0616 -0.0245 -0.013)
      PathPoint P5: calcn_l (0.0791 -0.0273 -0.01638)
      PathPoint P6: calcn_l (0.1231 -0.0324 -0.02608)
    Thelen2003Muscle int_obl_r: max_isometric_force=900 optimal_fiber_length=0.1 tendon_slack_length=0.1
        pennation_angle_at_optimal=0
      PathPoint P1: pelvis (0.0307 0.07 0.1157)
      PathPoint P2: torso (0.1 -0.16 0.015)
    Thelen2003Muscle ext_obl_r: max_isometric_force=900 optimal_fiber_length=0.12 tendon_slack_length=0.14
        pennation_angle_at_optimal=0
      PathPoint P1: pelvis (0.0407 -0.0636 0.01)
      PathPoint P2: torso (0.095 -0.21 0.11)
    Thelen2003Muscle erec_sp_r: max_isometric_force=1145 optimal_fiber_length=0.12 tendon_slack_length=0.064
        pennation_angle_at_optimal=0.24086
      PathPoint P1: pelvis (-0.0793 0.0419 0.02)
      PathPoint P2: pelvis (-0.0783 0.075 0.02)
      PathPoint P3: torso (-0.019 -0.3 0.019)
      PathPoint P4: torso (-0.03 -0.18 0.015)
    Thelen2003Muscle quad_lumb_r: max_isometric_force=298 optimal_fiber_length=0.1 tendon_slack_length=0.067
        pennation_angle_at_optimal=0
      PathPoint P1: pelvis (-0.0403 0.08 0.065)
      PathPoint P2: torso (-0.02 -0.175 0.05)
    Thelen2003Muscle rect_abd_r: max_isometric_force=263 optimal_fiber_length=0.333 tendon_slack_length=0.082
        pennation_angle_at_optimal=0
      PathPoint P1: pelvis (0.0457 -0.072 0.023)
      PathPoint P2: pelvis (0.0677 0.02 0.026)
      PathPoint P3: torso (0.13 -0.14 0.027)
      PathPoint P4: torso (0.115 -0.08 0.028)
    Thelen2003Muscle int_obl_l: max_isometric_force=900 optimal_fiber_length=0.1 tendon_slack_length=0.1
        pennation_angle_at_optimal=0
      PathPoint P1: pelvis (0.0307 0.07 -0.1157)
      PathPoint P2: torso (0.1 -0.16 -0.015)
    Thelen2003Muscle ext_obl_l: max_isometric_force=900 optimal_fiber_length=0.12 tendon_slack_length=0.14
        pennation_angle_at_optimal=0
      PathPoint P1: pelvis (0.0407 -0.0636 -0.01)
      PathPoint P2: torso (0.095 -0.21 -0.11)
    Thelen2003Muscle erec_sp_l: max_isometric_force=1145 optimal_fiber_length=0.12 tendon_slack_length=0.064
        pennation_angle_at_optimal=0.24086
      PathPoint P1: pelvis (-0.0793 0.0419 -0.02)
      PathPoint P2: pelvis (-0.0783 0.075 -0.02)
      PathPoint P3: torso (-0.019 -0.3 -0.019)
      PathPoint P4: torso (-0.03 -0.18 -0.015)
    Thelen2003Muscle quad_lumb_l: max_isometric_force=298 optimal_fiber_length=0.1 tendon_slack_length=0.067
        pennation_angle_at_optimal=0
      PathPoint P1: pelvis (-0.0403 0.08 -0.065)
      PathPoint P2: torso (-0.02 -0.175 -0.05)
    Thelen2003Muscle rect_abd_l: max_isometric_force=263 optimal_fiber_length=0.333 tendon_slack_length=0.082
        pennation_angle_at_optimal=0
      PathPoint P1: pelvis (0.0457 -0.072 -0.023)
      PathPoint P2: pelvis (0.0677 0.02 -0.026)
      PathPoint P3: torso (0.13 -0.14 -0.027)
      PathPoint P4: torso (0.115 -0.08 -0.028)
  ContactGeometrySet:
    ContactSphere heel_r: socket_frame=/bodyset/calcn_r location=(-0.085 -0.015 -0.005) radius=0.03
    ContactSphere toe_lat_r: socket_frame=/bodyset/calcn_r location=(0.0425 -0.03 0.041) radius=0.02
    ContactSphere toe_med_r: socket_frame=/bodyset/calcn_r location=(0.085 -0.03 -0.0275) radius=0.02
    ContactSphere heel_l: socket_frame=/bodyset/calcn_l location=(-0.085 -0.015 0.005) radius=0.03
    ContactSphere toe_lat_l: socket_frame=/bodyset/calcn_l location=(0.0425 -0.03 -0.041) radius=0.02
    ContactSphere toe_med_l: socket_frame=/bodyset/calcn_l location=(0.085 -0.03 0.0275) radius=0.02
    ContactEllipsoid upper_leg_r_capsule: socket_frame=/bodyset/femur_r location=(0 -0.04 0.01)
        orientation=(1.5707 0 0) radii=(0.05 0.185 0.05)
    ContactEllipsoid lower_leg_r_capsule: socket_frame=/bodyset/tibia_r location=(0 -0.05 0) orientation=(1.5707 0 0)
        radii=(0.04 0.175 0.04)
    ContactEllipsoid upper_leg_l_capsule: socket_frame=/bodyset/femur_l location=(0 -0.04 -0.01)
        orientation=(1.5707 0 0) radii=(0.05 0.185 0.05)
    ContactEllipsoid lower_leg_l_capsule: socket_frame=/bodyset/tibia_l location=(0 -0.05 0) orientation=(1.5707 0 0)
        radii=(0.04 0.175 0.04)
    ContactEllipsoid lower_trunk_capsule: socket_frame=/bodyset/pelvis location=(-0.01 -0.01 0) radii=(0.1 0.06 0.1)
    ContactEllipsoid belly_capsule: socket_frame=/bodyset/torso location=(0.05 -0.27 0) radii=(0.1 0.05 0.1)
    ContactEllipsoid middle_trunk_capsule: socket_frame=/bodyset/torso location=(0.04 -0.15 0) radii=(0.1 0.06 0.1)
    ContactEllipsoid upper_trunk_capsule: socket_frame=/bodyset/torso location=(0.03 -0.01 0) radii=(0.11 0.065 0.11)
    ContactSphere head: socket_frame=/bodyset/torso location=(0.04 0.24 0) radius=0.1
