# OpenSim document version 40500
Model subject01:
  gravity: 0 -9.80665 0
  length_units: meters
  force_units: N
  credits:
    Delp S.L., Loan J.P., Hoy M.G., Zajac F.E., Topp E.L., Rosen J.M., Thelen D.G., Anderson F.C., Seth A., Hamner S.R.
  publications:
    Notes: 3D, 23 DOF gait model created by D.G. Thelen, Univ. of Wisconsin-Madison, and Samuel Hamner, Ajay Seth, Frank C. Anderson, and Scott L. Delp, Stanford University. Lower extremity joint defintions based on Delp et al. (1990). Low back joint and anthropometry based on Anderson and Pandy (1999, 2001). Planar knee model of Yamaguchi and Zajac (1989). Seth removed the patella to avoid kinematic constraints; insertions of the quadrucepts are handled with moving points in the tibia frame. Hamner added arms adapted from Holzbaur et al., 2005. Hamner, S.R., Seth, A, Delp, S.L.: Muscle contributions to propulsion and support during running. Journal of Biomechanics, 2010. Delp, S.L., Loan, J.P., Hoy, M.G., Zajac, F.E., Topp E.L., Rosen, J.M.: An interactive graphics-based model of the lower extremity to study orthopaedic surgical procedures, IEEE Transactions on Biomedical Engineering, vol. 37, pp. 757-767, 1990. Yamaguchi G.T., Zajac F.E.: A planar model of the knee joint to characterize the knee extensor mechanism." J . Biomech. vol. 21. pp. 1-10. 1989. Anderson F.C., Pandy M.G.: A dynamic optimization solution for vertical jumping in three dimensions. Computer Methods in Biomechanics and Biomedical Engineering 2:201-231, 1999. Anderson F.C., Pandy M.G.: Dynamic optimization of human walking. Journal of Biomechanical Engineering 123:381-390, 2001. Holzbaur, KR, WM Murray and SL Delp, 2005. A model of the upper extremity for simulating musculoskeletal surgery and analyzing neuromuscular control. Ann Biomed Eng 33(6): 829-840.
  Ground
  BodySet:
    Body pelvis: mass=11.3078 [kg] mass_center=(-0.0623853 0 0) inertia=(0.0756014 0.0756014 0.043286 0 0 0)
        meshes=(sacrum.vtp pelvis.vtp l_pelvis.vtp)
    Body torso: mass=26.8266 mass_center=(-0.03 0.32 0) inertia=(1.4745 0.7555 1.4314 0 0 0)
        meshes=(hat_spine.vtp hat_jaw.vtp hat_skull.vtp hat_ribs_scap.vtp)
    Body femur_r: mass=8.930827 mass_center=(0 -0.181569 0) inertia=(0.139837 0.0248011 0.139837 0 0 0)
        meshes=femur_r.vtp
    Body tibia_r: mass=3.559791 mass_center=(0 -0.208895 0) inertia=(0.059175 0.00331717 0.059175 0 0 0)
        meshes=(tibia_r.vtp fibula_r.vtp)
    Body talus_r: mass=0.09601594 mass_center=(0 0 0) inertia=(0.000739195 0.000703926 0.000703926 0 0 0)
        meshes=talus_rv.vtp
    Body calcn_r: mass=1.200199 mass_center=(0.0834506 0.0263226 0) inertia=(0.00103487 0.00265714 0.00265714 0 0 0)
        meshes=foot.vtp
    Body toes_r: mass=0.2079705 mass_center=(0.0288739 0.00526452 -0.0153549)
        inertia=(7.39195e-5 0.000137258 0.000137258 0 0 0) meshes=bofoot.vtp
    Body humerus_r: mass=2.0325 mass_center=(0 -0.164502 0) inertia=(0.011946 0.004121 0.013409 0 0 0)
        meshes=humerus_rv.vtp
    Body ulna_r: mass=0.6075 mass_center=(0 -0.120525 0) inertia=(0.002962 0.000618 0.003213 0 0 0) meshes=ulna_rv.vtp
    Body radius_r: mass=0.6075 mass_center=(0 -0.120525 0) inertia=(0.002962 0.000618 0.003213 0 0 0)
        meshes=radius_rv.vtp
    Body hand_r: mass=0.4575 mass_center=(0 -0.068095 0) inertia=(0.000892 0.000547 0.00134 0 0 0)
        meshes=(pisiform_rvs.vtp lunate_rvs.vtp scaphoid_rvs.vtp triquetrum_rvs.vtp hamate_rvs.vtp capitate_rvs.vtp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)
    Body femur_l: mass=8.930827 mass_center=(0 -0.181569 0) inertia=(0.139837 0.0248011 0.139837 0 0 0)
        meshes=femur_l.vtp
    Body tibia_l: mass=3.559791 mass_center=(0 -0.208895 0) inertia=(0.059175 0.00331717 0.059175 0 0 0)
        meshes=(tibia_l.vtp fibula_l.vtp)
    Body talus_l: mass=0.09601594 mass_center=(0 0 0) inertia=(0.000739195 0.000703926 0.000703926 0 0 0)
        meshes=talus_lv.vtp
    Body calcn_l: mass=1.200199 mass_center=(0.0834506 0.0263226 0) inertia=(0.00103487 0.00265714 0.00265714 0 0 0)
        meshes=l_foot.vtp
    Body toes_l: mass=0.2079705 mass_center=(0.0288739 0.00526452 0.0153549)
        inertia=(7.39195e-5 0.000137258 0.000137258 0 0 0) meshes=l_bofoot.vtp
    Body humerus_l: mass=2.0325 mass_center=(0 -0.164502 0) inertia=(0.011946 0.004121 0.013409 0 0 0)
        meshes=humerus_lv.vtp
    Body ulna_l: mass=0.6075 mass_center=(0 -0.120525 0) inertia=(0.002962 0.000618 0.003213 0 0 0) meshes=ulna_lv.vtp
    Body radius_l: mass=0.6075 mass_center=(0 -0.120525 0) inertia=(0.002962 0.000618 0.003213 0 0 0)
        meshes=radius_lv.vtp
    Body hand_l: mass=0.4575 mass_center=(0 -0.068095 0) inertia=(0.000892 0.000547 0.00134 0 0 0)
        meshes=(pisiform_lvs.vtp lunate_lvs.vtp scaphoid_lvs.vtp triquetrum_lvs.vtp hamate_lvs.vtp capitate_lvs.vtp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)
  JointSet:
    CustomJoint ground_pelvis: socket_parent_frame=ground_offset socket_child_frame=pelvis_offset
      Coordinate pelvis_tilt: default_value=0 range=(-1.570796 1.570796) clamped=true
      Coordinate pelvis_list: default_value=0 range=(-1.570796 1.570796) clamped=true
      Coordinate pelvis_rotation: default_value=0 range=(-1.570796 1.570796) clamped=true
      Coordinate pelvis_tx: default_value=0 range=(-5 25) clamped=true
      Coordinate pelvis_ty: default_value=0 range=(-1 2) clamped=true
      Coordinate pelvis_tz: default_value=0 range=(-3 3) clamped=true
      PhysicalOffsetFrame ground_offset: socket_parent=/ground translation=(0 0 0) [meters]
      PhysicalOffsetFrame pelvis_offset: socket_parent=/bodyset/pelvis translation=(0 0 0)
      SpatialTransform:
        TransformAxis rotation1: coordinates=pelvis_tilt axis=(0 0 1) LinearFunction(coefficients=1 0)
        TransformAxis rotation2: coordinates=pelvis_list axis=(1 0 0) LinearFunction(coefficients=1 0)
        TransformAxis rotation3: coordinates=pelvis_rotation axis=(0 1 0) LinearFunction(coefficients=1 0)
        TransformAxis translation1: coordinates=pelvis_tx axis=(1 0 0) LinearFunction(coefficients=1 0)
        TransformAxis translation2: coordinates=pelvis_ty axis=(0 1 0) LinearFunction(coefficients=1 0)
        TransformAxis translation3: coordinates=pelvis_tz axis=(0 0 1) LinearFunction(coefficients=1 0)
    CustomJoint back: socket_parent_frame=pelvis_offset socket_child_frame=torso_offset
      Coordinate lumbar_extension: default_value=0 range=(-0.64 0.03) clamped=true
      Coordinate lumbar_bending: default_value=0 range=(-0.35 0.15) clamped=true
      Coordinate lumbar_rotation: default_value=0 range=(-0.15 0.21) clamped=true
      PhysicalOffsetFrame pelvis_offset: socket_parent=/bodyset/pelvis translation=(-0.0888571 0.0719151 0)
      PhysicalOffsetFrame torso_offset: socket_parent=/bodyset/torso translation=(0 0 0)
      SpatialTransform: axes_held_at_zero=(translation1 translation2 translation3)
        TransformAxis rotation1: coordinates=lumbar_extension axis=(0 0 1) LinearFunction(coefficients=1 0)
        TransformAxis rotation2: coordinates=lumbar_bending axis=(1 0 0) LinearFunction(coefficients=1 0)
        TransformAxis rotation3: coordinates=lumbar_rotation axis=(0 1 0) LinearFunction(coefficients=1 0)
    CustomJoint hip_r: socket_parent_frame=pelvis_offset socket_child_frame=femur_r_offset
      Coordinate hip_flexion_r: default_value=0 range=(-0.49 1.89) clamped=true
      Coordinate hip_adduction_r: default_value=0 range=(-0.31 0.22) clamped=true
      Coordinate hip_rotation_r: default_value=0 range=(-0.49 0.2) clamped=true
      PhysicalOffsetFrame pelvis_offset: socket_parent=/bodyset/pelvis translation=(-0.0623853 -0.0583263 0.0728399)
      PhysicalOffsetFrame femur_r_offset: socket_parent=/bodyset/femur_r translation=(0 0 0)
      SpatialTransform: axes_held_at_zero=(translation1 translation2 translation3)
        TransformAxis rotation1: coordinates=hip_flexion_r axis=(0 0 1) LinearFunction(coefficients=1 0)
        TransformAxis rotation2: coordinates=hip_adduction_r axis=(1 0 0) LinearFunction(coefficients=1 0)
        TransformAxis rotation3: coordinates=hip_rotation_r axis=(0 1 0) LinearFunction(coefficients=1 0)
    CustomJoint knee_r: socket_parent_frame=femur_r_offset socket_child_frame=tibia_r_offset
      Coordinate knee_angle_r: default_value=0 range=(-2.5 0) clamped=true
      PhysicalOffsetFrame femur_r_offset: socket_parent=/bodyset/femur_r translation=(0.0041 -0.41 0)
      PhysicalOffsetFrame tibia_r_offset: socket_parent=/bodyset/tibia_r translation=(0 0 0)
      SpatialTransform: axes_held_at_zero=(rotation2 rotation3 translation3)
        TransformAxis rotation1: coordinates=knee_angle_r axis=(0 0 1) LinearFunction(coefficients=1 0)
        TransformAxis translation1: coordinates=knee_angle_r axis=(1 0 0) Constant(value=0)
        TransformAxis translation2: coordinates=knee_angle_r axis=(0 1 0) Constant(value=0)
    CustomJoint ankle_r: socket_parent_frame=tibia_r_offset socket_child_frame=talus_r_offset
      Coordinate ankle_angle_r: default_value=0 range=(-0.91 0.49) clamped=true
      PhysicalOffsetFrame tibia_r_offset: socket_parent=/bodyset/tibia_r translation=(0 -0.481118 0)
      PhysicalOffsetFrame talus_r_offset: socket_parent=/bodyset/talus_r translation=(0 0 0)
      SpatialTransform: axes_held_at_zero=(rotation2 rotation3 translation1 translation2 translation3)
        TransformAxis rotation1: coordinates=ankle_angle_r axis=(-0.1050135 -0.1740224 0.9791263)
            LinearFunction(coefficients=1 0)
    CustomJoint subtalar_r: socket_parent_frame=talus_r_offset socket_child_frame=calcn_r_offset
      Coordinate subtalar_angle_r: default_value=-0.05 range=(-0.58 0) clamped=true
      PhysicalOffsetFrame talus_r_offset: socket_parent=/bodyset/talus_r translation=(-0.0406989 -0.0368078 0.00694917)
      PhysicalOffsetFrame calcn_r_offset: socket_parent=/bodyset/calcn_r translation=(0 0 0)
      SpatialTransform: axes_held_at_zero=(rotation2 rotation3 translation1 translation2 translation3)
        TransformAxis rotation1: coordinates=subtalar_angle_r axis=(0.7871796 0.6047475 -0.1209495)
            LinearFunction(coefficients=1 0)
    CustomJoint mtp_r: socket_parent_frame=calcn_r_offset socket_child_frame=toes_r_offset
      Coordinate mtp_angle_r: default_value=0 range=(-0.2 0.32) clamped=true
      PhysicalOffsetFrame calcn_r_offset: socket_parent=/bodyset/calcn_r translation=(0.14921 -0.00175484 0.000947614)
      PhysicalOffsetFrame toes_r_offset: socket_parent=/bodyset/toes_r translation=(0 0 0)
      SpatialTransform: axes_held_at_zero=(rotation2 rotation3 translation1 translation2 translation3)
        TransformAxis rotation1: coordinates=mtp_angle_r axis=(-0.5809544 0 0.8139361) LinearFunction(coefficients=1 0)
    CustomJoint acromial_r: socket_parent_frame=torso_offset socket_child_frame=humerus_r_offset
      Coordinate arm_flex_r: default_value=0 range=(-1.308 2.85) clamped=true
      Coordinate arm_add_r: default_value=0 range=(-0.47 0.15) clamped=true
      Coordinate arm_rot_r: default_value=0 range=(-0.261 0) clamped=true
      PhysicalOffsetFrame torso_offset: socket_parent=/bodyset/torso translation=(0.003155 0.3715 0.17)
      PhysicalOffsetFrame humerus_r_offset: socket_parent=/bodyset/humerus_r translation=(0 0 0)
      SpatialTransform: axes_held_at_zero=(translation1 translation2 translation3)
        TransformAxis rotation1: coordinates=arm_flex_r axis=(0 0 1) LinearFunction(coefficients=1 0)
        TransformAxis rotation2: coordinates=arm_add_r axis=(1 0 0) LinearFunction(coefficients=1 0)
        TransformAxis rotation3: coordinates=arm_rot_r axis=(0 1 0) LinearFunction(coefficients=1 0)
    PinJoint elbow_r: socket_parent_frame=humerus_r_offset socket_child_frame=ulna_r_offset
      Coordinate elbow_flex_r: default_value=0 range=(0 2.618) clamped=true
      PhysicalOffsetFrame humerus_r_offset: socket_parent=/bodyset/humerus_r translation=(0.013144 -0.286273 -0.009595)
          orientation=(-0.0228627 0.228018 0.0051689) [radians]
      PhysicalOffsetFrame ulna_r_offset: socket_parent=/bodyset/ulna_r translation=(0 0 0)
          orientation=(-0.0228627 0.228018 0.0051689)
    PinJoint radioulnar_r: socket_parent_frame=ulna_r_offset socket_child_frame=radius_r_offset
      Coordinate pro_sup_r: default_value=0 range=(0 1.570796) clamped=true
      PhysicalOffsetFrame ulna_r_offset: socket_parent=/bodyset/ulna_r translation=(-0.006727 -0.013007 0.026083)
          orientation=(-1.56884 0.056428 1.53614)
      PhysicalOffsetFrame radius_r_offset: socket_parent=/bodyset/radius_r translation=(0 0 0)
          orientation=(-1.56884 0.056428 1.53614)
    UniversalJoint radius_hand_r: socket_parent_frame=radius_r_offset socket_child_frame=hand_r_offset
      Coordinate wrist_flex_r: default_value=0 range=(-1.22173 1.22173) clamped=true locked=true
      Coordinate wrist_dev_r: default_value=0 range=(-0.4363323 0.6108652) clamped=true locked=true
      PhysicalOffsetFrame radius_r_offset: socket_parent=/bodyset/radius_r translation=(-0.008797 -0.235841 0.01361)
          orientation=(-1.5708 0 -1.5708)
      PhysicalOffsetFrame hand_r_offset: socket_parent=/bodyset/hand_r translation=(0 0 0)
          orientation=(-1.5708 0 -1.5708)
    CustomJoint hip_l: socket_parent_frame=pelvis_offset socket_child_frame=femur_l_offset
      Coordinate hip_flexion_l: default_value=0 range=(-0.49 1.89) clamped=true
      Coordinate hip_adduction_l: default_value=0 range=(-0.31 0.22) clamped=true
      Coordinate hip_rotation_l: default_value=0 range=(-0.49 0.2) clamped=true
      PhysicalOffsetFrame pelvis_offset: socket_parent=/bodyset/pelvis translation=(-0.0623853 -0.0583263 -0.0728399)
      PhysicalOffsetFrame femur_l_offset: socket_parent=/bodyset/femur_l translation=(0 0 0)
      SpatialTransform: axes_held_at_zero=(translation1 translation2 translation3)
        TransformAxis rotation1: coordinates=hip_flexion_l axis=(0 0 1) LinearFunction(coefficients=1 0)
        TransformAxis rotation2: coordinates=hip_adduction_l axis=(-1 0 0) LinearFunction(coefficients=1 0)
        TransformAxis rotation3: coordinates=hip_rotation_l axis=(0 -1 0) LinearFunction(coefficients=1 0)
    CustomJoint knee_l: socket_parent_frame=femur_l_offset socket_child_frame=tibia_l_offset
      Coordinate knee_angle_l: default_value=0 range=(-2.5 0) clamped=true
      PhysicalOffsetFrame femur_l_offset: socket_parent=/bodyset/femur_l translation=(0.0041 -0.41 0)
      PhysicalOffsetFrame tibia_l_offset: socket_parent=/bodyset/tibia_l translation=(0 0 0)
      SpatialTransform: axes_held_at_zero=(rotation2 rotation3 translation3)
        TransformAxis rotation1: coordinates=knee_angle_l axis=(0 0 1) LinearFunction(coefficients=1 0)
        TransformAxis translation1: coordinates=knee_angle_l axis=(1 0 0) Constant(value=0)
        TransformAxis translation2: coordinates=knee_angle_l axis=(0 1 0) Constant(value=0)
    CustomJoint ankle_l: socket_parent_frame=tibia_l_offset socket_child_frame=talus_l_offset
      Coordinate ankle_angle_l: default_value=0 range=(-0.91 0.49) clamped=true
      PhysicalOffsetFrame tibia_l_offset: socket_parent=/bodyset/tibia_l translation=(0 -0.481118 0)
      PhysicalOffsetFrame talus_l_offset: socket_parent=/bodyset/talus_l translation=(0 0 0)
      SpatialTransform: axes_held_at_zero=(rotation2 rotation3 translation1 translation2 translation3)
        TransformAxis rotation1: coordinates=ankle_angle_l axis=(0.1050135 0.1740224 0.9791263)
            LinearFunction(coefficients=1 0)
    CustomJoint subtalar_l: socket_parent_frame=talus_l_offset socket_child_frame=calcn_l_offset
      Coordinate subtalar_angle_l: default_value=-0.05 range=(-0.58 0) clamped=true
      PhysicalOffsetFrame talus_l_offset: socket_parent=/bodyset/talus_l
          translation=(-0.0406989 -0.0368078 -0.00694917)
      PhysicalOffsetFrame calcn_l_offset: socket_parent=/bodyset/calcn_l translation=(0 0 0)
      SpatialTransform: axes_held_at_zero=(rotation2 rotation3 translation1 translation2 translation3)
        TransformAxis rotation1: coordinates=subtalar_angle_l axis=(-0.7871796 -0.6047475 -0.1209495)
            LinearFunction(coefficients=1 0)
    CustomJoint mtp_l: socket_parent_frame=calcn_l_offset socket_child_frame=toes_l_offset
      Coordinate mtp_angle_l: default_value=0 range=(-0.2 0.32) clamped=true
      PhysicalOffsetFrame calcn_l_offset: socket_parent=/bodyset/calcn_l translation=(0.14921 -0.00175484 -0.000947614)
      PhysicalOffsetFrame toes_l_offset: socket_parent=/bodyset/toes_l translation=(0 0 0)
      SpatialTransform: axes_held_at_zero=(rotation2 rotation3 translation1 translation2 translation3)
        TransformAxis rotation1: coordinates=mtp_angle_l axis=(0.5809544 0 0.8139361) LinearFunction(coefficients=1 0)
    CustomJoint acromial_l: socket_parent_frame=torso_offset socket_child_frame=humerus_l_offset
      Coordinate arm_flex_l: default_value=0 range=(-1.308 2.85) clamped=true
      Coordinate arm_add_l: default_value=0 range=(-0.47 0.15) clamped=true
      Coordinate arm_rot_l: default_value=0 range=(-0.261 0) clamped=true
      PhysicalOffsetFrame torso_offset: socket_parent=/bodyset/torso translation=(0.003155 0.3715 -0.17)
      PhysicalOffsetFrame humerus_l_offset: socket_parent=/bodyset/humerus_l translation=(0 0 0)
      SpatialTransform: axes_held_at_zero=(translation1 translation2 translation3)
        TransformAxis rotation1: coordinates=arm_flex_l axis=(0 0 1) LinearFunction(coefficients=1 0)
        TransformAxis rotation2: coordinates=arm_add_l axis=(-1 0 0) LinearFunction(coefficients=1 0)
        TransformAxis rotation3: coordinates=arm_rot_l axis=(0 -1 0) LinearFunction(coefficients=1 0)
    PinJoint elbow_l: socket_parent_frame=humerus_l_offset socket_child_frame=ulna_l_offset
      Coordinate elbow_flex_l: default_value=0 range=(0 2.618) clamped=true
      PhysicalOffsetFrame humerus_l_offset: socket_parent=/bodyset/humerus_l translation=(0.013144 -0.286273 0.009595)
          orientation=(0.0228627 -0.228018 0.0051689)
      PhysicalOffsetFrame ulna_l_offset: socket_parent=/bodyset/ulna_l translation=(0 0 0)
          orientation=(0.0228627 -0.228018 0.0051689)
    PinJoint radioulnar_l: socket_parent_frame=ulna_l_offset socket_child_frame=radius_l_offset
      Coordinate pro_sup_l: default_value=0 range=(0 1.570796) clamped=true
      PhysicalOffsetFrame ulna_l_offset: socket_parent=/bodyset/ulna_l translation=(-0.006727 -0.013007 -0.026083)
          orientation=(1.56884 -0.056428 1.53614)
      PhysicalOffsetFrame radius_l_offset: socket_parent=/bodyset/radius_l translation=(0 0 0)
          orientation=(1.56884 -0.056428 1.53614)
    UniversalJoint radius_hand_l: socket_parent_frame=radius_l_offset socket_child_frame=hand_l_offset
      Coordinate wrist_flex_l: default_value=0 range=(-1.22173 1.22173) clamped=true locked=true
      Coordinate wrist_dev_l: default_value=0 range=(-0.4363323 0.6108652) clamped=true locked=true
      PhysicalOffsetFrame radius_l_offset: socket_parent=/bodyset/radius_l translation=(-0.008797 -0.235841 -0.01361)
          orientation=(1.5708 0 1.5708)
      PhysicalOffsetFrame hand_l_offset: socket_parent=/bodyset/hand_l translation=(0 0 0)
          orientation=(1.5708 0 1.5708)
  ForceSet:
    Thelen2003Muscle glut_med1_r: max_isometric_force=819 optimal_fiber_length=0.04790465
        tendon_slack_length=0.06984229 pennation_angle_at_optimal=0.1396263 [radians] FmaxTendonStrain=0.033
        FmaxMuscleStrain=0.6 KshapeActive=0.5 KshapePassive=4 Af=0.3 Flen=1.8 activation_time_constant=0.01 [seconds]
        deactivation_time_constant=0.04 [seconds]
      PathPoint P1: pelvis (-0.0360017 0.0268248 0.105465)
      PathPoint P2: femur_r (-0.0187011 -0.0124962 0.0476106)
    Thelen2003Muscle glut_med2_r: max_isometric_force=573 optimal_fiber_length=0.0747538 tendon_slack_length=0.046887
        pennation_angle_at_optimal=0 FmaxTendonStrain=0.033 FmaxMuscleStrain=0.6 KshapeActive=0.5 KshapePassive=4
        Af=0.3 Flen=1.8 activation_time_constant=0.01 deactivation_time_constant=0.04
      PathPoint P1: pelvis (-0.0754447 0.0392665 0.0668208)
      PathPoint P2: femur_r (-0.0221325 -0.00619469 0.0452086)
    Thelen2003Muscle glut_med3_r: max_isometric_force=653 optimal_fiber_length=0.05692571
        tendon_slack_length=0.04670376 pennation_angle_at_optimal=0.3316126 FmaxTendonStrain=0.033 FmaxMuscleStrain=0.6
        KshapeActive=0.5 KshapePassive=4 Af=0.3 Flen=1.8 activation_time_constant=0.01 deactivation_time_constant=0.04
      PathPoint P1: pelvis (-0.107917 0.00926514 0.0565272)
      PathPoint P2: femur_r (-0.0265075 -0.00501984 0.0444366)
    Thelen2003Muscle glut_min1_r: max_isometric_force=270 optimal_fiber_length=0.06089982
        tendon_slack_length=0.01432937 pennation_angle_at_optimal=0.1745329 FmaxTendonStrain=0.033 FmaxMuscleStrain=0.6
        KshapeActive=0.5 KshapePassive=4 Af=0.3 Flen=1.8 activation_time_constant=0.01 deactivation_time_constant=0.04
      PathPoint P1: pelvis (-0.0412078 -0.00705915 0.0921185)
      PathPoint P2: femur_r (-0.00617651 -0.0111077 0.0480395)
    Thelen2003Muscle glut_min2_r: max_isometric_force=285 optimal_fiber_length=0.05010659
        tendon_slack_length=0.02326378 pennation_angle_at_optimal=0 FmaxTendonStrain=0.033 FmaxMuscleStrain=0.6
        KshapeActive=0.5 KshapePassive=4 Af=0.3 Flen=1.8 activation_time_constant=0.01 deactivation_time_constant=0.04
      PathPoint P1: pelvis (-0.0558556 -0.00573556 0.0864483)
      PathPoint P2: femur_r (-0.00823535 -0.0111077 0.0480395)
    Thelen2003Muscle glut_min3_r: max_isometric_force=323 optimal_fiber_length=0.03371841
        tendon_slack_length=0.04525366 pennation_angle_at_optimal=0.01745329 FmaxTendonStrain=0.033
        FmaxMuscleStrain=0.6 KshapeActive=0.5 KshapePassive=4 Af=0.3 Flen=1.8 activation_time_constant=0.01
        deactivation_time_constant=0.04
      PathPoint P1: pelvis (-0.0735917 -0.00555908 0.0746718)
      PathPoint P2: femur_r (-0.011581 -0.00886482 0.0471817)
    Thelen2003Muscle semimem_r: max_isometric_force=1288 optimal_fiber_length=0.08684036 tendon_slack_length=0.3896961
        pennation_angle_at_optimal=0.2617994 FmaxTendonStrain=0.033 FmaxMuscleStrain=0.6 KshapeActive=0.5
        KshapePassive=4 Af=0.3 Flen=1.8 activation_time_constant=0.01 deactivation_time_constant=0.04
      PathPoint P1: pelvis (-0.105181 -0.086007 0.0623806)
      ConditionalPathPoint P2: tibia_r (-0.0286422 -0.0393734 -0.0155639)
          socket_coordinate=/jointset/knee_r/knee_angle_r range=(-0.558505 0.174533) [radians]
      PathPoint P3: tibia_r (-0.0222224 -0.0533817 -0.0161071)
    Thelen2003Muscle semiten_r: max_isometric_force=410 optimal_fiber_length=0.2174664 tendon_slack_length=0.2764312
        pennation_angle_at_optimal=0.08726646 FmaxTendonStrain=0.033 FmaxMuscleStrain=0.6 KshapeActive=0.5
        KshapePassive=4 Af=0.3 Flen=1.8 activation_time_constant=0.01 deactivation_time_constant=0.04
      PathPoint P1: pelvis (-0.111491 -0.0969575 0.0526803)
      ConditionalPathPoint P2: tibia_r (-0.0345929 -0.0319888 -0.0187409)
          socket_coordinate=/jointset/knee_r/knee_angle_r range=(-0.331613 0.174533)
      PathPoint P3: tibia_r (-0.0273418 -0.0590992 -0.0188314)
      PathPoint P4: tibia_r (-0.00930049 -0.0834684 -0.0201648)
      PathPoint P5: tibia_r (0.00222224 -0.106965 -0.0158849)
    Thelen2003Muscle bifemlh_r: max_isometric_force=896 optimal_fiber_length=0.1184379 tendon_slack_length=0.3542272
        pennation_angle_at_optimal=0 FmaxTendonStrain=0.033 FmaxMuscleStrain=0.6 KshapeActive=0.5 KshapePassive=4
        Af=0.3 Flen=1.8 activation_time_constant=0.01 deactivation_time_constant=0.04
      PathPoint P1: pelvis (-0.111146 -0.0905072 0.0605749)
      PathPoint P2: tibia_r (-0.0247739 -0.0402797 0.0242224)
      PathPoint P3: tibia_r (-0.0192594 -0.0629929 0.0282307)
    Thelen2003Muscle bifemsh_r: max_isometric_force=804 optimal_fiber_length=0.1851823 tendon_slack_length=0.09526722
        pennation_angle_at_optimal=0.4014257 FmaxTendonStrain=0.033 FmaxMuscleStrain=0.6 KshapeActive=0.5
        KshapePassive=4 Af=0.3 Flen=1.8 activation_time_constant=0.01 deactivation_time_constant=0.04
      PathPoint P1: femur_r (0.00428924 -0.225465 0.0200737)
      PathPoint P2: tibia_r (-0.0247739 -0.0402797 0.0242224)
      PathPoint P3: tibia_r (-0.0192594 -0.0629929 0.0282307)
    Thelen2003Muscle sar_r: max_isometric_force=156 optimal_fiber_length=0.5397349 tendon_slack_length=0.1037952
        pennation_angle_at_optimal=0 FmaxTendonStrain=0.033 FmaxMuscleStrain=0.6 KshapeActive=0.5 KshapePassive=4
        Af=0.3 Flen=1.8 activation_time_constant=0.01 deactivation_time_constant=0.04
      PathPoint P1: pelvis (-0.0135006 -0.00114711 0.108344)
      PathPoint P2: femur_r (-0.00257355 -0.38108 -0.0361154)
      PathPoint P3: tibia_r (-0.00460909 -0.046881 -0.0328398)
      PathPoint P4: tibia_r (0.00493831 -0.065902 -0.0315229)
      PathPoint P5: tibia_r (0.0200002 -0.0939859 -0.0207409)
    Thelen2003Muscle add_long_r: max_isometric_force=627 optimal_fiber_length=0.1443343 tendon_slack_length=0.1150491
        pennation_angle_at_optimal=0.1047198 FmaxTendonStrain=0.033 FmaxMuscleStrain=0.6 KshapeActive=0.5
        KshapePassive=4 Af=0.3 Flen=1.8 activation_time_constant=0.01 deactivation_time_constant=0.04
      PathPoint P1: pelvis (-0.0278837 -0.0737682 0.0147424)
      PathPoint P2: femur_r (0.00428924 -0.225465 0.0200737)
    Thelen2003Muscle add_brev_r: max_isometric_force=429 optimal_fiber_length=0.1326204 tendon_slack_length=0.01994291
        pennation_angle_at_optimal=0 FmaxTendonStrain=0.033 FmaxMuscleStrain=0.6 KshapeActive=0.5 KshapePassive=4
        Af=0.3 Flen=1.8 activation_time_constant=0.01 deactivation_time_constant=0.04
      PathPoint P1: pelvis (-0.0517965 -0.0807391 0.0143063)
      PathPoint P2: femur_r (0.000772064 -0.127739 0.0252207)
    Thelen2003Muscle add_mag1_r: max_isometric_force=381 optimal_fiber_length=0.08731901 tendon_slack_length=0.06022001
        pennation_angle_at_optimal=0.08726646 FmaxTendonStrain=0.033 FmaxMuscleStrain=0.6 KshapeActive=0.5
        KshapePassive=4 Af=0.3 Flen=1.8 activation_time_constant=0.01 deactivation_time_constant=0.04
      PathPoint P1: pelvis (-0.0645913 -0.103593 0.0222445)
      PathPoint P2: femur_r (-0.00386032 -0.129341 0.0290811)
    Thelen2003Muscle add_mag2_r: max_isometric_force=343 optimal_fiber_length=0.131479 tendon_slack_length=0.1303924
        pennation_angle_at_optimal=0.05235988 FmaxTendonStrain=0.033 FmaxMuscleStrain=0.6 KshapeActive=0.5
        KshapePassive=4 Af=0.3 Flen=1.8 activation_time_constant=0.01 deactivation_time_constant=0.04
      PathPoint P1: pelvis (-0.073327 -0.105181 0.0268679)
      PathPoint P2: femur_r (0.00463238 -0.24405 0.0194732)
    Thelen2003Muscle add_mag3_r: max_isometric_force=488 optimal_fiber_length=0.1428841 tendon_slack_length=0.271589
        pennation_angle_at_optimal=0.08726646 FmaxTendonStrain=0.033 FmaxMuscleStrain=0.6 KshapeActive=0.5
        KshapePassive=4 Af=0.3 Flen=1.8 activation_time_constant=0.01 deactivation_time_constant=0.04
      PathPoint P1: pelvis (-0.0980163 -0.100708 0.0425873)
      PathPoint P2: femur_r (0.00600494 -0.409811 -0.0228188)
    Thelen2003Muscle tfl_r: max_isometric_force=233 optimal_fiber_length=0.09880501 tendon_slack_length=0.4420224
        pennation_angle_at_optimal=0.05235988 FmaxTendonStrain=0.033 FmaxMuscleStrain=0.6 KshapeActive=0.5
        KshapePassive=4 Af=0.3 Flen=1.8 activation_time_constant=0.01 deactivation_time_constant=0.04
      PathPoint P1: pelvis (-0.0274425 0.0188832 0.108257)
      PathPoint P2: femur_r (0.0252207 -0.106271 0.0512136)
      PathPoint P3: femur_r (0.00463238 -0.432454 0.0306252)
      PathPoint P4: tibia_r (0.00493831 -0.0544894 0.0244446)
    Thelen2003Muscle pect_r: max_isometric_force=266 optimal_fiber_length=0.09833403 tendon_slack_length=0.03245023
        pennation_angle_at_optimal=0 FmaxTendonStrain=0.033 FmaxMuscleStrain=0.6 KshapeActive=0.5 KshapePassive=4
        Af=0.3 Flen=1.8 activation_time_constant=0.01 deactivation_time_constant=0.04
      PathPoint P1: pelvis (-0.0380312 -0.0677679 0.0393423)
      PathPoint P2: femur_r (-0.0104658 -0.0877937 0.0217036)
    Thelen2003Muscle grac_r: max_isometric_force=162 optimal_fiber_length=0.3825507 tendon_slack_length=0.1369358
        pennation_angle_at_optimal=0.05235988 FmaxTendonStrain=0.033 FmaxMuscleStrain=0.6 KshapeActive=0.5
        KshapePassive=4 Af=0.3 Flen=1.8 activation_time_constant=0.01 deactivation_time_constant=0.04
      PathPoint P1: pelvis (-0.065306 -0.10474 0.024373)
      ConditionalPathPoint P2: tibia_r (-0.0218685 -0.0356922 -0.031062)
          socket_coordinate=/jointset/knee_r/knee_angle_r range=(-0.436332 0.174533)
      PathPoint P3: tibia_r (-0.0159919 -0.0576558 -0.0294653)
      PathPoint P4: tibia_r (0.00493831 -0.0935383 -0.0187656)
    Thelen2003Muscle glut_max1_r: max_isometric_force=573 optimal_fiber_length=0.1317114 tendon_slack_length=0.1159431
        pennation_angle_at_optimal=0.08726646 FmaxTendonStrain=0.033 FmaxMuscleStrain=0.6 KshapeActive=0.5
        KshapePassive=4 Af=0.3 Flen=1.8 activation_time_constant=0.01 deactivation_time_constant=0.04
      PathPoint P1: pelvis (-0.105446 0.0540025 0.0610634)
      PathPoint P2: pelvis (-0.113917 0.00105887 0.0772888)
      PathPoint P3: femur_r (-0.0392037 -0.0264877 0.0336277)
      PathPoint P4: femur_r (-0.0237624 -0.0604517 0.0403189)
    Thelen2003Muscle glut_max2_r: max_isometric_force=819 optimal_fiber_length=0.1413112 tendon_slack_length=0.1220852
        pennation_angle_at_optimal=0 FmaxTendonStrain=0.033 FmaxMuscleStrain=0.6 KshapeActive=0.5 KshapePassive=4
        Af=0.3 Flen=1.8 activation_time_constant=0.01 deactivation_time_constant=0.04
      PathPoint P1: pelvis (-0.119035 0.0155301 0.0491124)
      PathPoint P2: pelvis (-0.121417 -0.0458845 0.0797313)
      PathPoint P3: femur_r (-0.0365444 -0.0566067 0.025135)
      PathPoint P4: femur_r (-0.0133824 -0.108514 0.0359439)
    Thelen2003Muscle glut_max3_r: max_isometric_force=552 optimal_fiber_length=0.1381372 tendon_slack_length=0.1390964
        pennation_angle_at_optimal=0.08726646 FmaxTendonStrain=0.033 FmaxMuscleStrain=0.6 KshapeActive=0.5
        KshapePassive=4 Af=0.3 Flen=1.8 activation_time_constant=0.01 deactivation_time_constant=0.04
      PathPoint P1: pelvis (-0.137301 -0.0277072 0.00505954)
      PathPoint P2: pelvis (-0.134918 -0.0928279 0.0351551)
      PathPoint P3: femur_r (-0.0256497 -0.111184 0.011581)
      PathPoint P4: femur_r (-0.00514709 -0.151556 0.0352576)
    Thelen2003Muscle iliacus_r: max_isometric_force=1073 optimal_fiber_length=0.09187246 tendon_slack_length=0.09187246
        pennation_angle_at_optimal=0.1221731 FmaxTendonStrain=0.033 FmaxMuscleStrain=0.6 KshapeActive=0.5
        KshapePassive=4 Af=0.3 Flen=1.8 activation_time_constant=0.01 deactivation_time_constant=0.04
      PathPoint P1: pelvis (-0.0594734 0.0322074 0.0744973)
      PathPoint P2: pelvis (-0.0227658 -0.0485317 0.0707463)
      ConditionalPathPoint P3: pelvis (-0.025413 -0.0710327 0.0711825) socket_coordinate=/jointset/hip_r/hip_flexion_r
          range=(-1.5708 0.785398)
      PathPoint P4: femur_r (0.00145834 -0.0579951 0.00488974)
      PathPoint P5: femur_r (-0.0165565 -0.0663259 0.0110662)
    Thelen2003Muscle psoas_r: max_isometric_force=1113 optimal_fiber_length=0.09085087 tendon_slack_length=0.1453614
        pennation_angle_at_optimal=0.1396263 FmaxTendonStrain=0.033 FmaxMuscleStrain=0.6 KshapeActive=0.5
        KshapePassive=4 Af=0.3 Flen=1.8 activation_time_constant=0.01 deactivation_time_constant=0.04
      PathPoint P1: pelvis (-0.0570909 0.0782684 0.0252105)
      PathPoint P2: pelvis (-0.021001 -0.0502965 0.0662102)
      ConditionalPathPoint P3: pelvis (-0.025413 -0.0710327 0.0711825) socket_coordinate=/jointset/hip_r/hip_flexion_r
          range=(-1.5708 0.785398)
      PathPoint P4: femur_r (0.00137256 -0.0541502 0.00325982)
      PathPoint P5: femur_r (-0.0161276 -0.0637626 0.00892163)
    Thelen2003Muscle quad_fem_r: max_isometric_force=381 optimal_fiber_length=0.04607884 tendon_slack_length=0.02047948
        pennation_angle_at_optimal=0 FmaxTendonStrain=0.033 FmaxMuscleStrain=0.6 KshapeActive=0.5 KshapePassive=4
        Af=0.3 Flen=1.8 activation_time_constant=0.01 deactivation_time_constant=0.04
      PathPoint P1: pelvis (-0.100858 -0.101564 0.0453614)
      PathPoint P2: femur_r (-0.032684 -0.038343 0.0313973)
    Thelen2003Muscle gem_r: max_isometric_force=164 optimal_fiber_length=0.02079838 tendon_slack_length=0.03379737
        pennation_angle_at_optimal=0 FmaxTendonStrain=0.033 FmaxMuscleStrain=0.6 KshapeActive=0.5 KshapePassive=4
        Af=0.3 Flen=1.8 activation_time_constant=0.01 deactivation_time_constant=0.04
      PathPoint P1: pelvis (-0.0999753 -0.0723563 0.0622847)
      PathPoint P2: femur_r (-0.0121815 -0.00352457 0.0380027)
    Thelen2003Muscle peri_r: max_isometric_force=444 optimal_fiber_length=0.0227971 tendon_slack_length=0.1008333
        pennation_angle_at_optimal=0.1745329 FmaxTendonStrain=0.033 FmaxMuscleStrain=0.6 KshapeActive=0.5
        KshapePassive=4 Af=0.3 Flen=1.8 activation_time_constant=0.01 deactivation_time_constant=0.04
      PathPoint P1: pelvis (-0.123182 0.000264718 0.0204999)
      PathPoint P2: pelvis (-0.10527 -0.0243541 0.0573123)
      PathPoint P3: femur_r (-0.0126962 -0.00384498 0.037488)
    Thelen2003Muscle rect_fem_r: max_isometric_force=1169 optimal_fiber_length=0.1195832 tendon_slack_length=0.3251824
        pennation_angle_at_optimal=0.08726646 FmaxTendonStrain=0.033 FmaxMuscleStrain=0.6 KshapeActive=0.5
        KshapePassive=4 Af=0.3 Flen=1.8 activation_time_constant=0.01 deactivation_time_constant=0.04
      PathPoint P1: pelvis (-0.0260306 -0.0274425 0.0844419)
      ConditionalPathPoint P2: femur_r (0.0286521 -0.430424 0.00162991) socket_coordinate=/jointset/knee_r/knee_angle_r
          range=(-2.61799 -1.45997)
      MovingPathPoint P3: tibia_r (0.0508297 0.0234786 0.00115227) socket_x_coordinate=/jointset/knee_r/knee_angle_r
          socket_y_coordinate=/jointset/knee_r/knee_angle_r socket_z_coordinate=/jointset/knee_r/knee_angle_r
        x_location: MultiplierFunction: scale=0.8230521
          SimmSpline: x=(-2.0944 -1.99997 -1.5708 -1.45752 -1.39626 -1.0472 -0.698132 -0.526391 -0.349066 -0.174533 0 0.00017453 0.00034907 0.0279253 0.0872665 0.174533 2.0944)
              y=(0.0155805 0.0179938 0.0275081 0.0296564 0.0307615 0.0365695 0.0422074 0.0450902 0.048391 0.0534299 0.0617576 0.0617669 0.0617762 0.0633083 0.066994 0.0733035 0.0573481)
        y_location: MultiplierFunction: scale=1.118879
          SimmSpline: x=(-2.0944 -1.99997 -1.5708 -1.45752 -1.39626 -1.0472 -0.698132 -0.526391 -0.349066 -0.174533 0 0.00017453 0.00034907 0.0279253 0.0872665 0.174533 2.0944)
              y=(0.0234116 0.0237613 0.0251141 0.0252795 0.0253146 0.0249184 0.0242373 0.0238447 0.0234197 0.0227644 0.020984 0.0209814 0.0209788 0.0205225 0.0191754 0.0159554 -0.0673774)
        z_location: MultiplierFunction: scale=0.8230521
          SimmSpline: x=(-2.0944 0.1745) y=(0.0014 0.0014)
    Thelen2003Muscle vas_med_r: max_isometric_force=1294 optimal_fiber_length=0.09277826 tendon_slack_length=0.131349
        pennation_angle_at_optimal=0.08726646 FmaxTendonStrain=0.033 FmaxMuscleStrain=0.6 KshapeActive=0.5
        KshapePassive=4 Af=0.3 Flen=1.8 activation_time_constant=0.01 deactivation_time_constant=0.04
      PathPoint P1: femur_r (0.0120099 -0.224184 0.0161276)
      PathPoint P2: femur_r (0.0305394 -0.295743 0.000772064)
      ConditionalPathPoint P3: femur_r (0.0317404 -0.432347 -0.0107231) socket_coordinate=/jointset/knee_r/knee_angle_r
          range=(-2.61799 -1.21004)
      ConditionalPathPoint P4: femur_r (0.0235051 -0.454455 -0.0112378) socket_coordinate=/jointset/knee_r/knee_angle_r
          range=(-2.61799 -1.78006)
      MovingPathPoint P5: tibia_r (0.0460568 0.0243823 -0.0120166) socket_x_coordinate=/jointset/knee_r/knee_angle_r
          socket_y_coordinate=/jointset/knee_r/knee_angle_r socket_z_coordinate=/jointset/knee_r/knee_angle_r
        x_location: MultiplierFunction: scale=0.8230521
          SimmSpline: x=(-2.0944 -1.99997 -1.5708 -1.45752 -1.39626 -1.0472 -0.698132 -0.526391 -0.349066 -0.174533 0 0.00017453 0.00034907 0.0279253 0.0872665 0.174533 2.0944)
              y=(0.00981097 0.0122243 0.0217371 0.0238851 0.0249902 0.0307959 0.0364187 0.0392871 0.0425654 0.0475764 0.0559586 0.0559681 0.0559776 0.0575419 0.0613368 0.0679503 0.0629332)
        y_location: MultiplierFunction: scale=1.118879
          SimmSpline: x=(-2.0944 -1.99997 -1.5708 -1.45752 -1.39626 -1.0472 -0.698132 -0.526391 -0.349066 -0.174533 0 0.00017453 0.00034907 0.0279253 0.0872665 0.174533 2.0944)
              y=(0.0224154 0.0227651 0.0241265 0.0242933 0.0243287 0.0239462 0.0233593 0.0230677 0.0228342 0.0226362 0.0217917 0.0217903 0.0217889 0.0215365 0.0206842 0.0183269 -0.0656205)
        z_location: MultiplierFunction: scale=0.8230521
          SimmSpline: x=(-2.0944 2.0944) y=(-0.0146 -0.0146)
    Thelen2003Muscle vas_int_r: max_isometric_force=1365 optimal_fiber_length=0.09153945 tendon_slack_length=0.1430962
        pennation_angle_at_optimal=0.05235988 FmaxTendonStrain=0.033 FmaxMuscleStrain=0.6 KshapeActive=0.5
        KshapePassive=4 Af=0.3 Flen=1.8 activation_time_constant=0.01 deactivation_time_constant=0.04
      PathPoint P1: femur_r (0.0248776 -0.205493 0.0265933)
      PathPoint P2: femur_r (0.0287379 -0.222582 0.0244487)
      ConditionalPathPoint P3: femur_r (0.0294242 -0.430424 0.00471817) socket_coordinate=/jointset/knee_r/knee_angle_r
          range=(-2.61799 -1.42)
      MovingPathPoint P4: tibia_r (0.0456491 0.028299 0.00148149) socket_x_coordinate=/jointset/knee_r/knee_angle_r
          socket_y_coordinate=/jointset/knee_r/knee_angle_r socket_z_coordinate=/jointset/knee_r/knee_angle_r
        x_location: MultiplierFunction: scale=0.8230521
          SimmSpline: x=(-2.0944 -1.99997 -1.5708 -1.45752 -1.39626 -1.0472 -0.698132 -0.526391 -0.349066 -0.174533 0 0.00017453 0.00034907 0.0279253 0.0872665 0.174533 2.0944)
              y=(0.0082733 0.0106866 0.0202042 0.022353 0.0234583 0.0292715 0.0349465 0.037871 0.0412569 0.0465287 0.0554632 0.0554735 0.0554837 0.0571717 0.061272 0.0684368 0.0648818)
        y_location: MultiplierFunction: scale=1.118879
          SimmSpline: x=(-2.0944 -1.99997 -1.5708 -1.45752 -1.39626 -1.0472 -0.698132 -0.526391 -0.349066 -0.174533 0 0.00017453 0.00034907 0.0279253 0.0872665 0.174533 2.0944)
              y=(0.025599 0.0259487 0.0273124 0.0274796 0.0275151 0.0271363 0.0265737 0.0263073 0.0261187 0.0260129 0.0252923 0.0252911 0.0252898 0.0250526 0.0242191 0.0218288 -0.0685706)
        z_location: MultiplierFunction: scale=0.8230521
          SimmSpline: x=(-2.0944 2.0944) y=(0.0018 0.0018)
    Thelen2003Muscle vas_lat_r: max_isometric_force=1871 optimal_fiber_length=0.08772702 tendon_slack_length=0.163966
        pennation_angle_at_optimal=0.08726646 FmaxTendonStrain=0.033 FmaxMuscleStrain=0.6 KshapeActive=0.5
        KshapePassive=4 Af=0.3 Flen=1.8 activation_time_constant=0.01 deactivation_time_constant=0.04
      PathPoint P1: femur_r (0.00411767 -0.198017 0.0299389)
      PathPoint P2: femur_r (0.0230761 -0.276732 0.035086)
      ConditionalPathPoint P3: femur_r (0.0309683 -0.430424 0.0175859) socket_coordinate=/jointset/knee_r/knee_angle_r
          range=(-2.61799 -1.21004)
      ConditionalPathPoint P4: femur_r (0.0217036 -0.453174 0.0157844) socket_coordinate=/jointset/knee_r/knee_angle_r
          range=(-2.61799 -1.92004)
      MovingPathPoint P5: tibia_r (0.0493467 0.0219148 0.0135804) socket_x_coordinate=/jointset/knee_r/knee_angle_r
          socket_y_coordinate=/jointset/knee_r/knee_angle_r socket_z_coordinate=/jointset/knee_r/knee_angle_r
        x_location: MultiplierFunction: scale=0.8230521
          SimmSpline: x=(-2.0944 -1.99997 -1.5708 -1.45752 -1.39626 -1.0472 -0.698132 -0.526391 -0.349066 -0.174533 0 0.00017453 0.00034907 0.0279253 0.0872665 0.174533 2.0944)
              y=(0.0142897 0.016703 0.0262145 0.0283623 0.0294674 0.0352709 0.0408785 0.0437291 0.0469704 0.0518742 0.0599557 0.0599647 0.0599738 0.0614577 0.0650351 0.0711867 0.0583766)
        y_location: MultiplierFunction: scale=1.118879
          SimmSpline: x=(-2.0944 -1.99997 -1.5708 -1.45752 -1.39626 -1.0472 -0.698132 -0.526391 -0.349066 -0.174533 0 0.00017453 0.00034907 0.0279253 0.0872665 0.174533 2.0944)
              y=(0.0215318 0.0218815 0.0232362 0.0234019 0.0234371 0.0230439 0.0223842 0.0220151 0.0216359 0.0210971 0.0195864 0.0195842 0.019582 0.01919 0.018008 0.0151073 -0.0653421)
        z_location: MultiplierFunction: scale=0.8230521
          SimmSpline: x=(-2.0944 2.0944) y=(0.0165 0.0165)
    Thelen2003Muscle med_gas_r: max_isometric_force=1558 optimal_fiber_length=0.06639381 tendon_slack_length=0.4315598
        pennation_angle_at_optimal=0.296706 FmaxTendonStrain=0.033 FmaxMuscleStrain=0.6 KshapeActive=0.5
        KshapePassive=4 Af=0.3 Flen=1.8 activation_time_constant=0.01 deactivation_time_constant=0.04
      PathPoint P1: femur_r (-0.0162991 -0.419637 -0.0201594)
      ConditionalPathPoint P2: femur_r (-0.0257355 -0.42957 -0.0221325) socket_coordinate=/jointset/knee_r/knee_angle_r
          range=(-0.785398 0.174533)
      PathPoint P3: calcn_r (0 0.0272 -0.00465033)
    Thelen2003Muscle lat_gas_r: max_isometric_force=683 optimal_fiber_length=0.07093103 tendon_slack_length=0.421153
        pennation_angle_at_optimal=0.1396263 FmaxTendonStrain=0.033 FmaxMuscleStrain=0.6 KshapeActive=0.5
        KshapePassive=4 Af=0.3 Flen=1.8 activation_time_constant=0.01 deactivation_time_constant=0.04
      PathPoint P1: femur_r (-0.0188727 -0.421453 0.0233335)
      ConditionalPathPoint P2: femur_r (-0.0257355 -0.429143 0.0235051) socket_coordinate=/jointset/knee_r/knee_angle_r
          range=(-0.785398 0.174533)
      PathPoint P3: calcn_r (0 0.0272 -0.00465033)
    Thelen2003Muscle soleus_r: max_isometric_force=3549 optimal_fiber_length=0.05517565 tendon_slack_length=0.2758783
        pennation_angle_at_optimal=0.4363323 FmaxTendonStrain=0.033 FmaxMuscleStrain=0.6 KshapeActive=0.5
        KshapePassive=4 Af=0.3 Flen=1.8 activation_time_constant=0.01 deactivation_time_constant=0.04
      PathPoint P1: tibia_r (-0.00197533 -0.171524 0.00584367)
      PathPoint P2: calcn_r (0 0.0272 -0.00465033)
    Thelen2003Muscle tib_post_r: max_isometric_force=1588 optimal_fiber_length=0.03342404 tendon_slack_length=0.3342404
        pennation_angle_at_optimal=0.2094395 FmaxTendonStrain=0.033 FmaxMuscleStrain=0.6 KshapeActive=0.5
        KshapePassive=4 Af=0.3 Flen=1.8 activation_time_constant=0.01 deactivation_time_constant=0.04
      PathPoint P1: tibia_r (-0.00773669 -0.150825 0.0015638)
      PathPoint P2: tibia_r (-0.011852 -0.453258 -0.0188479)
      PathPoint P3: calcn_r (0.0347989 0.0293059 -0.0250942)
      PathPoint P4: calcn_r (0.0644239 0.013951 -0.0246555)
    Thelen2003Muscle flex_dig_r: max_isometric_force=310 optimal_fiber_length=0.03350529 tendon_slack_length=0.3941799
        pennation_angle_at_optimal=0.1221731 FmaxTendonStrain=0.033 FmaxMuscleStrain=0.6 KshapeActive=0.5
        KshapePassive=4 Af=0.3 Flen=1.8 activation_time_constant=0.01 deactivation_time_constant=0.04
      PathPoint P1: tibia_r (-0.00683133 -0.228923 -0.00148149)
      PathPoint P2: tibia_r (-0.012675 -0.453258 -0.0161318)
      PathPoint P3: calcn_r (0.0363845 0.0276388 -0.0245678)
      PathPoint P4: calcn_r (0.0590831 0.0154426 -0.0230762)
      PathPoint P5: calcn_r (0.138361 -0.00710711 0.0101781)
      PathPoint P6: toes_r (-0.00158556 -0.00684388 0.0128981)
      PathPoint P7: toes_r (0.0237834 -0.00622969 0.0188645)
      PathPoint P8: toes_r (0.0368017 -0.00526452 0.0212336)
    Thelen2003Muscle flex_hal_r: max_isometric_force=322 optimal_fiber_length=0.04158134 tendon_slack_length=0.367463
        pennation_angle_at_optimal=0.1745329 FmaxTendonStrain=0.033 FmaxMuscleStrain=0.6 KshapeActive=0.5
        KshapePassive=4 Af=0.3 Flen=1.8 activation_time_constant=0.01 deactivation_time_constant=0.04
      PathPoint P1: tibia_r (-0.00650211 -0.261146 0.0200825)
      PathPoint P2: tibia_r (-0.0153088 -0.456391 -0.0143211)
      PathPoint P3: calcn_r (0.0312105 0.0242168 -0.0211458)
      PathPoint P4: calcn_r (0.0866218 0.00596646 -0.022462)
      PathPoint P5: calcn_r (0.144036 -0.00465033 -0.0236026)
      PathPoint P6: toes_r (0.0129348 -0.00561549 -0.0232516)
      PathPoint P7: toes_r (0.0468993 -0.00894969 -0.0158813)
    Thelen2003Muscle tib_ant_r: max_isometric_force=905 optimal_fiber_length=0.1061509 tendon_slack_length=0.2415475
        pennation_angle_at_optimal=0.08726646 FmaxTendonStrain=0.033 FmaxMuscleStrain=0.6 KshapeActive=0.5
        KshapePassive=4 Af=0.3 Flen=1.8 activation_time_constant=0.01 deactivation_time_constant=0.04
      PathPoint P1: tibia_r (0.0147326 -0.181706 0.0094651)
      PathPoint P2: tibia_r (0.0270784 -0.442069 -0.014568)
      PathPoint P3: calcn_r (0.0973034 0.0156181 -0.0267613)
    Thelen2003Muscle per_brev_r: max_isometric_force=435 optimal_fiber_length=0.05299912 tendon_slack_length=0.1706572
        pennation_angle_at_optimal=0.08726646 FmaxTendonStrain=0.033 FmaxMuscleStrain=0.6 KshapeActive=0.5
        KshapePassive=4 Af=0.3 Flen=1.8 activation_time_constant=0.01 deactivation_time_constant=0.04
      PathPoint P1: tibia_r (-0.00576137 -0.296055 0.0267492)
      PathPoint P2: tibia_r (-0.0162964 -0.468139 0.0232924)
      PathPoint P3: tibia_r (-0.011852 -0.480559 0.0237862)
      PathPoint P4: calcn_r (0.0393053 0.0236904 0.0204439)
      PathPoint P5: calcn_r (0.0564961 0.0192155 0.0300955)
    Thelen2003Muscle per_long_r: max_isometric_force=943 optimal_fiber_length=0.05076942 tendon_slack_length=0.3574582
        pennation_angle_at_optimal=0.1745329 FmaxTendonStrain=0.033 FmaxMuscleStrain=0.6 KshapeActive=0.5
        KshapePassive=4 Af=0.3 Flen=1.8 activation_time_constant=0.01 deactivation_time_constant=0.04
      PathPoint P1: tibia_r (0.000411526 -0.17544 0.0297945)
      PathPoint P2: tibia_r (-0.0170372 -0.470489 0.0235393)
      PathPoint P3: tibia_r (-0.0133334 -0.483244 0.0237862)
      PathPoint P4: calcn_r (0.0365514 0.0201807 0.019391)
      PathPoint P5: calcn_r (0.0568299 0.00930066 0.0249187)
      PathPoint P6: calcn_r (0.0710999 0.0060542 0.0103536)
      PathPoint P7: calcn_r (0.100391 0.00745808 -0.0161445)
    Thelen2003Muscle per_tert_r: max_isometric_force=180 optimal_fiber_length=0.0848699 tendon_slack_length=0.1074303
        pennation_angle_at_optimal=0.2268928 FmaxTendonStrain=0.033 FmaxMuscleStrain=0.6 KshapeActive=0.5
        KshapePassive=4 Af=0.3 Flen=1.8 activation_time_constant=0.01 deactivation_time_constant=0.04
      PathPoint P1: tibia_r (0.000823052 -0.313734 0.0190125)
      PathPoint P2: tibia_r (0.0188479 -0.455272 0.0130865)
      PathPoint P3: calcn_r (0.0715172 0.0200052 0.0262349)
    Thelen2003Muscle ext_dig_r: max_isometric_force=512 optimal_fiber_length=0.1043097 tendon_slack_length=0.3528123
        pennation_angle_at_optimal=0.1396263 FmaxTendonStrain=0.033 FmaxMuscleStrain=0.6 KshapeActive=0.5
        KshapePassive=4 Af=0.3 Flen=1.8 activation_time_constant=0.01 deactivation_time_constant=0.04
      PathPoint P1: tibia_r (0.00263377 -0.154517 0.0227162)
      PathPoint P2: tibia_r (0.0237862 -0.448335 0.00592598)
      PathPoint P3: calcn_r (0.0769415 0.0340439 -8.77421e-5)
      PathPoint P4: calcn_r (0.134856 0.00482581 0.0114065)
      PathPoint P5: toes_r (0.000250352 0.00412388 0.0134245)
      PathPoint P6: toes_r (0.0369686 -0.000350968 0.0219355)
    Thelen2003Muscle ext_hal_r: max_isometric_force=162 optimal_fiber_length=0.1119414 tendon_slack_length=0.3075869
        pennation_angle_at_optimal=0.1047198 FmaxTendonStrain=0.033 FmaxMuscleStrain=0.6 KshapeActive=0.5
        KshapePassive=4 Af=0.3 Flen=1.8 activation_time_constant=0.01 deactivation_time_constant=0.04
      PathPoint P1: tibia_r (0.000987663 -0.197706 0.0187656)
      PathPoint P2: tibia_r (0.0268315 -0.445873 -0.00699594)
      PathPoint P3: calcn_r (0.0809471 0.0341317 -0.0185136)
      PathPoint P4: calcn_r (0.107902 0.0271123 -0.0225497)
      PathPoint P5: calcn_r (0.144703 0.0121961 -0.0245678)
      PathPoint P6: toes_r (0.0248683 0.00359742 -0.0214968)
      PathPoint P7: toes_r (0.0469827 0.00298323 -0.01632)
    Thelen2003Muscle ercspn_r: max_isometric_force=2500 optimal_fiber_length=0.1147413 tendon_slack_length=0.02868534
        pennation_angle_at_optimal=0 FmaxTendonStrain=0.033 FmaxMuscleStrain=0.6 KshapeActive=0.5 KshapePassive=4
        Af=0.3 Flen=1.8 activation_time_constant=0.01 deactivation_time_constant=0.04
      PathPoint P1: pelvis (-0.123535 0.0387371 0.0380338)
      PathPoint P2: torso (-0.0640187 0.106414 0.0260191)
    Thelen2003Muscle intobl_r: max_isometric_force=900 optimal_fiber_length=0.09418311 tendon_slack_length=0.09418311
        pennation_angle_at_optimal=0 FmaxTendonStrain=0.033 FmaxMuscleStrain=0.6 KshapeActive=0.5 KshapePassive=4
        Af=0.3 Flen=1.8 activation_time_constant=0.01 deactivation_time_constant=0.04
      PathPoint P1: pelvis (-0.0352958 0.0617676 0.100929)
      PathPoint P2: torso (0.0814784 0.154784 0.0161945)
    Thelen2003Muscle extobl_r: max_isometric_force=900 optimal_fiber_length=0.1135495 tendon_slack_length=0.1324744
        pennation_angle_at_optimal=0 FmaxTendonStrain=0.033 FmaxMuscleStrain=0.6 KshapeActive=0.5 KshapePassive=4
        Af=0.3 Flen=1.8 activation_time_constant=0.01 deactivation_time_constant=0.04
      PathPoint P1: pelvis (-0.0264718 -0.0561203 0.00872334)
      PathPoint P2: torso (0.0756585 0.106414 0.11876)
    Thelen2003Muscle quad_lumb_r: max_isometric_force=537 optimal_fiber_length=0.1 tendon_slack_length=0.067
        pennation_angle_at_optimal=0 FmaxTendonStrain=0.033 FmaxMuscleStrain=0.6 KshapeActive=0.5 KshapePassive=4
        Af=0.3 Flen=1.8 activation_time_constant=0.01 deactivation_time_constant=0.04
      PathPoint P1: pelvis (-0.10747 0.0875 0.06372)
      PathPoint P2: torso (-0.03935 0.1414 0.05876)
    Thelen2003Muscle rect_abd_r: max_isometric_force=466 optimal_fiber_length=0.333 tendon_slack_length=0.082
        pennation_angle_at_optimal=0 FmaxTendonStrain=0.033 FmaxMuscleStrain=0.6 KshapeActive=0.5 KshapePassive=4
        Af=0.3 Flen=1.8 activation_time_constant=0.01 deactivation_time_constant=0.04
      PathPoint P1: pelvis (-0.02147 -0.0645 0.02172)
      PathPoint P2: pelvis (0.00053 0.0275 0.02472)
      PathPoint P3: torso (0.11065 0.1764 0.03576)
      PathPoint P4: torso (0.09565 0.2364 0.03676)
    Thelen2003Muscle glut_med1_l: max_isometric_force=819 optimal_fiber_length=0.04790465
        tendon_slack_length=0.06984229 pennation_angle_at_optimal=0.1396263 FmaxTendonStrain=0.033 FmaxMuscleStrain=0.6
        KshapeActive=0.5 KshapePassive=4 Af=0.3 Flen=1.8 activation_time_constant=0.01 deactivation_time_constant=0.04
      PathPoint P1: pelvis (-0.0360017 0.0268248 -0.105465)
      PathPoint P2: femur_l (-0.0187011 -0.0124962 -0.0476106)
    Thelen2003Muscle glut_med2_l: max_isometric_force=573 optimal_fiber_length=0.0747538 tendon_slack_length=0.046887
        pennation_angle_at_optimal=0 FmaxTendonStrain=0.033 FmaxMuscleStrain=0.6 KshapeActive=0.5 KshapePassive=4
        Af=0.3 Flen=1.8 activation_time_constant=0.01 deactivation_time_constant=0.04
      PathPoint P1: pelvis (-0.0754447 0.0392665 -0.0668208)
      PathPoint P2: femur_l (-0.0221325 -0.00619469 -0.0452086)
    Thelen2003Muscle glut_med3_l: max_isometric_force=653 optimal_fiber_length=0.05692571
        tendon_slack_length=0.04670376 pennation_angle_at_optimal=0.3316126 FmaxTendonStrain=0.033 FmaxMuscleStrain=0.6
        KshapeActive=0.5 KshapePassive=4 Af=0.3 Flen=1.8 activation_time_constant=0.01 deactivation_time_constant=0.04
      PathPoint P1: pelvis (-0.107917 0.00926514 -0.0565272)
      PathPoint P2: femur_l (-0.0265075 -0.00501984 -0.0444366)
    Thelen2003Muscle glut_min1_l: max_isometric_force=270 optimal_fiber_length=0.06089982
        tendon_slack_length=0.01432937 pennation_angle_at_optimal=0.1745329 FmaxTendonStrain=0.033 FmaxMuscleStrain=0.6
        KshapeActive=0.5 KshapePassive=4 Af=0.3 Flen=1.8 activation_time_constant=0.01 deactivation_time_constant=0.04
      PathPoint P1: pelvis (-0.0412078 -0.00705915 -0.0921185)
      PathPoint P2: femur_l (-0.00617651 -0.0111077 -0.0480395)
    Thelen2003Muscle glut_min2_l: max_isometric_force=285 optimal_fiber_length=0.05010659
        tendon_slack_length=0.02326378 pennation_angle_at_optimal=0 FmaxTendonStrain=0.033 FmaxMuscleStrain=0.6
        KshapeActive=0.5 KshapePassive=4 Af=0.3 Flen=1.8 activation_time_constant=0.01 deactivation_time_constant=0.04
      PathPoint P1: pelvis (-0.0558556 -0.00573556 -0.0864483)
      PathPoint P2: femur_l (-0.00823535 -0.0111077 -0.0480395)
    Thelen2003Muscle glut_min3_l: max_isometric_force=323 optimal_fiber_length=0.03371841
        tendon_slack_length=0.04525366 pennation_angle_at_optimal=0.01745329 FmaxTendonStrain=0.033
        FmaxMuscleStrain=0.6 KshapeActive=0.5 KshapePassive=4 Af=0.3 Flen=1.8 activation_time_constant=0.01
        deactivation_time_constant=0.04
      PathPoint P1: pelvis (-0.0735917 -0.00555908 -0.0746718)
      PathPoint P2: femur_l (-0.011581 -0.00886482 -0.0471817)
    Thelen2003Muscle semimem_l: max_isometric_force=1288 optimal_fiber_length=0.08684036 tendon_slack_length=0.3896961
        pennation_angle_at_optimal=0.2617994 FmaxTendonStrain=0.033 FmaxMuscleStrain=0.6 KshapeActive=0.5
        KshapePassive=4 Af=0.3 Flen=1.8 activation_time_constant=0.01 deactivation_time_constant=0.04
      PathPoint P1: pelvis (-0.105181 -0.086007 -0.0623806)
      ConditionalPathPoint P2: tibia_l (-0.0286422 -0.0393734 0.0155639)
          socket_coordinate=/jointset/knee_l/knee_angle_l range=(-0.558505 0.174533)
      PathPoint P3: tibia_l (-0.0222224 -0.0533817 0.0161071)
    Thelen2003Muscle semiten_l: max_isometric_force=410 optimal_fiber_length=0.2174664 tendon_slack_length=0.2764312
        pennation_angle_at_optimal=0.08726646 FmaxTendonStrain=0.033 FmaxMuscleStrain=0.6 KshapeActive=0.5
        KshapePassive=4 Af=0.3 Flen=1.8 activation_time_constant=0.01 deactivation_time_constant=0.04
      PathPoint P1: pelvis (-0.111491 -0.0969575 -0.0526803)
      ConditionalPathPoint P2: tibia_l (-0.0345929 -0.0319888 0.0187409)
          socket_coordinate=/jointset/knee_l/knee_angle_l range=(-0.331613 0.174533)
      PathPoint P3: tibia_l (-0.0273418 -0.0590992 0.0188314)
      PathPoint P4: tibia_l (-0.00930049 -0.0834684 0.0201648)
      PathPoint P5: tibia_l (0.00222224 -0.106965 0.0158849)
    Thelen2003Muscle bifemlh_l: max_isometric_force=896 optimal_fiber_length=0.1184379 tendon_slack_length=0.3542272
        pennation_angle_at_optimal=0 FmaxTendonStrain=0.033 FmaxMuscleStrain=0.6 KshapeActive=0.5 KshapePassive=4
        Af=0.3 Flen=1.8 activation_time_constant=0.01 deactivation_time_constant=0.04
      PathPoint P1: pelvis (-0.111146 -0.0905072 -0.0605749)
      PathPoint P2: tibia_l (-0.0247739 -0.0402797 -0.0242224)
      PathPoint P3: tibia_l (-0.0192594 -0.0629929 -0.0282307)
    Thelen2003Muscle bifemsh_l: max_isometric_force=804 optimal_fiber_length=0.1851823 tendon_slack_length=0.09526722
        pennation_angle_at_optimal=0.4014257 FmaxTendonStrain=0.033 FmaxMuscleStrain=0.6 KshapeActive=0.5
        KshapePassive=4 Af=0.3 Flen=1.8 activation_time_constant=0.01 deactivation_time_constant=0.04
      PathPoint P1: femur_l (0.00428924 -0.225465 -0.0200737)
      PathPoint P2: tibia_l (-0.0247739 -0.0402797 -0.0242224)
      PathPoint P3: tibia_l (-0.0192594 -0.0629929 -0.0282307)
    Thelen2003Muscle sar_l: max_isometric_force=156 optimal_fiber_length=0.5397349 tendon_slack_length=0.1037952
        pennation_angle_at_optimal=0 FmaxTendonStrain=0.033 FmaxMuscleStrain=0.6 KshapeActive=0.5 KshapePassive=4
        Af=0.3 Flen=1.8 activation_time_constant=0.01 deactivation_time_constant=0.04
      PathPoint P1: pelvis (-0.0135006 -0.00114711 -0.108344)
      PathPoint P2: femur_l (-0.00257355 -0.38108 0.0361154)
      PathPoint P3: tibia_l (-0.00460909 -0.046881 0.0328398)
      PathPoint P4: tibia_l (0.00493831 -0.065902 0.0315229)
      PathPoint P5: tibia_l (0.0200002 -0.0939859 0.0207409)
    Thelen2003Muscle add_long_l: max_isometric_force=627 optimal_fiber_length=0.1443343 tendon_slack_length=0.1150491
        pennation_angle_at_optimal=0.1047198 FmaxTendonStrain=0.033 FmaxMuscleStrain=0.6 KshapeActive=0.5
        KshapePassive=4 Af=0.3 Flen=1.8 activation_time_constant=0.01 deactivation_time_constant=0.04
      PathPoint P1: pelvis (-0.0278837 -0.0737682 -0.0147424)
      PathPoint P2: femur_l (0.00428924 -0.225465 -0.0200737)
    Thelen2003Muscle add_brev_l: max_isometric_force=429 optimal_fiber_length=0.1326204 tendon_slack_length=0.01994291
        pennation_angle_at_optimal=0 FmaxTendonStrain=0.033 FmaxMuscleStrain=0.6 KshapeActive=0.5 KshapePassive=4
        Af=0.3 Flen=1.8 activation_time_constant=0.01 deactivation_time_constant=0.04
      PathPoint P1: pelvis (-0.0517965 -0.0807391 -0.0143063)
      PathPoint P2: femur_l (0.000772064 -0.127739 -0.0252207)
    Thelen2003Muscle add_mag1_l: max_isometric_force=381 optimal_fiber_length=0.08731901 tendon_slack_length=0.06022001
        pennation_angle_at_optimal=0.08726646 FmaxTendonStrain=0.033 FmaxMuscleStrain=0.6 KshapeActive=0.5
        KshapePassive=4 Af=0.3 Flen=1.8 activation_time_constant=0.01 deactivation_time_constant=0.04
      PathPoint P1: pelvis (-0.0645913 -0.103593 -0.0222445)
      PathPoint P2: femur_l (-0.00386032 -0.129341 -0.0290811)
    Thelen2003Muscle add_mag2_l: max_isometric_force=343 optimal_fiber_length=0.131479 tendon_slack_length=0.1303924
        pennation_angle_at_optimal=0.05235988 FmaxTendonStrain=0.033 FmaxMuscleStrain=0.6 KshapeActive=0.5
        KshapePassive=4 Af=0.3 Flen=1.8 activation_time_constant=0.01 deactivation_time_constant=0.04
      PathPoint P1: pelvis (-0.073327 -0.105181 -0.0268679)
      PathPoint P2: femur_l (0.00463238 -0.24405 -0.0194732)
    Thelen2003Muscle add_mag3_l: max_isometric_force=488 optimal_fiber_length=0.1428841 tendon_slack_length=0.271589
        pennation_angle_at_optimal=0.08726646 FmaxTendonStrain=0.033 FmaxMuscleStrain=0.6 KshapeActive=0.5
        KshapePassive=4 Af=0.3 Flen=1.8 activation_time_constant=0.01 deactivation_time_constant=0.04
      PathPoint P1: pelvis (-0.0980163 -0.100708 -0.0425873)
      PathPoint P2: femur_l (0.00600494 -0.409811 0.0228188)
    Thelen2003Muscle tfl_l: max_isometric_force=233 optimal_fiber_length=0.09880501 tendon_slack_length=0.4420224
        pennation_angle_at_optimal=0.05235988 FmaxTendonStrain=0.033 FmaxMuscleStrain=0.6 KshapeActive=0.5
        KshapePassive=4 Af=0.3 Flen=1.8 activation_time_constant=0.01 deactivation_time_constant=0.04
      PathPoint P1: pelvis (-0.0274425 0.0188832 -0.108257)
      PathPoint P2: femur_l (0.0252207 -0.106271 -0.0512136)
      PathPoint P3: femur_l (0.00463238 -0.432454 -0.0306252)
      PathPoint P4: tibia_l (0.00493831 -0.0544894 -0.0244446)
    Thelen2003Muscle pect_l: max_isometric_force=266 optimal_fiber_length=0.09833403 tendon_slack_length=0.03245023
        pennation_angle_at_optimal=0 FmaxTendonStrain=0.033 FmaxMuscleStrain=0.6 KshapeActive=0.5 KshapePassive=4
        Af=0.3 Flen=1.8 activation_time_constant=0.01 deactivation_time_constant=0.04
      PathPoint P1: pelvis (-0.0380312 -0.0677679 -0.0393423)
      PathPoint P2: femur_l (-0.0104658 -0.0877937 -0.0217036)
    Thelen2003Muscle grac_l: max_isometric_force=162 optimal_fiber_length=0.3825507 tendon_slack_length=0.1369358
        pennation_angle_at_optimal=0.05235988 FmaxTendonStrain=0.033 FmaxMuscleStrain=0.6 KshapeActive=0.5
        KshapePassive=4 Af=0.3 Flen=1.8 activation_time_constant=0.01 deactivation_time_constant=0.04
      PathPoint P1: pelvis (-0.065306 -0.10474 -0.024373)
      ConditionalPathPoint P2: tibia_l (-0.0218685 -0.0356922 0.031062) socket_coordinate=/jointset/knee_l/knee_angle_l
          range=(-0.436332 0.174533)
      PathPoint P3: tibia_l (-0.0159919 -0.0576558 0.0294653)
      PathPoint P4: tibia_l (0.00493831 -0.0935383 0.0187656)
    Thelen2003Muscle glut_max1_l: max_isometric_force=573 optimal_fiber_length=0.1317114 tendon_slack_length=0.1159431
        pennation_angle_at_optimal=0.08726646 FmaxTendonStrain=0.033 FmaxMuscleStrain=0.6 KshapeActive=0.5
        KshapePassive=4 Af=0.3 Flen=1.8 activation_time_constant=0.01 deactivation_time_constant=0.04
      PathPoint P1: pelvis (-0.105446 0.0540025 -0.0610634)
      PathPoint P2: pelvis (-0.113917 0.00105887 -0.0772888)
      PathPoint P3: femur_l (-0.0392037 -0.0264877 -0.0336277)
      PathPoint P4: femur_l (-0.0237624 -0.0604517 -0.0403189)
    Thelen2003Muscle glut_max2_l: max_isometric_force=819 optimal_fiber_length=0.1413112 tendon_slack_length=0.1220852
        pennation_angle_at_optimal=0 FmaxTendonStrain=0.033 FmaxMuscleStrain=0.6 KshapeActive=0.5 KshapePassive=4
        Af=0.3 Flen=1.8 activation_time_constant=0.01 deactivation_time_constant=0.04
      PathPoint P1: pelvis (-0.119035 0.0155301 -0.0491124)
      PathPoint P2: pelvis (-0.121417 -0.0458845 -0.0797313)
      PathPoint P3: femur_l (-0.0365444 -0.0566067 -0.025135)
      PathPoint P4: femur_l (-0.0133824 -0.108514 -0.0359439)
    Thelen2003Muscle glut_max3_l: max_isometric_force=552 optimal_fiber_length=0.1381372 tendon_slack_length=0.1390964
        pennation_angle_at_optimal=0.08726646 FmaxTendonStrain=0.033 FmaxMuscleStrain=0.6 KshapeActive=0.5
        KshapePassive=4 Af=0.3 Flen=1.8 activation_time_constant=0.01 deactivation_time_constant=0.04
      PathPoint P1: pelvis (-0.137301 -0.0277072 -0.00505954)
      PathPoint P2: pelvis (-0.134918 -0.0928279 -0.0351551)
      PathPoint P3: femur_l (-0.0256497 -0.111184 -0.011581)
      PathPoint P4: femur_l (-0.00514709 -0.151556 -0.0352576)
    Thelen2003Muscle iliacus_l: max_isometric_force=1073 optimal_fiber_length=0.09187246 tendon_slack_length=0.09187246
        pennation_angle_at_optimal=0.1221731 FmaxTendonStrain=0.033 FmaxMuscleStrain=0.6 KshapeActive=0.5
        KshapePassive=4 Af=0.3 Flen=1.8 activation_time_constant=0.01 deactivation_time_constant=0.04
      PathPoint P1: pelvis (-0.0594734 0.0322074 -0.0744973)
      PathPoint P2: pelvis (-0.0227658 -0.0485317 -0.0707463)
      ConditionalPathPoint P3: pelvis (-0.025413 -0.0710327 -0.0711825) socket_coordinate=/jointset/hip_l/hip_flexion_l
          range=(-1.5708 0.785398)
      PathPoint P4: femur_l (0.00145834 -0.0579951 -0.00488974)
      PathPoint P5: femur_l (-0.0165565 -0.0663259 -0.0110662)
    Thelen2003Muscle psoas_l: max_isometric_force=1113 optimal_fiber_length=0.09085087 tendon_slack_length=0.1453614
        pennation_angle_at_optimal=0.1396263 FmaxTendonStrain=0.033 FmaxMuscleStrain=0.6 KshapeActive=0.5
        KshapePassive=4 Af=0.3 Flen=1.8 activation_time_constant=0.01 deactivation_time_constant=0.04
      PathPoint P1: pelvis (-0.0570909 0.0782684 -0.0252105)
      PathPoint P2: pelvis (-0.021001 -0.0502965 -0.0662102)
      ConditionalPathPoint P3: pelvis (-0.025413 -0.0710327 -0.0711825) socket_coordinate=/jointset/hip_l/hip_flexion_l
          range=(-1.5708 0.785398)
      PathPoint P4: femur_l (0.00137256 -0.0541502 -0.00325982)
      PathPoint P5: femur_l (-0.0161276 -0.0637626 -0.00892163)
    Thelen2003Muscle quad_fem_l: max_isometric_force=381 optimal_fiber_length=0.04607884 tendon_slack_length=0.02047948
        pennation_angle_at_optimal=0 FmaxTendonStrain=0.033 FmaxMuscleStrain=0.6 KshapeActive=0.5 KshapePassive=4
        Af=0.3 Flen=1.8 activation_time_constant=0.01 deactivation_time_constant=0.04
      PathPoint P1: pelvis (-0.100858 -0.101564 -0.0453614)
      PathPoint P2: femur_l (-0.032684 -0.038343 -0.0313973)
    Thelen2003Muscle gem_l: max_isometric_force=164 optimal_fiber_length=0.02079838 tendon_slack_length=0.03379737
        pennation_angle_at_optimal=0 FmaxTendonStrain=0.033 FmaxMuscleStrain=0.6 KshapeActive=0.5 KshapePassive=4
        Af=0.3 Flen=1.8 activation_time_constant=0.01 deactivation_time_constant=0.04
      PathPoint P1: pelvis (-0.0999753 -0.0723563 -0.0622847)
      PathPoint P2: femur_l (-0.0121815 -0.00352457 -0.0380027)
    Thelen2003Muscle peri_l: max_isometric_force=444 optimal_fiber_length=0.0227971 tendon_slack_length=0.1008333
        pennation_angle_at_optimal=0.1745329 FmaxTendonStrain=0.033 FmaxMuscleStrain=0.6 KshapeActive=0.5
        KshapePassive=4 Af=0.3 Flen=1.8 activation_time_constant=0.01 deactivation_time_constant=0.04
      PathPoint P1: pelvis (-0.123182 0.000264718 -0.0204999)
      PathPoint P2: pelvis (-0.10527 -0.0243541 -0.0573123)
      PathPoint P3: femur_l (-0.0126962 -0.00384498 -0.037488)
    Thelen2003Muscle rect_fem_l: max_isometric_force=1169 optimal_fiber_length=0.1195832 tendon_slack_length=0.3251824
        pennation_angle_at_optimal=0.08726646 FmaxTendonStrain=0.033 FmaxMuscleStrain=0.6 KshapeActive=0.5
        KshapePassive=4 Af=0.3 Flen=1.8 activation_time_constant=0.01 deactivation_time_constant=0.04
      PathPoint P1: pelvis (-0.0260306 -0.0274425 -0.0844419)
      ConditionalPathPoint P2: femur_l (0.0286521 -0.430424 -0.00162991)
          socket_coordinate=/jointset/knee_l/knee_angle_l range=(-2.61799 -1.45997)
      MovingPathPoint P3: tibia_l (0.0508297 0.0234786 -0.00115227) socket_x_coordinate=/jointset/knee_l/knee_angle_l
          socket_y_coordinate=/jointset/knee_l/knee_angle_l socket_z_coordinate=/jointset/knee_l/knee_angle_l
        x_location: MultiplierFunction: scale=0.8230521
          SimmSpline: x=(-2.0944 -1.99997 -1.5708 -1.45752 -1.39626 -1.0472 -0.698132 -0.526391 -0.349066 -0.174533 0 0.00017453 0.00034907 0.0279253 0.0872665 0.174533 2.0944)
              y=(0.0155805 0.0179938 0.0275081 0.0296564 0.0307615 0.0365695 0.0422074 0.0450902 0.048391 0.0534299 0.0617576 0.0617669 0.0617762 0.0633083 0.066994 0.0733035 0.0573481)
        y_location: MultiplierFunction: scale=1.118879
          SimmSpline: x=(-2.0944 -1.99997 -1.5708 -1.45752 -1.39626 -1.0472 -0.698132 -0.526391 -0.349066 -0.174533 0 0.00017453 0.00034907 0.0279253 0.0872665 0.174533 2.0944)
              y=(0.0234116 0.0237613 0.0251141 0.0252795 0.0253146 0.0249184 0.0242373 0.0238447 0.0234197 0.0227644 0.020984 0.0209814 0.0209788 0.0205225 0.0191754 0.0159554 -0.0673774)
        z_location: MultiplierFunction: scale=0.8230521
          SimmSpline: x=(-2.0944 0.1745) y=(-0.0014 -0.0014)
    Thelen2003Muscle vas_med_l: max_isometric_force=1294 optimal_fiber_length=0.09277826 tendon_slack_length=0.131349
        pennation_angle_at_optimal=0.08726646 FmaxTendonStrain=0.033 FmaxMuscleStrain=0.6 KshapeActive=0.5
        KshapePassive=4 Af=0.3 Flen=1.8 activation_time_constant=0.01 deactivation_time_constant=0.04
      PathPoint P1: femur_l (0.0120099 -0.224184 -0.0161276)
      PathPoint P2: femur_l (0.0305394 -0.295743 -0.000772064)
      ConditionalPathPoint P3: femur_l (0.0317404 -0.432347 0.0107231) socket_coordinate=/jointset/knee_l/knee_angle_l
          range=(-2.61799 -1.21004)
      ConditionalPathPoint P4: femur_l (0.0235051 -0.454455 0.0112378) socket_coordinate=/jointset/knee_l/knee_angle_l
          range=(-2.61799 -1.78006)
      MovingPathPoint P5: tibia_l (0.0460568 0.0243823 0.0120166) socket_x_coordinate=/jointset/knee_l/knee_angle_l
          socket_y_coordinate=/jointset/knee_l/knee_angle_l socket_z_coordinate=/jointset/knee_l/knee_angle_l
        x_location: MultiplierFunction: scale=0.8230521
          SimmSpline: x=(-2.0944 -1.99997 -1.5708 -1.45752 -1.39626 -1.0472 -0.698132 -0.526391 -0.349066 -0.174533 0 0.00017453 0.00034907 0.0279253 0.0872665 0.174533 2.0944)
              y=(0.00981097 0.0122243 0.0217371 0.0238851 0.0249902 0.0307959 0.0364187 0.0392871 0.0425654 0.0475764 0.0559586 0.0559681 0.0559776 0.0575419 0.0613368 0.0679503 0.0629332)
        y_location: MultiplierFunction: scale=1.118879
          SimmSpline: x=(-2.0944 -1.99997 -1.5708 -1.45752 -1.39626 -1.0472 -0.698132 -0.526391 -0.349066 -0.174533 0 0.00017453 0.00034907 0.0279253 0.0872665 0.174533 2.0944)
              y=(0.0224154 0.0227651 0.0241265 0.0242933 0.0243287 0.0239462 0.0233593 0.0230677 0.0228342 0.0226362 0.0217917 0.0217903 0.0217889 0.0215365 0.0206842 0.0183269 -0.0656205)
        z_location: MultiplierFunction: scale=0.8230521
          SimmSpline: x=(-2.0944 2.0944) y=(0.0146 0.0146)
    Thelen2003Muscle vas_int_l: max_isometric_force=1365 optimal_fiber_length=0.09151221 tendon_slack_length=0.1430536
        pennation_angle_at_optimal=0.05235988 FmaxTendonStrain=0.033 FmaxMuscleStrain=0.6 KshapeActive=0.5
        KshapePassive=4 Af=0.3 Flen=1.8 activation_time_constant=0.01 deactivation_time_constant=0.04
      PathPoint P1: femur_l (0.0248776 -0.205493 -0.0265933)
      PathPoint P2: femur_l (0.0287379 -0.222582 -0.0244487)
      ConditionalPathPoint P3: femur_l (0.0294242 -0.430424 -0.00471817)
          socket_coordinate=/jointset/knee_l/knee_angle_l range=(-2.61799 -1.42)
      MovingPathPoint P4: tibia_l (0.0508297 0.0234786 -0.00115227) socket_x_coordinate=/jointset/knee_l/knee_angle_l
          socket_y_coordinate=/jointset/knee_l/knee_angle_l socket_z_coordinate=/jointset/knee_l/knee_angle_l
        x_location: MultiplierFunction: scale=0.8230521
          SimmSpline: x=(-2.0944 -1.99997 -1.5708 -1.45752 -1.39626 -1.0472 -0.698132 -0.526391 -0.349066 -0.174533 0 0.00017453 0.00034907 0.0279253 0.0872665 0.174533 2.0944)
              y=(0.0155805 0.0179938 0.0275081 0.0296564 0.0307615 0.0365695 0.0422074 0.0450902 0.048391 0.0534299 0.0617576 0.0617669 0.0617762 0.0633083 0.066994 0.0733035 0.0573481)
        y_location: MultiplierFunction: scale=1.118879
          SimmSpline: x=(-2.0944 -1.99997 -1.5708 -1.45752 -1.39626 -1.0472 -0.698132 -0.526391 -0.349066 -0.174533 0 0.00017453 0.00034907 0.0279253 0.0872665 0.174533 2.0944)
              y=(0.0234116 0.0237613 0.0251141 0.0252795 0.0253146 0.0249184 0.0242373 0.0238447 0.0234197 0.0227644 0.020984 0.0209814 0.0209788 0.0205225 0.0191754 0.0159554 -0.0673774)
        z_location: MultiplierFunction: scale=0.8230521
          SimmSpline: x=(-2.0944 0.1745) y=(-0.0014 -0.0014)
    Thelen2003Muscle vas_lat_l: max_isometric_force=1871 optimal_fiber_length=0.08772702 tendon_slack_length=0.163966
        pennation_angle_at_optimal=0.08726646 FmaxTendonStrain=0.033 FmaxMuscleStrain=0.6 KshapeActive=0.5
        KshapePassive=4 Af=0.3 Flen=1.8 activation_time_constant=0.01 deactivation_time_constant=0.04
      PathPoint P1: femur_l (0.00411767 -0.198017 -0.0299389)
      PathPoint P2: femur_l (0.0230761 -0.276732 -0.035086)
      ConditionalPathPoint P3: femur_l (0.0309683 -0.430424 -0.0175859) socket_coordinate=/jointset/knee_l/knee_angle_l
          range=(-2.61799 -1.21004)
      ConditionalPathPoint P4: femur_l (0.0217036 -0.453174 -0.0157844) socket_coordinate=/jointset/knee_l/knee_angle_l
          range=(-2.61799 -1.92004)
      MovingPathPoint P5: tibia_l (0.0493467 0.0219148 -0.0135804) socket_x_coordinate=/jointset/knee_l/knee_angle_l
          socket_y_coordinate=/jointset/knee_l/knee_angle_l socket_z_coordinate=/jointset/knee_l/knee_angle_l
        x_location: MultiplierFunction: scale=0.8230521
          SimmSpline: x=(-2.0944 -1.99997 -1.5708 -1.45752 -1.39626 -1.0472 -0.698132 -0.526391 -0.349066 -0.174533 0 0.00017453 0.00034907 0.0279253 0.0872665 0.174533 2.0944)
              y=(0.0142897 0.016703 0.0262145 0.0283623 0.0294674 0.0352709 0.0408785 0.0437291 0.0469704 0.0518742 0.0599557 0.0599647 0.0599738 0.0614577 0.0650351 0.0711867 0.0583766)
        y_location: MultiplierFunction: scale=1.118879
          SimmSpline: x=(-2.0944 -1.99997 -1.5708 -1.45752 -1.39626 -1.0472 -0.698132 -0.526391 -0.349066 -0.174533 0 0.00017453 0.00034907 0.0279253 0.0872665 0.174533 2.0944)
              y=(0.0215318 0.0218815 0.0232362 0.0234019 0.0234371 0.0230439 0.0223842 0.0220151 0.0216359 0.0210971 0.0195864 0.0195842 0.019582 0.01919 0.018008 0.0151073 -0.0653421)
        z_location: MultiplierFunction: scale=0.8230521
          SimmSpline: x=(-2.0944 2.0944) y=(-0.0165 -0.0165)
    Thelen2003Muscle med_gas_l: max_isometric_force=1558 optimal_fiber_length=0.06639381 tendon_slack_length=0.4315598
        pennation_angle_at_optimal=0.296706 FmaxTendonStrain=0.033 FmaxMuscleStrain=0.6 KshapeActive=0.5
        KshapePassive=4 Af=0.3 Flen=1.8 activation_time_constant=0.01 deactivation_time_constant=0.04
      PathPoint P1: femur_l (-0.0162991 -0.419637 0.0201594)
      ConditionalPathPoint P2: femur_l (-0.0257355 -0.42957 0.0221325) socket_coordinate=/jointset/knee_l/knee_angle_l
          range=(-0.785398 0.174533)
      PathPoint P3: calcn_l (0 0.0272 0.00465033)
    Thelen2003Muscle lat_gas_l: max_isometric_force=683 optimal_fiber_length=0.07093103 tendon_slack_length=0.421153
        pennation_angle_at_optimal=0.1396263 FmaxTendonStrain=0.033 FmaxMuscleStrain=0.6 KshapeActive=0.5
        KshapePassive=4 Af=0.3 Flen=1.8 activation_time_constant=0.01 deactivation_time_constant=0.04
      PathPoint P1: femur_l (-0.0188727 -0.421453 -0.0233335)
      ConditionalPathPoint P2: femur_l (-0.0257355 -0.429143 -0.0235051)
          socket_coordinate=/jointset/knee_l/knee_angle_l range=(-0.785398 0.174533)
      PathPoint P3: calcn_l (0 0.0272 0.00465033)
    Thelen2003Muscle soleus_l: max_isometric_force=3549 optimal_fiber_length=0.05517565 tendon_slack_length=0.2758783
        pennation_angle_at_optimal=0.4363323 FmaxTendonStrain=0.033 FmaxMuscleStrain=0.6 KshapeActive=0.5
        KshapePassive=4 Af=0.3 Flen=1.8 activation_time_constant=0.01 deactivation_time_constant=0.04
      PathPoint P1: tibia_l (-0.00197533 -0.171524 -0.00584367)
      PathPoint P2: calcn_l (0 0.0272 0.00465033)
    Thelen2003Muscle tib_post_l: max_isometric_force=1588 optimal_fiber_length=0.03342404 tendon_slack_length=0.3342404
        pennation_angle_at_optimal=0.2094395 FmaxTendonStrain=0.033 FmaxMuscleStrain=0.6 KshapeActive=0.5
        KshapePassive=4 Af=0.3 Flen=1.8 activation_time_constant=0.01 deactivation_time_constant=0.04
      PathPoint P1: tibia_l (-0.00773669 -0.150825 -0.0015638)
      PathPoint P2: tibia_l (-0.011852 -0.453258 0.0188479)
      PathPoint P3: calcn_l (0.0347989 0.0293059 0.0250942)
      PathPoint P4: calcn_l (0.0644239 0.013951 0.0246555)
    Thelen2003Muscle flex_dig_l: max_isometric_force=310 optimal_fiber_length=0.03350529 tendon_slack_length=0.3941799
        pennation_angle_at_optimal=0.1221731 FmaxTendonStrain=0.033 FmaxMuscleStrain=0.6 KshapeActive=0.5
        KshapePassive=4 Af=0.3 Flen=1.8 activation_time_constant=0.01 deactivation_time_constant=0.04
      PathPoint P1: tibia_l (-0.00683133 -0.228923 0.00148149)
      PathPoint P2: tibia_l (-0.012675 -0.453258 0.0161318)
      PathPoint P3: calcn_l (0.0363845 0.0276388 0.0245678)
      PathPoint P4: calcn_l (0.0590831 0.0154426 0.0230762)
      PathPoint P5: calcn_l (0.138361 -0.00710711 -0.0101781)
      PathPoint P6: toes_l (-0.00158556 -0.00684388 -0.0128981)
      PathPoint P7: toes_l (0.0237834 -0.00622969 -0.0188645)
      PathPoint P8: toes_l (0.0368017 -0.00526452 -0.0212336)
    Thelen2003Muscle flex_hal_l: max_isometric_force=322 optimal_fiber_length=0.04158134 tendon_slack_length=0.367463
        pennation_angle_at_optimal=0.1745329 FmaxTendonStrain=0.033 FmaxMuscleStrain=0.6 KshapeActive=0.5
        KshapePassive=4 Af=0.3 Flen=1.8 activation_time_constant=0.01 deactivation_time_constant=0.04
      PathPoint P1: tibia_l (-0.00650211 -0.261146 -0.0200825)
      PathPoint P2: tibia_l (-0.0153088 -0.456391 0.0143211)
      PathPoint P3: calcn_l (0.0312105 0.0242168 0.0211458)
      PathPoint P4: calcn_l (0.0866218 0.00596646 0.022462)
      PathPoint P5: calcn_l (0.144036 -0.00465033 0.0236026)
      PathPoint P6: toes_l (0.0129348 -0.00561549 0.0232516)
      PathPoint P7: toes_l (0.0468993 -0.00894969 0.0158813)
    Thelen2003Muscle tib_ant_l: max_isometric_force=905 optimal_fiber_length=0.1061509 tendon_slack_length=0.2415475
        pennation_angle_at_optimal=0.08726646 FmaxTendonStrain=0.033 FmaxMuscleStrain=0.6 KshapeActive=0.5
        KshapePassive=4 Af=0.3 Flen=1.8 activation_time_constant=0.01 deactivation_time_constant=0.04
      PathPoint P1: tibia_l (0.0147326 -0.181706 -0.0094651)
      PathPoint P2: tibia_l (0.0270784 -0.442069 0.014568)
      PathPoint P3: calcn_l (0.0973034 0.0156181 0.0267613)
    Thelen2003Muscle per_brev_l: max_isometric_force=435 optimal_fiber_length=0.05299912 tendon_slack_length=0.1706572
        pennation_angle_at_optimal=0.08726646 FmaxTendonStrain=0.033 FmaxMuscleStrain=0.6 KshapeActive=0.5
        KshapePassive=4 Af=0.3 Flen=1.8 activation_time_constant=0.01 deactivation_time_constant=0.04
      PathPoint P1: tibia_l (-0.00576137 -0.296055 -0.0267492)
      PathPoint P2: tibia_l (-0.0162964 -0.468139 -0.0232924)
      PathPoint P3: tibia_l (-0.011852 -0.480559 -0.0237862)
      PathPoint P4: calcn_l (0.0393053 0.0236904 -0.0204439)
      PathPoint P5: calcn_l (0.0564961 0.0192155 -0.0300955)
    Thelen2003Muscle per_long_l: max_isometric_force=943 optimal_fiber_length=0.05076942 tendon_slack_length=0.3574582
        pennation_angle_at_optimal=0.1745329 FmaxTendonStrain=0.033 FmaxMuscleStrain=0.6 KshapeActive=0.5
        KshapePassive=4 Af=0.3 Flen=1.8 activation_time_constant=0.01 deactivation_time_constant=0.04
      PathPoint P1: tibia_l (0.000411526 -0.17544 -0.0297945)
      PathPoint P2: tibia_l (-0.0170372 -0.470489 -0.0235393)
      PathPoint P3: tibia_l (-0.0133334 -0.483244 -0.0237862)
      PathPoint P4: calcn_l (0.0365514 0.0201807 -0.019391)
      PathPoint P5: calcn_l (0.0568299 0.00930066 -0.0249187)
      PathPoint P6: calcn_l (0.0710999 0.0060542 -0.0103536)
      PathPoint P7: calcn_l (0.100391 0.00745808 0.0161445)
    Thelen2003Muscle per_tert_l: max_isometric_force=180 optimal_fiber_length=0.0848699 tendon_slack_length=0.1074303
        pennation_angle_at_optimal=0.2268928 FmaxTendonStrain=0.033 FmaxMuscleStrain=0.6 KshapeActive=0.5
        KshapePassive=4 Af=0.3 Flen=1.8 activation_time_constant=0.01 deactivation_time_constant=0.04
      PathPoint P1: tibia_l (0.000823052 -0.313734 -0.0190125)
      PathPoint P2: tibia_l (0.0188479 -0.455272 -0.0130865)
      PathPoint P3: calcn_l (0.0715172 0.0200052 -0.0262349)
    Thelen2003Muscle ext_dig_l: max_isometric_force=512 optimal_fiber_length=0.1043097 tendon_slack_length=0.3528123
        pennation_angle_at_optimal=0.1396263 FmaxTendonStrain=0.033 FmaxMuscleStrain=0.6 KshapeActive=0.5
        KshapePassive=4 Af=0.3 Flen=1.8 activation_time_constant=0.01 deactivation_time_constant=0.04
      PathPoint P1: tibia_l (0.00263377 -0.154517 -0.0227162)
      PathPoint P2: tibia_l (0.0237862 -0.448335 -0.00592598)
      PathPoint P3: calcn_l (0.0769415 0.0340439 8.77421e-5)
      PathPoint P4: calcn_l (0.134856 0.00482581 -0.0114065)
      PathPoint P5: toes_l (0.000250352 0.00412388 -0.0134245)
      PathPoint P6: toes_l (0.0369686 -0.000350968 -0.0219355)
    Thelen2003Muscle ext_hal_l: max_isometric_force=162 optimal_fiber_length=0.1119414 tendon_slack_length=0.3075869
        pennation_angle_at_optimal=0.1047198 FmaxTendonStrain=0.033 FmaxMuscleStrain=0.6 KshapeActive=0.5
        KshapePassive=4 Af=0.3 Flen=1.8 activation_time_constant=0.01 deactivation_time_constant=0.04
      PathPoint P1: tibia_l (0.000987663 -0.197706 -0.0187656)
      PathPoint P2: tibia_l (0.0268315 -0.445873 0.00699594)
      PathPoint P3: calcn_l (0.0809471 0.0341317 0.0185136)
      PathPoint P4: calcn_l (0.107902 0.0271123 0.0225497)
      PathPoint P5: calcn_l (0.144703 0.0121961 0.0245678)
      PathPoint P6: toes_l (0.0248683 0.00359742 0.0214968)
      PathPoint P7: toes_l (0.0469827 0.00298323 0.01632)
    Thelen2003Muscle ercspn_l: max_isometric_force=2500 optimal_fiber_length=0.1147413 tendon_slack_length=0.02868534
        pennation_angle_at_optimal=0 FmaxTendonStrain=0.033 FmaxMuscleStrain=0.6 KshapeActive=0.5 KshapePassive=4
        Af=0.3 Flen=1.8 activation_time_constant=0.01 deactivation_time_constant=0.04
      PathPoint P1: pelvis (-0.123535 0.0387371 -0.0380338)
      PathPoint P2: torso (-0.0640187 0.106414 -0.0260191)
    Thelen2003Muscle intobl_l: max_isometric_force=900 optimal_fiber_length=0.09418311 tendon_slack_length=0.09418311
        pennation_angle_at_optimal=0 FmaxTendonStrain=0.033 FmaxMuscleStrain=0.6 KshapeActive=0.5 KshapePassive=4
        Af=0.3 Flen=1.8 activation_time_constant=0.01 deactivation_time_constant=0.04
      PathPoint P1: pelvis (-0.0352958 0.0617676 -0.100929)
      PathPoint P2: torso (0.0814784 0.154784 -0.0161945)
    Thelen2003Muscle extobl_l: max_isometric_force=900 optimal_fiber_length=0.1135495 tendon_slack_length=0.1324744
        pennation_angle_at_optimal=0 FmaxTendonStrain=0.033 FmaxMuscleStrain=0.6 KshapeActive=0.5 KshapePassive=4
        Af=0.3 Flen=1.8 activation_time_constant=0.01 deactivation_time_constant=0.04
      PathPoint P1: pelvis (-0.0264718 -0.0561203 -0.00872334)
      PathPoint P2: torso (0.0756585 0.106414 -0.11876)
    Thelen2003Muscle quad_lumb_l: max_isometric_force=537 optimal_fiber_length=0.1 tendon_slack_length=0.067
        pennation_angle_at_optimal=0 FmaxTendonStrain=0.033 FmaxMuscleStrain=0.6 KshapeActive=0.5 KshapePassive=4
        Af=0.3 Flen=1.8 activation_time_constant=0.01 deactivation_time_constant=0.04
      PathPoint P1: pelvis (-0.10747 0.0875 -0.06372)
      PathPoint P2: torso (-0.03935 0.1414 -0.05876)
    Thelen2003Muscle rect_abd_l: max_isometric_force=466 optimal_fiber_length=0.333 tendon_slack_length=0.082
        pennation_angle_at_optimal=0 FmaxTendonStrain=0.033 FmaxMuscleStrain=0.6 KshapeActive=0.5 KshapePassive=4
        Af=0.3 Flen=1.8 activation_time_constant=0.01 deactivation_time_constant=0.04
      PathPoint P1: pelvis (-0.02147 -0.0645 -0.02172)
      PathPoint P2: pelvis (0.00053 0.0275 -0.02472)
      PathPoint P3: torso (0.11065 0.1764 -0.03576)
      PathPoint P4: torso (0.09565 0.2364 -0.03676)
    Thelen2003Muscle DELT1_r: max_isometric_force=1218.9 optimal_fiber_length=0.0976 tendon_slack_length=0.093
        pennation_angle_at_optimal=0.3839724
      PathPoint DELT1_pt0: humerus_r (0.007127471 -0.1177734 0.005796288)
      PathPoint DELT1_pt1: humerus_r (0.01563924 -0.10873 0.004046933)
      PathPoint DELT1_pt2: torso (0.05319906 0.3838084 0.1593558)
      PathPoint DELT1_pt3: torso (0.01127641 0.3951834 0.09967818)
    Thelen2003Muscle DELT2_r: max_isometric_force=1103.5 optimal_fiber_length=0.1078 tendon_slack_length=0.1095
        pennation_angle_at_optimal=0.2617994
      PathPoint DELT2_pt0: humerus_r (0.004034303 -0.1350518 0.005796846)
      PathPoint DELT2_pt1: humerus_r (0.005838081 -0.05739575 0.02592986)
      PathPoint DELT2_pt2: humerus_r (0.03048719 -0.002630617 0.02332101)
      PathPoint P4: humerus_r (0.02811335 0.01792285 0.01489145)
      PathPoint DELT2_pt3: torso (0.004341525 0.4121765 0.1753022)
      PathPoint P6: torso (-0.006778513 0.4054998 0.160893)
    Thelen2003Muscle DELT3_r: max_isometric_force=201.6 optimal_fiber_length=0.1367 tendon_slack_length=0.038
        pennation_angle_at_optimal=0.3141593
      PathPoint DELT3_pt0: torso (-0.05255897 0.394887 0.1336484)
      PathPoint DELT3_pt1: torso (-0.0601713 0.362218 0.1745452)
      PathPoint DELT3_pt2: humerus_r (0.00154588 -0.07411452 0.009494621)
    Thelen2003Muscle SUPSP_r: max_isometric_force=499.2 optimal_fiber_length=0.0682 tendon_slack_length=0.0395
        pennation_angle_at_optimal=0.1221731
      PathPoint SUPSP_pt0: humerus_r (0.001262186 0.01374951 0.02304575)
      PathPoint P2: humerus_r (0.002289333 0.02894034 0.009899079)
      PathPoint SUPSP_pt1: torso (-0.01569566 0.4032386 0.1429723)
      PathPoint SUPSP_pt2: torso (-0.03909216 0.3778473 0.1002826)
    Thelen2003Muscle INFSP_r: max_isometric_force=1075.8 optimal_fiber_length=0.0755 tendon_slack_length=0.0308
        pennation_angle_at_optimal=0.3316126
      PathPoint INFSP_pt0: humerus_r (-0.01012526 0.006911254 0.02106725)
      PathPoint P2: torso (-0.044662 0.3648708 0.1464959)
      PathPoint INFSP_pt1: torso (-0.05976189 0.3343741 0.1168294)
    Thelen2003Muscle SUBSC_r: max_isometric_force=1306.9 optimal_fiber_length=0.0873 tendon_slack_length=0.033
        pennation_angle_at_optimal=0.3490659
      PathPoint SUBSC_pt0: humerus_r (0.01465334 0.009207104 -0.01684299)
      PathPoint P2: humerus_r (0.005921657 0.0011041 -0.02682814)
      PathPoint SUBSC_pt1: torso (-0.004763652 0.35005 0.135873)
      PathPoint SUBSC_pt2: torso (-0.06331091 0.3477773 0.09780277)
    Thelen2003Muscle TMIN_r: max_isometric_force=269.5 optimal_fiber_length=0.0741 tendon_slack_length=0.0713
        pennation_angle_at_optimal=0.418879
      PathPoint TMIN_pt0: humerus_r (-0.002801617 -0.00997709 0.01903189)
      PathPoint P2: torso (-0.03446725 0.3336025 0.159753)
      PathPoint TMIN_pt1: torso (-0.07380251 0.3078327 0.1236633)
      PathPoint TMIN_pt2: torso (-0.07696845 0.3031363 0.1157685)
    Thelen2003Muscle TMAJ_r: max_isometric_force=144 optimal_fiber_length=0.1624 tendon_slack_length=0.02
        pennation_angle_at_optimal=0.2792527
      PathPoint TMAJ_pt0: humerus_r (0.009453921 -0.05262693 -0.006810979)
      PathPoint P2: humerus_r (-0.002205661 -0.05093733 -0.01508456)
      PathPoint TMAJ_pt1: torso (-0.07768864 0.2812322 0.1133553)
      PathPoint TMAJ_pt2: torso (-0.08123388 0.273436 0.1011416)
    Thelen2003Muscle PECM1_r: max_isometric_force=444.3 optimal_fiber_length=0.1442 tendon_slack_length=0.0028
        pennation_angle_at_optimal=0.296706
      PathPoint PECM1_pt0: humerus_r (0.009999715 -0.03906157 0.00881486)
      PathPoint PECM1_pt1: humerus_r (0.01709101 -0.03495805 -0.007521624)
      PathPoint PECM1_pt2: torso (0.03553781 0.3644239 0.120017)
      PathPoint PECM1_pt3: torso (0.03217449 0.3822134 0.07394975)
    Thelen2003Muscle PECM2_r: max_isometric_force=658.3 optimal_fiber_length=0.1385 tendon_slack_length=0.089
        pennation_angle_at_optimal=0.4537856
      PathPoint PECM2_pt0: humerus_r (0.01164313 -0.04127862 0.009040096)
      PathPoint PECM2_pt1: humerus_r (0.01508634 -0.0403079 -0.006850044)
      PathPoint PECM2_pt2: torso (0.04818458 0.338676 0.1220084)
      PathPoint PECM2_pt3: torso (0.05964404 0.3303663 0.09496315)
      PathPoint PECM2_pt4: torso (0.05769 0.3278651 0.02031259)
    Thelen2003Muscle PECM3_r: max_isometric_force=498.1 optimal_fiber_length=0.1385 tendon_slack_length=0.132
        pennation_angle_at_optimal=0.4363323
      PathPoint PECM3_pt0: humerus_r (0.01153112 -0.04190724 0.0075)
      PathPoint PECM3_pt1: humerus_r (0.01446997 -0.04952101 -0.01267064)
      PathPoint PECM3_pt2: torso (0.05667805 0.3048139 0.1152261)
      PathPoint PECM3_pt3: torso (0.08139416 0.289551 0.08747358)
      PathPoint PECM3_pt4: torso (0.08593394 0.2568124 0.03559087)
    Thelen2003Muscle LAT1_r: max_isometric_force=290.5 optimal_fiber_length=0.254 tendon_slack_length=0.12
        pennation_angle_at_optimal=0.4363323
      PathPoint LAT1_pt0: humerus_r (0.009870196 -0.03291628 -0.009208652)
      PathPoint P2: humerus_r (-0.004506055 -0.03085272 -0.01646275)
      PathPoint P2_0: humerus_r (-0.03749634 -0.02710038 -0.01938654)
      PathPoint P3: humerus_r (-0.06051461 -0.02398753 -0.0227363)
      PathPoint LAT1_pt1: torso (-0.05915397 0.3115593 0.1436502)
      PathPoint LAT1_pt2: torso (-0.09080084 0.2920227 0.1089818)
      PathPoint LAT1_pt3: torso (-0.08935962 0.2717835 0.02975153)
      PathPoint LAT1_pt4: torso (-0.0670972 0.2559605 0.006312164)
    Thelen2003Muscle LAT2_r: max_isometric_force=317.5 optimal_fiber_length=0.2324 tendon_slack_length=0.1765
        pennation_angle_at_optimal=0.3316126
      PathPoint LAT2_pt0: humerus_r (0.009268535 -0.03876042 -0.008013015)
      PathPoint P2: humerus_r (-0.001060797 -0.03916708 -0.01497494)
      PathPoint P2_0: humerus_r (-0.03924847 -0.03811832 -0.01703748)
      PathPoint LAT2_pt1: torso (-0.054405 0.2959994 0.1496346)
      PathPoint LAT2_pt2: torso (-0.07738215 0.2536852 0.10842)
      PathPoint LAT2_pt3: torso (-0.08058652 0.2041598 0.02556209)
      PathPoint LAT2_pt4: torso (-0.04018984 0.1832065 0.004006699)
    Thelen2003Muscle LAT3_r: max_isometric_force=189 optimal_fiber_length=0.2789 tendon_slack_length=0.1403
        pennation_angle_at_optimal=0.3665191
      PathPoint LAT3_pt0: humerus_r (0.01212771 -0.03688408 -0.005697749)
      PathPoint P2: humerus_r (0.003174593 -0.04173811 -0.01424428)
      PathPoint LAT3_pt1: torso (-0.0384375 0.2663938 0.1461464)
      PathPoint LAT3_pt2: torso (-0.06530864 0.2221345 0.1172977)
      PathPoint LAT3_pt3: torso (-0.08203451 0.1780599 0.05160504)
      PathPoint LAT3_pt4: torso (-0.04130097 0.1237206 0.005622536)
    Thelen2003Muscle CORB_r: max_isometric_force=208.2 optimal_fiber_length=0.0932 tendon_slack_length=0.097
        pennation_angle_at_optimal=0.4712389
      PathPoint CORB_pt0: torso (0.02290071 0.3657755 0.1314589)
      PathPoint CORB_pt1: torso (0.02250947 0.3351249 0.1457751)
      PathPoint CORB_pt2: humerus_r (0.007046254 -0.1492184 -0.006706525)
    Thelen2003Muscle TRIlong_r: max_isometric_force=771.8 optimal_fiber_length=0.134 tendon_slack_length=0.143
        pennation_angle_at_optimal=0.2094395
      PathPoint TRIlong_pt0: torso (-0.0338692 0.3575223 0.14723)
      PathPoint TRIlong_pt1: humerus_r (-0.02714 -0.11441 -0.00664)
      PathPoint TRIlong_pt2: humerus_r (-0.03220861 -0.2258122 -0.009963904)
      PathPoint TRIlong_pt3: humerus_r (-0.01937684 -0.262303 -0.008891408)
      PathPoint TRIlong_pt4: ulna_r (-0.02887153 0.005092003 0.0009963791)
    Thelen2003Muscle TRIlat_r: max_isometric_force=717.5 optimal_fiber_length=0.1138 tendon_slack_length=0.098
        pennation_angle_at_optimal=0.1570796
      PathPoint TRIlat_pt0: humerus_r (-0.00714717 -0.1243468 0.004425017)
      PathPoint TRIlat_pt1: humerus_r (-0.02491921 -0.1442984 0.009008557)
      PathPoint TRIlat_pt2: humerus_r (-0.03186336 -0.2236973 -0.01020711)
      PathPoint TRIlat_pt3: humerus_r (-0.01908897 -0.2629827 -0.008383385)
      PathPoint TRIlat_pt4: ulna_r (-0.02977901 0.007749524 -4.906392e-5)
    Thelen2003Muscle TRImed_r: max_isometric_force=717.5 optimal_fiber_length=0.1138 tendon_slack_length=0.0908
        pennation_angle_at_optimal=0.1570796
      PathPoint TRImed_pt0: humerus_r (-0.008628084 -0.1351061 -0.008557729)
      PathPoint TRImed_pt1: humerus_r (-0.02603933 -0.1482943 -0.00992164)
      PathPoint TRImed_pt2: humerus_r (-0.03184 -0.2260712 -0.01006368)
      PathPoint TRImed_pt3: humerus_r (-0.01743 -0.2671338 -0.00842755)
      PathPoint TRImed_pt4: ulna_r (-0.03012046 0.008161635 0.0007463459)
    Thelen2003Muscle ANC_r: max_isometric_force=283.2 optimal_fiber_length=0.027 tendon_slack_length=0.018
        pennation_angle_at_optimal=0
      PathPoint ANC_pt0: humerus_r (-0.009180684 -0.2814728 0.01385045)
      PathPoint ANC_pt1: ulna_r (-0.0329471 -0.003397324 0.007175035)
    Thelen2003Muscle SUP_r: max_isometric_force=379.6 optimal_fiber_length=0.033 tendon_slack_length=0.028
        pennation_angle_at_optimal=0
      PathPoint SUP_pt0: radius_r (0.009116751 -0.0610477 -0.0006361389)
      PathPoint SUP_pt1: radius_r (0.01120927 -0.05011281 -0.002139848)
      PathPoint P3: radius_r (0.005235185 -0.03522294 0.009801994)
      PathPoint P3_0: radius_r (-0.008929815 -0.02543466 0.007823873)
      PathPoint SUP_pt2: ulna_r (-0.02229301 -0.03525409 0.02224935)
    Thelen2003Muscle BICshort_r: max_isometric_force=316.8 optimal_fiber_length=0.1321 tendon_slack_length=0.1923
        pennation_angle_at_optimal=0
      PathPoint BICshort_pt0: torso (0.02277387 0.3681123 0.1316082)
      PathPoint BICshort_pt1: torso (0.01792431 0.3395634 0.1450057)
      PathPoint BICshort_pt2: humerus_r (0.01103999 -0.07368934 -0.01201707)
      PathPoint BICshort_pt3: humerus_r (0.01658495 -0.1178218 -0.01066887)
      PathPoint BICshort_pt4: humerus_r (0.0217044 -0.1719003 -0.004438853)
      PathPoint P6: radius_r (0.0104404 0.01308527 -0.01821896)
      PathPoint BICshort_pt5: radius_r (0.001501386 -0.03558054 -0.0169049)
      PathPoint BICshort_pt6: radius_r (-0.002709653 -0.03787681 -0.004683205)
    Thelen2003Muscle BIClong_r: max_isometric_force=525.1 optimal_fiber_length=0.1157 tendon_slack_length=0.2723
        pennation_angle_at_optimal=0
      PathPoint BIClong_pt0: torso (-0.0231879 0.3774127 0.1452407)
      PathPoint BIClong_pt1: torso (-0.01295824 0.3915316 0.1534739)
      PathPoint BIClong_pt2: humerus_r (0.02127608 0.01824825 0.007154817)
      PathPoint BIClong_pt3: humerus_r (0.01403767 -0.02405262 0.0004042778)
      PathPoint BIClong_pt5: humerus_r (0.009968483 -0.07490651 -0.002298955)
      PathPoint BIClong_pt6: humerus_r (0.01631123 -0.119149 0.000853581)
      PathPoint BIClong_pt7: humerus_r (0.02240807 -0.1742824 -0.003925644)
      PathPoint BIClong_pt8: radius_r (0.009851996 0.006081316 -0.0174094)
      PathPoint BIClong_pt9: radius_r (0.001745357 -0.03505005 -0.01610144)
      PathPoint BIClong_pt10: radius_r (-0.001260989 -0.03799121 -0.008053849)
    Thelen2003Muscle BRA_r: max_isometric_force=1177.37 optimal_fiber_length=0.0858 tendon_slack_length=0.0535
        pennation_angle_at_optimal=0
      PathPoint BRA_pt0: humerus_r (0.006417183 -0.1731195 -0.001491325)
      PathPoint BRA_pt1: humerus_r (0.01892672 -0.285287 -0.005903066)
      PathPoint BRA_pt2: ulna_r (-0.0019388 -0.01667446 0.00383404)
      PathPoint BRA_pt3: ulna_r (-0.01025454 -0.02541086 0.00301998)
    Thelen2003Muscle DELT1_l: max_isometric_force=1218.9 optimal_fiber_length=0.0976 tendon_slack_length=0.093
        pennation_angle_at_optimal=0.3839724
      PathPoint DELT1_pt0: humerus_l (0.007127471 -0.1177734 -0.005796288)
      PathPoint DELT1_pt1: humerus_l (0.01563924 -0.10873 -0.004046933)
      PathPoint DELT1_pt2: torso (0.05319906 0.3838084 -0.1593558)
      PathPoint DELT1_pt3: torso (0.01127641 0.3951834 -0.09967818)
    Thelen2003Muscle DELT2_l: max_isometric_force=1103.5 optimal_fiber_length=0.1078 tendon_slack_length=0.1095
        pennation_angle_at_optimal=0.2617994
      PathPoint DELT2_pt0: humerus_l (0.004034303 -0.1350518 -0.005796846)
      PathPoint DELT2_pt1: humerus_l (0.005838081 -0.05739575 -0.02592986)
      PathPoint DELT2_pt2: humerus_l (0.03048719 -0.002630617 -0.02332101)
      PathPoint P4: humerus_l (0.02811335 0.01792285 -0.01489145)
      PathPoint DELT2_pt3: torso (0.004341525 0.4121765 -0.1753022)
      PathPoint P6: torso (-0.006778513 0.4054998 -0.160893)
    Thelen2003Muscle DELT3_l: max_isometric_force=201.6 optimal_fiber_length=0.1367 tendon_slack_length=0.038
        pennation_angle_at_optimal=0.3141593
      PathPoint DELT3_pt0: torso (-0.05255897 0.394887 -0.1336484)
      PathPoint DELT3_pt1: torso (-0.0601713 0.362218 -0.1745452)
      PathPoint DELT3_pt2: humerus_l (0.00154588 -0.07411452 -0.009494621)
    Thelen2003Muscle SUPSP_l: max_isometric_force=499.2 optimal_fiber_length=0.0682 tendon_slack_length=0.0395
        pennation_angle_at_optimal=0.1221731
      PathPoint SUPSP_pt0: humerus_l (0.001262186 0.01374951 -0.02304575)
      PathPoint P2: humerus_l (0.002289333 0.02894034 -0.009899079)
      PathPoint SUPSP_pt1: torso (-0.01569566 0.4032386 -0.1429723)
      PathPoint SUPSP_pt2: torso (-0.03909216 0.3778473 -0.1002826)
    Thelen2003Muscle INFSP_l: max_isometric_force=1075.8 optimal_fiber_length=0.0755 tendon_slack_length=0.0308
        pennation_angle_at_optimal=0.3316126
      PathPoint INFSP_pt0: humerus_l (-0.01012526 0.006911254 -0.02106725)
      PathPoint P2: torso (-0.044662 0.3648708 -0.1464959)
      PathPoint INFSP_pt1: torso (-0.05976189 0.3343741 -0.1168294)
    Thelen2003Muscle SUBSC_l: max_isometric_force=1306.9 optimal_fiber_length=0.0873 tendon_slack_length=0.033
        pennation_angle_at_optimal=0.3490659
      PathPoint SUBSC_pt0: humerus_l (0.01465334 0.009207104 0.01684299)
      PathPoint P2: humerus_l (0.005921657 0.0011041 0.02682814)
      PathPoint SUBSC_pt1: torso (-0.004763652 0.35005 -0.135873)
      PathPoint SUBSC_pt2: torso (-0.06331091 0.3477773 -0.09780277)
    Thelen2003Muscle TMIN_l: max_isometric_force=269.5 optimal_fiber_length=0.0741 tendon_slack_length=0.0713
        pennation_angle_at_optimal=0.418879
      PathPoint TMIN_pt0: humerus_l (-0.002801617 -0.00997709 -0.01903189)
      PathPoint P2: torso (-0.03446725 0.3336025 -0.159753)
      PathPoint TMIN_pt1: torso (-0.07380251 0.3078327 -0.1236633)
      PathPoint TMIN_pt2: torso (-0.07696845 0.3031363 -0.1157685)
    Thelen2003Muscle TMAJ_l: max_isometric_force=144 optimal_fiber_length=0.1624 tendon_slack_length=0.02
        pennation_angle_at_optimal=0.2792527
      PathPoint TMAJ_pt0: humerus_l (0.009453921 -0.05262693 0.006810979)
      PathPoint P2: humerus_l (-0.002205661 -0.05093733 0.01508456)
      PathPoint TMAJ_pt1: torso (-0.07768864 0.2812322 -0.1133553)
      PathPoint TMAJ_pt2: torso (-0.08123388 0.273436 -0.1011416)
    Thelen2003Muscle PECM1_l: max_isometric_force=444.3 optimal_fiber_length=0.1442 tendon_slack_length=0.0028
        pennation_angle_at_optimal=0.296706
      PathPoint PECM1_pt0: humerus_l (0.009999715 -0.03906157 -0.00881486)
      PathPoint PECM1_pt1: humerus_l (0.01709101 -0.03495805 0.007521624)
      PathPoint PECM1_pt2: torso (0.03553781 0.3644239 -0.120017)
      PathPoint PECM1_pt3: torso (0.03217449 0.3822134 -0.07394975)
    Thelen2003Muscle PECM2_l: max_isometric_force=658.3 optimal_fiber_length=0.1385 tendon_slack_length=0.089
        pennation_angle_at_optimal=0.4537856
      PathPoint PECM2_pt0: humerus_l (0.01164313 -0.04127862 -0.009040096)
      PathPoint PECM2_pt1: humerus_l (0.01508634 -0.0403079 0.006850044)
      PathPoint PECM2_pt2: torso (0.04818458 0.338676 -0.1220084)
      PathPoint PECM2_pt3: torso (0.05964404 0.3303663 -0.09496315)
      PathPoint PECM2_pt4: torso (0.05769 0.3278651 -0.02031259)
    Thelen2003Muscle PECM3_l: max_isometric_force=498.1 optimal_fiber_length=0.1385 tendon_slack_length=0.132
        pennation_angle_at_optimal=0.4363323
      PathPoint PECM3_pt0: humerus_l (0.01153112 -0.04190724 -0.0075)
      PathPoint PECM3_pt1: humerus_l (0.01446997 -0.04952101 0.01267064)
      PathPoint PECM3_pt2: torso (0.05667805 0.3048139 -0.1152261)
      PathPoint PECM3_pt3: torso (0.08139416 0.289551 -0.08747358)
      PathPoint PECM3_pt4: torso (0.08593394 0.2568124 -0.03559087)
    Thelen2003Muscle LAT1_l: max_isometric_force=290.5 optimal_fiber_length=0.254 tendon_slack_length=0.12
        pennation_angle_at_optimal=0.4363323
      PathPoint LAT1_pt0: humerus_l (0.009870196 -0.03291628 0.009208652)
      PathPoint P2: humerus_l (-0.004506055 -0.03085272 0.01646275)
      PathPoint P2_0: humerus_l (-0.03749634 -0.02710038 0.01938654)
      PathPoint P3: humerus_l (-0.06051461 -0.02398753 0.0227363)
      PathPoint LAT1_pt1: torso (-0.05915397 0.3115593 -0.1436502)
      PathPoint LAT1_pt2: torso (-0.09080084 0.2920227 -0.1089818)
      PathPoint LAT1_pt3: torso (-0.08935962 0.2717835 -0.02975153)
      PathPoint LAT1_pt4: torso (-0.0670972 0.2559605 -0.006312164)
    Thelen2003Muscle LAT2_l: max_isometric_force=317.5 optimal_fiber_length=0.2324 tendon_slack_length=0.1765
        pennation_angle_at_optimal=0.3316126
      PathPoint LAT2_pt0: humerus_l (0.009268535 -0.03876042 0.008013015)
      PathPoint P2: humerus_l (-0.001060797 -0.03916708 0.01497494)
      PathPoint P2_0: humerus_l (-0.03924847 -0.03811832 0.01703748)
      PathPoint LAT2_pt1: torso (-0.054405 0.2959994 -0.1496346)
      PathPoint LAT2_pt2: torso (-0.07738215 0.2536852 -0.10842)
      PathPoint LAT2_pt3: torso (-0.08058652 0.2041598 -0.02556209)
      PathPoint LAT2_pt4: torso (-0.04018984 0.1832065 -0.004006699)
    Thelen2003Muscle LAT3_l: max_isometric_force=189 optimal_fiber_length=0.2789 tendon_slack_length=0.1403
        pennation_angle_at_optimal=0.3665191
      PathPoint LAT3_pt0: humerus_l (0.01212771 -0.03688408 0.005697749)
      PathPoint P2: humerus_l (0.003174593 -0.04173811 0.01424428)
      PathPoint LAT3_pt1: torso (-0.0384375 0.2663938 -0.1461464)
      PathPoint LAT3_pt2: torso (-0.06530864 0.2221345 -0.1172977)
      PathPoint LAT3_pt3: torso (-0.08203451 0.1780599 -0.05160504)
      PathPoint LAT3_pt4: torso (-0.04130097 0.1237206 -0.005622536)
    Thelen2003Muscle CORB_l: max_isometric_force=208.2 optimal_fiber_length=0.0932 tendon_slack_length=0.097
        pennation_angle_at_optimal=0.4712389
      PathPoint CORB_pt0: torso (0.02290071 0.3657755 -0.1314589)
      PathPoint CORB_pt1: torso (0.02250947 0.3351249 -0.1457751)
      PathPoint CORB_pt2: humerus_l (0.007046254 -0.1492184 0.006706525)
    Thelen2003Muscle TRIlong_l: max_isometric_force=771.8 optimal_fiber_length=0.134 tendon_slack_length=0.143
        pennation_angle_at_optimal=0.2094395
      PathPoint TRIlong_pt0: torso (-0.0338692 0.3575223 -0.14723)
      PathPoint TRIlong_pt1: humerus_l (-0.02714 -0.11441 0.00664)
      PathPoint TRIlong_pt2: humerus_l (-0.03220861 -0.2258122 0.009963904)
      PathPoint TRIlong_pt3: humerus_l (-0.01937684 -0.262303 0.008891408)
      PathPoint TRIlong_pt4: ulna_l (-0.02887153 0.005092003 -0.0009963791)
    Thelen2003Muscle TRIlat_l: max_isometric_force=717.5 optimal_fiber_length=0.1138 tendon_slack_length=0.098
        pennation_angle_at_optimal=0.1570796
      PathPoint TRIlat_pt0: humerus_l (-0.00714717 -0.1243468 -0.004425017)
      PathPoint TRIlat_pt1: humerus_l (-0.02491921 -0.1442984 -0.009008557)
      PathPoint TRIlat_pt2: humerus_l (-0.03186336 -0.2236973 0.01020711)
      PathPoint TRIlat_pt3: humerus_l (-0.01908897 -0.2629827 0.008383385)
      PathPoint TRIlat_pt4: ulna_l (-0.02977901 0.007749524 4.906392e-5)
    Thelen2003Muscle TRImed_l: max_isometric_force=717.5 optimal_fiber_length=0.1138 tendon_slack_length=0.0908
        pennation_angle_at_optimal=0.1570796
      PathPoint TRImed_pt0: humerus_l (-0.008628084 -0.1351061 0.008557729)
      PathPoint TRImed_pt1: humerus_l (-0.02603933 -0.1482943 0.00992164)
      PathPoint TRImed_pt2: humerus_l (-0.03184 -0.2260712 0.01006368)
      PathPoint TRImed_pt3: humerus_l (-0.01743 -0.2671338 0.00842755)
      PathPoint TRImed_pt4: ulna_l (-0.03012046 0.008161635 -0.0007463459)
    Thelen2003Muscle ANC_l: max_isometric_force=283.2 optimal_fiber_length=0.027 tendon_slack_length=0.018
        pennation_angle_at_optimal=0
      PathPoint ANC_pt0: humerus_l (-0.009180684 -0.2814728 -0.01385045)
      PathPoint ANC_pt1: ulna_l (-0.0329471 -0.003397324 -0.007175035)
    Thelen2003Muscle SUP_l: max_isometric_force=379.6 optimal_fiber_length=0.033 tendon_slack_length=0.028
        pennation_angle_at_optimal=0
      PathPoint SUP_pt0: radius_l (0.009116751 -0.0610477 0.0006361389)
      PathPoint SUP_pt1: radius_l (0.01120927 -0.05011281 0.002139848)
      PathPoint P3: radius_l (0.005235185 -0.03522294 -0.009801994)
      PathPoint P3_0: radius_l (-0.008929815 -0.02543466 -0.007823873)
      PathPoint SUP_pt2: ulna_l (-0.02229301 -0.03525409 -0.02224935)
    Thelen2003Muscle BICshort_l: max_isometric_force=316.8 optimal_fiber_length=0.1321 tendon_slack_length=0.1923
        pennation_angle_at_optimal=0
      PathPoint BICshort_pt0: torso (0.02277387 0.3681123 -0.1316082)
      PathPoint BICshort_pt1: torso (0.01792431 0.3395634 -0.1450057)
      PathPoint BICshort_pt2: humerus_l (0.01103999 -0.07368934 0.01201707)
      PathPoint BICshort_pt3: humerus_l (0.01658495 -0.1178218 0.01066887)
      PathPoint BICshort_pt4: humerus_l (0.0217044 -0.1719003 0.004438853)
      PathPoint P6: radius_l (0.0104404 0.01308527 0.01821896)
      PathPoint BICshort_pt5: radius_l (0.001501386 -0.03558054 0.0169049)
      PathPoint BICshort_pt6: radius_l (-0.002709653 -0.03787681 0.004683205)
    Thelen2003Muscle BIClong_l: max_isometric_force=525.1 optimal_fiber_length=0.1157 tendon_slack_length=0.2723
        pennation_angle_at_optimal=0
      PathPoint BIClong_pt0: torso (-0.0231879 0.3774127 -0.1452407)
      PathPoint BIClong_pt1: torso (-0.01295824 0.3915316 -0.1534739)
      PathPoint BIClong_pt2: humerus_l (0.02127608 0.01824825 -0.007154817)
      PathPoint BIClong_pt3: humerus_l (0.01403767 -0.02405262 -0.0004042778)
      PathPoint BIClong_pt5: humerus_l (0.009968483 -0.07490651 0.002298955)
      PathPoint BIClong_pt6: humerus_l (0.01631123 -0.119149 -0.000853581)
      PathPoint BIClong_pt7: humerus_l (0.02240807 -0.1742824 0.003925644)
      PathPoint BIClong_pt8: radius_l (0.009851996 0.006081316 0.0174094)
      PathPoint BIClong_pt9: radius_l (0.001745357 -0.03505005 0.01610144)
      PathPoint BIClong_pt10: radius_l (-0.001260989 -0.03799121 0.008053849)
    Thelen2003Muscle BRA_l: max_isometric_force=1177.37 optimal_fiber_length=0.0858 tendon_slack_length=0.0535
        pennation_angle_at_optimal=0
      PathPoint BRA_pt0: humerus_l (0.006417183 -0.1731195 0.001491325)
      PathPoint BRA_pt1: humerus_l (0.01892672 -0.285287 0.005903066)
      PathPoint BRA_pt2: ulna_l (-0.0019388 -0.01667446 -0.00383404)
      PathPoint BRA_pt3: ulna_l (-0.01025454 -0.02541086 -0.00301998)
    ActivationCoordinateActuator mtp_angle_r_motor: coordinate=mtp_angle_r optimal_force=40
        activation_time_constant=0.035 default_activation=0.5
    ActivationCoordinateActuator mtp_angle_l_motor: coordinate=mtp_angle_l optimal_force=40
        activation_time_constant=0.035 default_activation=0.5
    ObjectGroup R_hip_abd: members=(glut_max1_r glut_med1_r glut_med2_r glut_med3_r glut_min1_r glut_min2_r glut_min3_r peri_r sar_r tfl_r)
    ObjectGroup R_hip_flex: members=(add_brev_r add_long_r glut_med1_r glut_min1_r grac_r iliacus_r pect_r psoas_r rect_fem_r sar_r tfl_r)
    ObjectGroup R_hip_inrot: members=(glut_med1_r glut_min1_r iliacus_r psoas_r tfl_r)
    ObjectGroup R_hip_exrot: members=(gem_r glut_med3_r glut_min3_r peri_r quad_fem_r)
    ObjectGroup R_hip_ext: members=(add_long_r add_mag1_r add_mag2_r add_mag3_r bifemlh_r glut_max1_r glut_max2_r glut_max3_r glut_med3_r glut_min3_r semimem_r semiten_r)
    ObjectGroup R_hip_add: members=(add_brev_r add_long_r add_mag1_r add_mag2_r add_mag3_r bifemlh_r grac_r pect_r semimem_r semiten_r)
    ObjectGroup R_knee_bend: members=(bifemlh_r bifemsh_r grac_r lat_gas_r med_gas_r sar_r semimem_r semiten_r)
    ObjectGroup R_knee_ext: members=(rect_fem_r vas_int_r vas_lat_r vas_med_r)
    ObjectGroup R_ankle_pf: members=(flex_dig_r flex_hal_r lat_gas_r med_gas_r per_brev_r per_long_r soleus_r tib_post_r)
    ObjectGroup R_inverter: members=(ext_hal_r flex_dig_r flex_hal_r tib_ant_r tib_post_r)
    ObjectGroup R_ankle_df: members=(ext_dig_r ext_hal_r per_tert_r tib_ant_r)
    ObjectGroup R_everter: members=(ext_dig_r per_brev_r per_long_r per_tert_r)
    ObjectGroup L_hip_abd: members=(glut_max1_l glut_med1_l glut_med2_l glut_med3_l glut_min1_l glut_min2_l glut_min3_l peri_l sar_l tfl_l)
    ObjectGroup L_hip_flex: members=(add_brev_l add_long_l glut_med1_l glut_min1_l grac_l iliacus_l pect_l psoas_l rect_fem_l sar_l tfl_l)
    ObjectGroup L_hip_inrot: members=(glut_med1_l glut_min1_l iliacus_l psoas_l tfl_l)
    ObjectGroup L_hip_exrot: members=(gem_l glut_med3_l glut_min3_l peri_l quad_fem_l)
    ObjectGroup L_hip_ext: members=(add_long_l add_mag1_l add_mag2_l add_mag3_l bifemlh_l glut_max1_l glut_max2_l glut_max3_l glut_med3_l glut_min3_l semimem_l semiten_l)
    ObjectGroup L_hip_add: members=(add_brev_l add_long_l add_mag1_l add_mag2_l add_mag3_l bifemlh_l grac_l pect_l semimem_l semiten_l)
    ObjectGroup L_knee_bend: members=(bifemlh_l bifemsh_l grac_l lat_gas_l med_gas_l sar_l semimem_l semiten_l)
    ObjectGroup L_knee_ext: members=(rect_fem_l vas_int_l vas_lat_l vas_med_l)
    ObjectGroup L_ankle_pf: members=(flex_dig_l flex_hal_l lat_gas_l med_gas_l per_brev_l per_long_l soleus_l tib_post_l)
    ObjectGroup L_inverter: members=(ext_hal_l flex_dig_l flex_hal_l tib_ant_l tib_post_l)
    ObjectGroup L_ankle_df: members=(ext_dig_l ext_hal_l per_tert_l tib_ant_l)
    ObjectGroup L_everter: members=(ext_dig_l per_brev_l per_long_l per_tert_l)
    ObjectGroup back_ext: members=(ercspn_l ercspn_r)
    ObjectGroup back_rlb: members=(ercspn_r extobl_r intobl_r)
    ObjectGroup back_introt: members=(ercspn_r extobl_l intobl_r)
    ObjectGroup back_llb: members=(ercspn_l extobl_l intobl_l)
    ObjectGroup back_extrot: members=(ercspn_l extobl_r intobl_l)
    ObjectGroup back_flex: members=(extobl_l extobl_r intobl_l intobl_r)
  ContactGeometrySet:
    ContactHalfSpace ground: socket_frame=/ground location=(0 0.065 0) orientation=(0 0 -1.5708)
    ContactSphere right_1: socket_frame=/bodyset/toes_r location=(0.0699 -0.0299 -0.0286) radius=0.02
    ContactSphere right_2: socket_frame=/bodyset/toes_r location=(0.0294 -0.0299 1.521175e-8) radius=0.02
    ContactSphere right_3: socket_frame=/bodyset/calcn_r location=(0.1499 -0.0282 6.884226e-8) radius=0.02
    ContactSphere right_4: socket_frame=/bodyset/calcn_r location=(0.1499 -0.0282 -0.02272616) radius=0.02
    ContactSphere right_5: socket_frame=/bodyset/calcn_r location=(0.07 -0.0282 0.0449) radius=0.02
    ContactSphere right_6: socket_frame=/bodyset/calcn_r location=(0.119 -0.0282 -6.092648e-8) radius=0.02
    ContactSphere right_7: socket_frame=/bodyset/calcn_r location=(0 -0.0282 0) radius=0.02
    ContactSphere left_1: socket_frame=/bodyset/toes_l location=(0.0699 -0.0299 0.0286) radius=0.02
    ContactSphere left_2: socket_frame=/bodyset/toes_l location=(0.0294 -0.0299 -1.521175e-8) radius=0.02
    ContactSphere left_3: socket_frame=/bodyset/calcn_l location=(0.1499 -0.0282 -6.884226e-8) radius=0.02
    ContactSphere left_4: socket_frame=/bodyset/calcn_l location=(0.1499 -0.0282 0.02272616) radius=0.02
    ContactSphere left_5: socket_frame=/bodyset/calcn_l location=(0.07 -0.0282 -0.0449) radius=0.02
    ContactSphere left_6: socket_frame=/bodyset/calcn_l location=(0.119 -0.0282 6.092648e-8) radius=0.02
    ContactSphere left_7: socket_frame=/bodyset/calcn_l location=(0 -0.0282 0) radius=0.02
    ContactCapsule right_femur_col: socket_frame=femur_r location=(0 -0.225 0.015) orientation=(1.65 0.1 0) radius=0.05
        length=0.155
    ContactCapsule right_tibia_col: socket_frame=tibia_r location=(0 -0.245 0) orientation=(1.5707 0 0) radius=0.04
        length=0.18
    ContactCapsule left_femur_col: socket_frame=femur_l location=(0 -0.225 -0.015) orientation=(1.4914 0.1 0)
        radius=0.05 length=0.155
    ContactCapsule left_tibia_col: socket_frame=tibia_l location=(0 -0.245 0) orientation=(1.5707 0 0) radius=0.04
        length=0.18
    ContactCapsule pelvis_col: socket_frame=pelvis location=(-0.1 0 0) radius=0.05 length=0.075
    ContactCapsule torso_col_1: socket_frame=torso location=(0 0.05 0) radius=0.06 length=0.075
    ContactCapsule torso_col_2_1: socket_frame=torso location=(0.025 0.2 0) radius=0.075 length=0.06
    ContactCapsule torso_col_2_2: socket_frame=torso location=(-0.025 0.2 0) radius=0.075 length=0.075
    ContactCapsule torso_col_3: socket_frame=torso location=(0 0.35 0) radius=0.05 length=0.1
    ContactSphere head_col: socket_frame=torso location=(0 0.55 0) radius=0.1
    ContactCapsule right_humerus_col: socket_frame=humerus_r location=(0 -0.145 0) orientation=(1.5707 0 0) radius=0.02
        length=0.125
    ContactCapsule right_forearm_col: socket_frame=ulna_r location=(-0.01 -0.135 0.03) orientation=(1.46 0 0)
        radius=0.02 length=0.1
    ContactSphere right_palm_col: socket_frame=hand_r location=(0 -0.05 0) radius=0.02
    ContactCapsule left_humerus_col: socket_frame=humerus_l location=(0 -0.145 0) orientation=(1.5707 0 0) radius=0.02
        length=0.125
    ContactCapsule left_forearm_col: socket_frame=ulna_l location=(-0.01 -0.135 -0.03) orientation=(1.681 0 0)
        radius=0.02 length=0.1
    ContactSphere left_palm_col: socket_frame=hand_l location=(0 -0.05 0) radius=0.02
