# OpenSim document version 40500
Model subject01:
  gravity: 0 -9.80665 0
  length_units: meters
  force_units: N
  credits:
    Delp S.L., Loan J.P., Hoy M.G., Zajac F.E., Topp E.L., Rosen J.M., Thelen D.G., Anderson F.C., Seth A., Hamner S.R.
  publications:
    Notes: 3D, 23 DOF gait model created by D.G. Thelen, Univ. of Wisconsin-Madison, and Samuel Hamner, Ajay Seth, Frank C. Anderson, and Scott L. Delp, Stanford University. Lower extremity joint defintions based on Delp et al. (1990). Low back joint and anthropometry based on Anderson and Pandy (1999, 2001). Planar knee model of Yamaguchi and Zajac (1989). Seth removed the patella to avoid kinematic constraints; insertions of the quadrucepts are handled with moving points in the tibia frame. Hamner added arms adapted from Holzbaur et al., 2005. Hamner, S.R., Seth, A, Delp, S.L.: Muscle contributions to propulsion and support during running. Journal of Biomechanics, 2010. Delp, S.L., Loan, J.P., Hoy, M.G., Zajac, F.E., Topp E.L., Rosen, J.M.: An interactive graphics-based model of the lower extremity to study orthopaedic surgical procedures, IEEE Transactions on Biomedical Engineering, vol. 37, pp. 757-767, 1990. Yamaguchi G.T., Zajac F.E.: A planar model of the knee joint to characterize the knee extensor mechanism." J . Biomech. vol. 21. pp. 1-10. 1989. Anderson F.C., Pandy M.G.: A dynamic optimization solution for vertical jumping in three dimensions. Computer Methods in Biomechanics and Biomedical Engineering 2:201-231, 1999. Anderson F.C., Pandy M.G.: Dynamic optimization of human walking. Journal of Biomechanical Engineering 123:381-390, 2001. Holzbaur, KR, WM Murray and SL Delp, 2005. A model of the upper extremity for simulating musculoskeletal surgery and analyzing neuromuscular control. Ann Biomed Eng 33(6): 829-840.
  Ground
  BodySet:
    Body pelvis: mass=11.3078 [kg] mass_center=(-0.0623853 0 0) inertia=(0.0756014 0.0756014 0.043286 0 0 0)
        meshes=(sacrum.vtp pelvis.vtp l_pelvis.vtp)
    Body femur_r: mass=8.930827 mass_center=(0 -0.181569 0) inertia=(0.139837 0.0248011 0.139837 0 0 0)
        meshes=femur_r.vtp
    Body tibia_r: mass=3.559791 mass_center=(0 -0.208895 0) inertia=(0.059175 0.00331717 0.059175 0 0 0)
        meshes=(tibia_r.vtp fibula_r.vtp)
  JointSet:
    CustomJoint ground_pelvis: socket_parent_frame=ground_offset socket_child_frame=pelvis_offset
      Coordinate pelvis_tilt: default_value=0 range=(-1.570796 1.570796) clamped=true
      Coordinate pelvis_list: default_value=0 range=(-1.570796 1.570796) clamped=true
      Coordinate pelvis_rotation: default_value=0 range=(-1.570796 1.570796) clamped=true
      Coordinate pelvis_tx: default_value=0 range=(-5 25) clamped=true
      Coordinate pelvis_ty: default_value=0 range=(-1 2) clamped=true
      Coordinate pelvis_tz: default_value=0 range=(-3 3) clamped=true
      PhysicalOffsetFrame ground_offset: socket_parent=/ground translation=(0 0 0) [meters]
      PhysicalOffsetFrame pelvis_offset: socket_parent=/bodyset/pelvis translation=(0 2 0)
      SpatialTransform:
        TransformAxis rotation1: coordinates=pelvis_tilt axis=(0 0 1) LinearFunction(coefficients=1 0)
        TransformAxis rotation2: coordinates=pelvis_list axis=(1 0 0) LinearFunction(coefficients=1 0)
        TransformAxis rotation3: coordinates=pelvis_rotation axis=(0 1 0) LinearFunction(coefficients=1 0)
        TransformAxis translation1: coordinates=pelvis_tx axis=(1 0 0) LinearFunction(coefficients=1 0)
        TransformAxis translation2: coordinates=pelvis_ty axis=(0 1 0) LinearFunction(coefficients=1 0)
        TransformAxis translation3: coordinates=pelvis_tz axis=(0 0 1) LinearFunction(coefficients=1 0)
    CustomJoint hip_r: socket_parent_frame=pelvis_offset socket_child_frame=femur_r_offset
      Coordinate hip_flexion_r: default_value=0 range=(-2.094395 2.094395) clamped=true
      Coordinate hip_adduction_r: default_value=0 range=(-2.094395 2.094395) clamped=true
      Coordinate hip_rotation_r: default_value=0 range=(-2.094395 2.094395) clamped=true
      PhysicalOffsetFrame pelvis_offset: socket_parent=/bodyset/pelvis translation=(-0.0623853 -0.0583263 0.0728399)
      PhysicalOffsetFrame femur_r_offset: socket_parent=/bodyset/femur_r translation=(0 0 0)
      SpatialTransform: axes_held_at_zero=(translation1 translation2 translation3)
        TransformAxis rotation1: coordinates=hip_flexion_r axis=(0 0 1) LinearFunction(coefficients=1 0)
        TransformAxis rotation2: coordinates=hip_adduction_r axis=(1 0 0) LinearFunction(coefficients=1 0)
        TransformAxis rotation3: coordinates=hip_rotation_r axis=(0 1 0) LinearFunction(coefficients=1 0)
    CustomJoint knee_r: socket_parent_frame=femur_r_offset socket_child_frame=tibia_r_offset
      Coordinate knee_angle_r: default_value=0 range=(-2.5307 0.1745329) clamped=true
      PhysicalOffsetFrame femur_r_offset: socket_parent=/bodyset/femur_r translation=(0.0041 -0.41 0)
      PhysicalOffsetFrame tibia_r_offset: socket_parent=/bodyset/tibia_r translation=(0 0 0)
      SpatialTransform: axes_held_at_zero=(rotation2 rotation3 translation3)
        TransformAxis rotation1: coordinates=knee_angle_r axis=(0 0 1) LinearFunction(coefficients=1 0)
        TransformAxis translation1: coordinates=knee_angle_r axis=(1 0 0) Constant(value=0)
        TransformAxis translation2: coordinates=knee_angle_r axis=(0 1 0) Constant(value=0)
  ContactGeometrySet:
    ContactHalfSpace ground: socket_frame=/ground location=(0 0 0)
    ContactSphere right_1: socket_frame=/bodyset/toes_r location=(0.0699 -0.0299 -0.0286) radius=0.02
    ContactSphere right_2: socket_frame=/bodyset/toes_r location=(0.0294 -0.0299 1.521175e-8) radius=0.02
    ContactSphere right_3: socket_frame=/bodyset/calcn_r location=(0.1499 -0.0282 6.884226e-8) radius=0.02
    ContactSphere right_4: socket_frame=/bodyset/calcn_r location=(0.1499 -0.0282 -0.02272616) radius=0.02
    ContactSphere right_5: socket_frame=/bodyset/calcn_r location=(0.07 -0.0282 0.0449) radius=0.02
    ContactSphere right_6: socket_frame=/bodyset/calcn_r location=(0.119 -0.0282 -6.092648e-8) radius=0.02
    ContactSphere right_7: socket_frame=/bodyset/calcn_r location=(0 -0.0282 0) radius=0.02
    ContactSphere left_1: socket_frame=/bodyset/toes_l location=(0.0699 -0.0299 0.0286) radius=0.02
    ContactSphere left_2: socket_frame=/bodyset/toes_l location=(0.0294 -0.0299 -1.521175e-8) radius=0.02
    ContactSphere left_3: socket_frame=/bodyset/calcn_l location=(0.1499 -0.0282 -6.884226e-8) radius=0.02
    ContactSphere left_4: socket_frame=/bodyset/calcn_l location=(0.1499 -0.0282 0.02272616) radius=0.02
    ContactSphere left_5: socket_frame=/bodyset/calcn_l location=(0.07 -0.0282 -0.0449) radius=0.02
    ContactSphere left_6: socket_frame=/bodyset/calcn_l location=(0.119 -0.0282 6.092648e-8) radius=0.02
    ContactSphere left_7: socket_frame=/bodyset/calcn_l location=(0 -0.0282 0) radius=0.02
    ContactCapsule right_femur_col: socket_frame=femur_r location=(0 -0.225 0.015) orientation=(1.65 0.1 0) radius=0.05
        length=0.16
    ContactCapsule right_tibia_col: socket_frame=tibia_r location=(0 -0.245 0) orientation=(1.5707 0 0) radius=0.04
        length=0.18
    ContactCapsule left_femur_col: socket_frame=femur_l location=(0 -0.225 -0.015) orientation=(1.4914 0.1 0)
        radius=0.05 length=0.16
    ContactCapsule left_tibia_col: socket_frame=tibia_l location=(0 -0.245 0) orientation=(1.5707 0 0) radius=0.04
        length=0.18
    ContactCapsule pelvis_col: socket_frame=pelvis location=(-0.06 -0.02 0) radius=0.065 length=0.06
