# OpenSim document version 40600
Model athlete_model:
  Ground
  BodySet:
    Body pelvis: mass=11.777 [kg] mass_center=(-0.0707 0 0) inertia=(0.1028 0.0871 0.0579 0 0 0)
        meshes=(pelvis_r.obj pelvis_l.obj sacrum.obj)
      Station iliocrestale_r: .. (-0.05 0.082 0.11)
      Station iliocrestale_l: .. (-0.05 0.082 -0.11)
      Station iliocrestale_midpoint: .. (-0.05 0.082 0)
      Station ASIS_r: .. (-0.0015 0.0065 0.125)
      Station ASIS_l: .. (-0.0015 0.0065 -0.125)
      Station ASIS_midpoint: .. (-0.0015 0.0065 0)
      Station mid_pelvis: .. (-0.05 0.0065 0)
      Station PSIS_r: .. (-0.14 0.035 0.055)
      Station PSIS_l: .. (-0.14 0.035 -0.055)
      Station PSIS_midpoint: .. (-0.14 0.035 0)
      Station acetabulum_r: .. (-0.072 -0.06 0.08)
      Station acetabulum_l: .. (-0.072 -0.06 -0.08)
      StationDefinedFrame pelvis_frame: socket_point_a=/bodyset/pelvis/mid_pelvis
          socket_point_b=/bodyset/pelvis/ASIS_midpoint socket_point_c=/bodyset/pelvis/iliocrestale_midpoint
          socket_origin_point=/bodyset/pelvis/mid_pelvis ab_axis=+x ab_x_ac_axis=+z
      StationDefinedFrame hip_r_parent_frame: socket_point_a=/bodyset/pelvis/mid_pelvis
          socket_point_b=/bodyset/pelvis/ASIS_midpoint socket_point_c=/bodyset/pelvis/iliocrestale_midpoint
          socket_origin_point=/bodyset/pelvis/acetabulum_r ab_axis=+x ab_x_ac_axis=+z
      StationDefinedFrame hip_l_parent_frame: socket_point_a=/bodyset/pelvis/mid_pelvis
          socket_point_b=/bodyset/pelvis/ASIS_midpoint socket_point_c=/bodyset/pelvis/iliocrestale_midpoint
          socket_origin_point=/bodyset/pelvis/acetabulum_l ab_axis=+x ab_x_ac_axis=+z
  JointSet:
    CustomJoint ground_pelvis: socket_parent_frame=/ground socket_child_frame=/bodyset/pelvis/pelvis_frame
      Coordinate pelvis_tilt: default_value=0 range=(-1.570796 1.570796) clamped=true
      Coordinate pelvis_list: default_value=0 range=(-1.570796 1.570796) clamped=true
      Coordinate pelvis_rotation: default_value=0 range=(-6.283185 6.283185) clamped=true
      Coordinate pelvis_tx: default_value=0 range=(-10 10) clamped=true
      Coordinate pelvis_ty: default_value=0.94 range=(-10 10) clamped=true
      Coordinate pelvis_tz: default_value=0 range=(-10 10) clamped=true
      SpatialTransform:
        TransformAxis rotation1: coordinates=pelvis_tilt axis=(0 0 1) LinearFunction(coefficients=1 0)
        TransformAxis rotation2: coordinates=pelvis_list axis=(1 0 0) LinearFunction(coefficients=1 0)
        TransformAxis rotation3: coordinates=pelvis_rotation axis=(0 1 0) LinearFunction(coefficients=1 0)
        TransformAxis translation1: coordinates=pelvis_tx axis=(1 0 0) LinearFunction(coefficients=1 0)
        TransformAxis translation2: coordinates=pelvis_ty axis=(0 1 0) LinearFunction(coefficients=1 0)
        TransformAxis translation3: coordinates=pelvis_tz axis=(0 0 1) LinearFunction(coefficients=1 0)
  ContactGeometrySet:
    ContactEllipsoid pelvis: socket_frame=/bodyset/pelvis location=(-0.0707 0 0) radii=(0.5 0.25 .25)
