# OpenSim document version 40500
Model subject01:
  gravity: 0 -9.80665 0
  length_units: meters
  force_units: N
  credits:
    Delp S.L., Loan J.P., Hoy M.G., Zajac F.E., Topp E.L., Rosen J.M., Thelen D.G., Anderson F.C., Seth A., Hamner S.R.
  publications:
    Notes: 3D, 23 DOF gait model created by D.G. Thelen, Univ. of Wisconsin-Madison, and Samuel Hamner, Ajay Seth, Frank C. Anderson, and Scott L. Delp, Stanford University. Lower extremity joint defintions based on Delp et al. (1990). Low back joint and anthropometry based on Anderson and Pandy (1999, 2001). Planar knee model of Yamaguchi and Zajac (1989). Seth removed the patella to avoid kinematic constraints; insertions of the quadrucepts are handled with moving points in the tibia frame. Hamner added arms adapted from Holzbaur et al., 2005. Hamner, S.R., Seth, A, Delp, S.L.: Muscle contributions to propulsion and support during running. Journal of Biomechanics, 2010. Delp, S.L., Loan, J.P., Hoy, M.G., Zajac, F.E., Topp E.L., Rosen, J.M.: An interactive graphics-based model of the lower extremity to study orthopaedic surgical procedures, IEEE Transactions on Biomedical Engineering, vol. 37, pp. 757-767, 1990. Yamaguchi G.T., Zajac F.E.: A planar model of the knee joint to characterize the knee extensor mechanism." J . Biomech. vol. 21. pp. 1-10. 1989. Anderson F.C., Pandy M.G.: A dynamic optimization solution for vertical jumping in three dimensions. Computer Methods in Biomechanics and Biomedical Engineering 2:201-231, 1999. Anderson F.C., Pandy M.G.: Dynamic optimization of human walking. Journal of Biomechanical Engineering 123:381-390, 2001. Holzbaur, KR, WM Murray and SL Delp, 2005. A model of the upper extremity for simulating musculoskeletal surgery and analyzing neuromuscular control. Ann Biomed Eng 33(6): 829-840.
  Ground
  BodySet:
    Body pelvis: mass=11.3078 [kg] mass_center=(-0.0623853 0 0) inertia=(0.0756014 0.0756014 0.043286 0 0 0)
        meshes=(sacrum.vtp pelvis.vtp l_pelvis.vtp)
    Body lumbar_spine: mass=5 mass_center=(0 -0.0875 0) inertia=(0.02233073 0.01914062 0.02233073 0 0 0)
    Body thorax: mass=16.83 mass_center=(-0.0591 -0.1486 0) inertia=(1.29841 0.55245 1.29841 0 0 0) meshes=ribs.vtp
    Body head: mass=5 mass_center=(0 0.0375 0) inertia=(0.01569 0.01455 0.0186 0 0 0) meshes=skull.vtp
      Station glabella: .. (0.09 0.07 0)
      Station euryon_r: .. (-0.0015 0.085 0.069)
      Station euryon_l: .. (-0.0015 0.085 -0.069)
      Station opisthocranion: .. (-0.075 0.05 0)
      Station vertex: .. (0 0.14 0)
    Body scapula_r: mass=0.7054 mass_center=(-0.04612 -0.0319 -0.04565) inertia=(0.001 0.001 0.001 0 0 0)
        meshes=scapula_r.vtp
      Station acromion_r: .. (0 0 0)
    Body humerus_r: mass=2.0325 mass_center=(0 -0.1645 0) inertia=(0.011946 0.004121 0.01341 0 0 0)
        meshes=humerus_r.vtp
    Body ulna_r: mass=0.6075 mass_center=(0 -0.120525 0) inertia=(0.002962 0.000618 0.003213 0 0 0) meshes=ulna_r.vtp
      Station olecranon_r: .. (-0.03 -0.001 0)
    Body scapula_l: mass=0.7054 mass_center=(-0.04612 -0.0319 0.04565) inertia=(0.001 0.001 0.001 0 0 0)
        meshes=scapula_l.vtp
      Station acromion_l: .. (0 0 0)
  JointSet:
    CustomJoint ground_pelvis: socket_parent_frame=ground_offset socket_child_frame=pelvis_offset
      Coordinate pelvis_tilt: default_value=0 range=(-1.570796 1.570796) clamped=true
      Coordinate pelvis_list: default_value=0 range=(-1.570796 1.570796) clamped=true
      Coordinate pelvis_rotation: default_value=0 range=(-1.570796 1.570796) clamped=true
      Coordinate pelvis_tx: default_value=0 range=(-5 25) clamped=true
      Coordinate pelvis_ty: default_value=0 range=(-1 2) clamped=true
      Coordinate pelvis_tz: default_value=0 range=(-3 3) clamped=true
      PhysicalOffsetFrame ground_offset: socket_parent=/ground translation=(0 0 0) [meters]
      PhysicalOffsetFrame pelvis_offset: socket_parent=/bodyset/pelvis translation=(0 -1 0)
      SpatialTransform:
        TransformAxis rotation1: coordinates=pelvis_tilt axis=(0 0 1) LinearFunction(coefficients=1 0)
        TransformAxis rotation2: coordinates=pelvis_list axis=(1 0 0) LinearFunction(coefficients=1 0)
        TransformAxis rotation3: coordinates=pelvis_rotation axis=(0 1 0) LinearFunction(coefficients=1 0)
        TransformAxis translation1: coordinates=pelvis_tx axis=(1 0 0) LinearFunction(coefficients=1 0)
        TransformAxis translation2: coordinates=pelvis_ty axis=(0 1 0) LinearFunction(coefficients=1 0)
        TransformAxis translation3: coordinates=pelvis_tz axis=(0 0 1) LinearFunction(coefficients=1 0)
    CantileverFreeBeamJoint lumbar: socket_parent_frame=lumbar_spine_parent_frame
        socket_child_frame=lumbar_spine_child_frame beam_length=0.175
      Coordinate lumbar_bending: default_value=0 range=(-0.5235988 0.5235988) clamped=true
      Coordinate lumbar_extension: default_value=-0.6414085 range=(-1.182461 0.4930555) clamped=true
      Coordinate lumbar_rotation: default_value=0 range=(-0.2617994 0.2617994) clamped=true
      PhysicalOffsetFrame lumbar_spine_parent_frame: socket_parent=/bodyset/pelvis translation=(-0.09 0.075 0)
          orientation=(-1.570796 0.25 0) [radians]
      PhysicalOffsetFrame lumbar_spine_child_frame: socket_parent=/bodyset/lumbar_spine translation=(0 0 0)
          orientation=(-1.570796 0 0)
    CantileverFreeBeamJoint thorax: socket_parent_frame=thoracic_spine_parent_frame
        socket_child_frame=thoracic_spine_child_frame beam_length=0.275
      Coordinate thorax_bending: default_value=0 range=(-0.5235988 0.5235988) clamped=true
      Coordinate thorax_extension: default_value=0.6326819 range=(0.2487094 1.086467) clamped=true
      Coordinate thorax_rotation: default_value=0 range=(-0.8203047 0.8203047) clamped=true
      PhysicalOffsetFrame thoracic_spine_parent_frame: socket_parent=/bodyset/lumbar_spine translation=(0 0 0)
          orientation=(-1.570796 0 0)
      PhysicalOffsetFrame thoracic_spine_child_frame: socket_parent=/bodyset/thorax translation=(-0.0275 0.057 0)
          orientation=(-1.570796 0.25 0)
    CantileverFreeBeamJoint cervical: socket_parent_frame=cervical_spine_parent_frame
        socket_child_frame=cervical_spine_child_frame beam_length=0.075
      Coordinate cervical_bending: default_value=0 range=(-0.8552113 0.8552113) clamped=true
      Coordinate cervical_extension: default_value=-0.2487094 range=(-1.348267 0.8683013) clamped=true
      Coordinate cervical_rotation: default_value=0 range=(-1.48353 1.48353) clamped=true
      PhysicalOffsetFrame cervical_spine_parent_frame: socket_parent=/bodyset/thorax translation=(-0.0275 0.057 0)
          orientation=(-1.570796 0.25 0)
      PhysicalOffsetFrame cervical_spine_child_frame: socket_parent=/bodyset/head translation=(0 0 0)
          orientation=(-1.570796 0 0)
    EllipsoidJoint scapulothoracic_r: socket_parent_frame=scapulothoracic_r_parent_frame
        socket_child_frame=scapulothoracic_r_child_frame radii_x_y_z=(0.2 0.083 0.083)
      Coordinate scapula_abduction_r: default_value=0 range=(-0.5235988 0.5235988) clamped=true
      Coordinate scapula_elevation_r: default_value=0 range=(-0.1745329 0.1745329) clamped=true
      Coordinate scapula_rotation_r: default_value=0 range=(-0.2617994 0.2617994) clamped=true
      PhysicalOffsetFrame scapulothoracic_r_parent_frame: socket_parent=/bodyset/thorax
          translation=(-0.0294 -0.0173 0.0703) orientation=(0 -0.87 1.570796)
      PhysicalOffsetFrame scapulothoracic_r_child_frame: socket_parent=/bodyset/scapula_r
          translation=(-0.05982 -0.03904 -0.056) orientation=(-0.5181 -1.14159 1.285396)
    GimbalJoint glenohumeral_r: socket_parent_frame=glenohumeral_r_parent_frame
        socket_child_frame=glenohumeral_r_child_frame
      Coordinate shoulder_flexion_r: default_value=0 range=(-1.570796 3.141593) clamped=true
      Coordinate shoulder_abduction_r: default_value=0 range=(-1.570796 2.513274) clamped=true
      Coordinate shoulder_rotation_r: default_value=0 range=(-1.570796 1.570796) clamped=true
      PhysicalOffsetFrame glenohumeral_r_parent_frame: socket_parent=/bodyset/scapula_r
          translation=(-0.00955 -0.034 0.009) orientation=(-1.570796 0 -1.570796)
      PhysicalOffsetFrame glenohumeral_r_child_frame: socket_parent=/bodyset/humerus_r translation=(0 0 0)
          orientation=(-1.570796 0 -1.570796)
    EllipsoidJoint scapulothoracic_l: socket_parent_frame=scapulothoracic_l_parent_frame
        socket_child_frame=scapulothoracic_l_child_frame radii_x_y_z=(-0.2 -0.083 -0.083)
      Coordinate scapula_abduction_l: default_value=0 range=(-0.5235988 0.5235988) clamped=true
      Coordinate scapula_elevation_l: default_value=0 range=(-0.1745329 0.1745329) clamped=true
      Coordinate scapula_rotation_l: default_value=0 range=(-0.2617994 0.2617994) clamped=true
      PhysicalOffsetFrame scapulothoracic_l_parent_frame: socket_parent=/bodyset/thorax
          translation=(-0.0294 -0.0173 -0.0703) orientation=(0 0.87 -1.570796)
      PhysicalOffsetFrame scapulothoracic_l_child_frame: socket_parent=/bodyset/scapula_l
          translation=(-0.05982 -0.03904 0.056) orientation=(0.5181 1.14159 -1.856196)
    PinJoint elbow_r: socket_parent_frame=elbow_r_parent_frame socket_child_frame=elbow_r_child_frame
      Coordinate elbow_flex_r: default_value=0 range=(0 2.617994) clamped=true
      PhysicalOffsetFrame elbow_r_parent_frame: socket_parent=/bodyset/humerus_r
          translation=(0.013144 -0.286273 -0.009595) orientation=(-0.0228627 0.228018 0.0051689)
      PhysicalOffsetFrame elbow_r_child_frame: socket_parent=/bodyset/ulna_r translation=(0 0 0)
          orientation=(-0.0228627 0.228018 0.0051689)
  ContactGeometrySet:
    ContactHalfSpace ground: socket_frame=/ground location=(0 0 0)
    ContactCapsule pelvis_col: socket_frame=pelvis location=(-0.06 -0.02 0) radius=0.065 length=0.06
    ContactCapsule lumbar_col: socket_frame=lumbar_spine location=(0 -0.085 0) radius=0.05 length=0.03
    ContactCapsule thorax_col: socket_frame=thorax location=(0 -0.145 0) orientation=(1.5707 0 0) radius=0.08
        length=0.06
    ContactSphere head_col: socket_frame=head location=(0 0.0375 0) radius=0.065
    ContactSphere scapula_col: socket_frame=scapula_r location=(0 0 0) radius=0.02
